Mon 01/27/2020
04:24 PM
;Model Desc: Receptor Mediated Clearance model with Dynamic Change in Receptors
;Project Name: antibody
;Project ID: NO PROJECT DESCRIPTION

;Project ID: NO PROJECT DESCRIPTION

$PROB RUN# wexample6x (from r2compl), using FAST
$ABBR DERIV2=NO DERIV2=NOCOMMON ; DERIV1=NO
$INPUT C SET ID JID TIME DV AMT RATE EVID MDV CMT
$DATA a_uflg.csv IGNORE=C IGNORE=(AMT.EQN.1.0) IGNORE=(RATE.EQN.1.0E+08)

; The new numerical integration solver is used, although ADVAN=9 is also efficient
; for this problem.
$SUBROUTINES ADVAN13 TRANS1 TOL=6 ATOL=6
$MODEL NCOMPARTMENTS=3

;Initial Omegas
$OMEGA BLOCK(8) VALUES(0.5,0.01)

$PK
MU_1=THETA(1)
MU_2=THETA(2)
MU_3=THETA(3)
MU_4=THETA(4)
MU_5=THETA(5)
MU_6=THETA(6)
MU_7=THETA(7)
MU_8=THETA(8)
VC=EXP(MU_1+ETA(1))
K10=EXP(MU_2+ETA(2))
K12=EXP(MU_3+ETA(3))
K21=EXP(MU_4+ETA(4))
VM=EXP(MU_5+ETA(5))
KMC=EXP(MU_6+ETA(6))
K03=EXP(MU_7+ETA(7))
K30=EXP(MU_8+ETA(8))
S3=VC
S1=VC
KM=KMC*S1
A_0(3)=K03/K30
MTIME(1)=7.1
MTDIFF=1
AZTEST=A_0FLG
IF(TSTATE==MTIME(1).AND.AZTEST==0) A_UFLG=1
A_U(1)=A(1)+1000.0
A_U(2)=A(2)
A_U(3)=A(3)

$DES
DADT(1) = -(K10+K12)*A(1) + K21*A(2) - VM*A(1)*A(3)/(A(1)+KM)
DADT(2) = K12*A(1) - K21*A(2)
DADT(3) =  -(VM-K30)*A(1)*A(3)/(A(1)+KM) - K30*A(3) + K03

$ERROR
ETYPE=1
IF(CMT.NE.1) ETYPE=0
CP=A(1)/S1
CR=A(3)/S3
IPRE=CP
IF(CMT.NE.1) IPRE=CR
Y = IPRE + IPRE*ETYPE*EPS(1) + IPRE*(1.0-ETYPE)*EPS(2)

$THETA
;Initial Thetas
( 4.0 )  ;[MU_1]
( -3.1 ) ;[MU_2]
( 0.5 )  ;[MU_3]
( -0.2 );[MU_4]
( 3.2 ) ;[MU_5]
( 0.01 )  ;[MU_6]
( 4.0 )  ;[MU_7]
( -0.1) ;[MU_8]

$SIGMA
0.1 ;[p]
0.1 ;[p]

$EST METHOD=1 INTERACTION PRINT=1 NOABORT NOPRIOR=1 SIGL=6 MAXEVAL=0 NSIG=2 MCETA=10
     NOTHETABOUNDTEST NOOMEGABOUNDTEST NOSIGMABOUNDTEST FAST

NM-TRAN MESSAGES
 WARNINGS AND ERRORS (IF ANY) FOR PROBLEM    1
 (WARNING  2) NM-TRAN INFERS THAT THE DATA ARE POPULATION.

1NONLINEAR MIXED EFFECTS MODEL PROGRAM (NONMEM) VERSION 7.5.0 Beta version 3
 ORIGINALLY DEVELOPED BY STUART BEAL, LEWIS SHEINER, AND ALISON BOECKMANN
 CURRENT DEVELOPERS ARE ROBERT BAUER, ICON DEVELOPMENT SOLUTIONS,
 AND ALISON BOECKMANN. IMPLEMENTATION, EFFICIENCY, AND STANDARDIZATION
 PERFORMED BY NOUS INFOSYSTEMS.
 PROBLEM NO.:         1
 RUN# wexample6x (from r2compl), using FAST
 TOT. NO. OF OBS RECS:     1568
 TOT. NO. OF INDIVIDUALS:       50
 GENERAL NONLINEAR KINETICS MODEL WITH STIFF/NONSTIFF EQUATIONS (LSODA, ADVAN13)
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 #TBLN:      1
 #METH: First Order Conditional Estimation with Interaction (No Prior) (Evaluation)
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 Elapsed evaluation time in seconds:     2.86
 Elapsed postprocess time in seconds:     0.00

 ********************   FIRST ORDER CONDITIONAL ESTIMATION WITH INTERACTION (NO PRIOR) (EVALUATION)  ********************
 #OBJT:**************                       MINIMUM VALUE OF OBJECTIVE FUNCTION                      ********************
 #OBJV:********************************************    -3110.228       **************************************************

 ********************   FIRST ORDER CONDITIONAL ESTIMATION WITH INTERACTION (NO PRIOR) (EVALUATION)  ********************
 ********************                             FINAL PARAMETER ESTIMATE                           ********************

 THETA - VECTOR OF FIXED EFFECTS PARAMETERS   *********
         TH 1      TH 2      TH 3      TH 4      TH 5      TH 6      TH 7      TH 8
         4.00E+00 -3.10E+00  5.00E-01 -2.00E-01  3.20E+00  1.00E-02  4.00E+00 -1.00E-01

 OMEGA - COV MATRIX FOR RANDOM EFFECTS - ETAS  ********
         ETA1      ETA2      ETA3      ETA4      ETA5      ETA6      ETA7      ETA8
 ETA1
+        5.00E-01
 ETA2
+        1.00E-02  5.00E-01
 ETA3
+        1.00E-02  1.00E-02  5.00E-01
 ETA4
+        1.00E-02  1.00E-02  1.00E-02  5.00E-01
 ETA5
+        1.00E-02  1.00E-02  1.00E-02  1.00E-02  5.00E-01
 ETA6
+        1.00E-02  1.00E-02  1.00E-02  1.00E-02  1.00E-02  5.00E-01
 ETA7
+        1.00E-02  1.00E-02  1.00E-02  1.00E-02  1.00E-02  1.00E-02  5.00E-01
 ETA8
+        1.00E-02  1.00E-02  1.00E-02  1.00E-02  1.00E-02  1.00E-02  1.00E-02  5.00E-01

 SIGMA - COV MATRIX FOR RANDOM EFFECTS - EPSILONS  ****
         EPS1      EPS2
 EPS1
+        1.00E-01
 EPS2
+        0.00E+00  1.00E-01

 OMEGA - CORR MATRIX FOR RANDOM EFFECTS - ETAS  *******
         ETA1      ETA2      ETA3      ETA4      ETA5      ETA6      ETA7      ETA8
 ETA1
+        7.07E-01
 ETA2
+        2.00E-02  7.07E-01
 ETA3
+        2.00E-02  2.00E-02  7.07E-01
 ETA4
+        2.00E-02  2.00E-02  2.00E-02  7.07E-01
 ETA5
+        2.00E-02  2.00E-02  2.00E-02  2.00E-02  7.07E-01
 ETA6
+        2.00E-02  2.00E-02  2.00E-02  2.00E-02  2.00E-02  7.07E-01
 ETA7
+        2.00E-02  2.00E-02  2.00E-02  2.00E-02  2.00E-02  2.00E-02  7.07E-01
 ETA8
+        2.00E-02  2.00E-02  2.00E-02  2.00E-02  2.00E-02  2.00E-02  2.00E-02  7.07E-01

 SIGMA - CORR MATRIX FOR RANDOM EFFECTS - EPSILONS  ***
         EPS1      EPS2
 EPS1
+        3.16E-01
 EPS2
+        0.00E+00  3.16E-01
 Elapsed finaloutput time in seconds:     0.00
 #CPUT: Total CPU Time in Seconds,        3.744
