Fri 05/18/2018
03:40 PM

$PROB  THEOPHYLLINE   POPULATION DATA
$INPUT      ID DOSE=AMT TIME CP=DV WT
$DATA       THEOPPCMAX
$ABB COMRES=2
$ABBR DECLARE INTEGER I

$SUBROUTINES  ADVAN15  TOL=6 OTHER=cmax15u.f90
$MODEL COMP=(DEPOT,INITIALOFF,DEFDOSE) COMP=(CENTRAL,DEFOBS,NOOFF)

$PK

;THETA(1)=MEAN ABSORPTION RATE CONSTANT (1/HR)
;THETA(2)=MEAN ELIMINATION RATE CONSTANT (1/HR)
;THETA(3)=SLOPE OF CLEARANCE VS WEIGHT RELATIONSHIP (LITERS/HR/KG)
;SCALING PARAMETER=VOLUME/WT SINCE DOSE IS WEIGHT-ADJUSTED
   IF (Wt>0) WEIGHT=WT
   KA=THETA(1)+ETA(1)
   KE=THETA(2)+ETA(2)
   CL=THETA(3)*WEIGHT+ETA(3)
   S2=CL/KE/WEIGHT


$THETA  (0.0,1.96) (.0,.086) (0.0,.040)
$OMEGA BLOCK(3)  1.519 .00376 .000133 -0.066 .00752 .481

$DES

   DADT(1)=-KA*A(1)
   DADT(2)= KA*A(1)-KE*A(2)

$ERROR
include nonmem_reserved_general

TMAX=0.0
CMAX=0.0
ZRCROSSDIR=0 ; ZERO CROSSING DIRECTION
CMAXDER=0.0
; THIS ROOT-FINDER CAN FIND THE EXACT TMAX AND CMAX, BY FINDING WHEN DADT(2) IS ZERO
; SEE SUBROUTINE FCVROOTFN in cmax15u.f90
 IF(RTSIGNAL>0.0) THEN ; A ZERO-CROSSING HAS BEEN FOUND
  TMAX=TRTINFO(1) ; ONLY ONE CROSSING EXPECTED, SO INDEX IS 1
  CMAX=YRTINFO(2,1)/S2 ; PICK UP THE Y(2) VALUE AT CROSSING NUMBER 1
  CMAXDER=YPRTINFO(2,1); VERIFY THAT CMAX DERIVATIVE IS CLOSE TO ZERO.
  ZRCROSSDIR=RTINFO(1,1) ; VERIFY THAT ZEROCROSSING IS IN NEGATIVE DIRECTION (-1, FROM POSITIVE TO NEGATIVE), INDICATING A PEAK, RATHER THAN A NADIR
 RTSIGNAL=0
 ENDIF

; Compare with analytical solution for tmax, cmax
CMAXC=0.0
TMAXC=0.0
IF(AMT>0.0) THEN
  TMAXC=LOG(KA/KE)/(KA-KE)
  CMAXC=KA*AMT/S2*(EXP(-KE*TMAXC)-EXP(-KA*TMAXC))/(KA-KE)
ENDIF

IPRED=F
   Y=F+EPS(1)

$SIGMA  .467

$EST METHOD=1 MAXEVAL=9999 PRINT=1 SIGL=6 NOABORT
     NOTHETABOUNDTEST NOOMEGABOUNDTEST NOSIGMABOUNDTEST
$COV MATRIX=R UNCONDITIONAL
$TABLE          ID TIME WEIGHT TMAX CMAX CMAXDER ZRCROSSDIR TMAXC CMAXC IPRED NOAPPEND NOPRINT FORMAT=S1PE15.8 FILE=cmax15.tab

NM-TRAN MESSAGES
 WARNINGS AND ERRORS (IF ANY) FOR PROBLEM    1
 (WARNING  2) NM-TRAN INFERS THAT THE DATA ARE POPULATION.

1NONLINEAR MIXED EFFECTS MODEL PROGRAM (NONMEM) VERSION 7.5.0 alpha version 2
 ORIGINALLY DEVELOPED BY STUART BEAL, LEWIS SHEINER, AND ALISON BOECKMANN
 CURRENT DEVELOPERS ARE ROBERT BAUER, ICON DEVELOPMENT SOLUTIONS,
 AND ALISON BOECKMANN. IMPLEMENTATION, EFFICIENCY, AND STANDARDIZATION
 PERFORMED BY NOUS INFOSYSTEMS.
 PROBLEM NO.:         1
 THEOPHYLLINE   POPULATION DATA
 TOT. NO. OF OBS RECS:      108
 TOT. NO. OF INDIVIDUALS:       12
 GENERAL NONLINEAR KINETICS MODEL WITH EQUILIBRIUM COMPARTMENTS (IDAS, ADVAN15)
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 #TBLN:      1
 #METH: First Order Conditional Estimation
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
 #TERM:
0MINIMIZATION SUCCESSFUL
 HOWEVER, PROBLEMS OCCURRED WITH THE MINIMIZATION.
 REGARD THE RESULTS OF THE ESTIMATION STEP CAREFULLY, AND ACCEPT THEM ONLY
 AFTER CHECKING THAT THE COVARIANCE STEP PRODUCES REASONABLE OUTPUT.
 NO. OF FUNCTION EVALUATIONS USED:      299
 NO. OF SIG. DIGITS IN FINAL EST.:  3.5

 ETABAR IS THE ARITHMETIC MEAN OF THE ETA-ESTIMATES,
 AND THE P-VALUE IS GIVEN FOR THE NULL HYPOTHESIS THAT THE TRUE MEAN IS 0.

 ETABAR:        -2.7775E-02 -2.8319E-04 -6.2724E-03
 SE:             2.6659E-01  3.3120E-03  1.8182E-01
 N:                      12          12          12

 P VAL.:         9.1702E-01  9.3186E-01  9.7248E-01

 ETASHRINKSD(%)  1.0000E-10  4.5424E+00  2.8104E+00
 ETASHRINKVR(%)  1.0000E-10  8.8785E+00  5.5418E+00
 EBVSHRINKSD(%)  2.8290E+00  7.2348E+00  5.8831E+00
 EBVSHRINKVR(%)  5.5780E+00  1.3946E+01  1.1420E+01
 EPSSHRINKSD(%)  1.0420E+01
 EPSSHRINKVR(%)  1.9754E+01


 TOTAL DATA POINTS NORMALLY DISTRIBUTED (N):          108
 N*LOG(2PI) CONSTANT TO OBJECTIVE FUNCTION:    198.490723172209
 OBJECTIVE FUNCTION VALUE WITHOUT CONSTANT:    110.963863899579
 OBJECTIVE FUNCTION VALUE WITH CONSTANT:       309.454587071788
 REPORTED OBJECTIVE FUNCTION DOES NOT CONTAIN CONSTANT

 TOTAL EFFECTIVE ETAS (NIND*NETA):                            36


 #TERE:
 Elapsed estimation  time in seconds:    33.31
 Elapsed covariance  time in seconds:    11.73
 Elapsed postprocess time in seconds:     0.16

 ********************                        FIRST ORDER CONDITIONAL ESTIMATION                      ********************
 #OBJT:**************                       MINIMUM VALUE OF OBJECTIVE FUNCTION                      ********************
 #OBJV:********************************************      110.964       **************************************************

 ********************                        FIRST ORDER CONDITIONAL ESTIMATION                      ********************
 ********************                             FINAL PARAMETER ESTIMATE                           ********************

 THETA - VECTOR OF FIXED EFFECTS PARAMETERS   *********
         TH 1      TH 2      TH 3
         1.67E+00  9.06E-02  4.05E-02

 OMEGA - COV MATRIX FOR RANDOM EFFECTS - ETAS  ********
         ETA1      ETA2      ETA3
 ETA1
+        9.25E-01
 ETA2
+        4.35E-03  1.58E-04
 ETA3
+       -8.25E-02  7.48E-03  4.58E-01

 SIGMA - COV MATRIX FOR RANDOM EFFECTS - EPSILONS  ****
         EPS1
 EPS1
+        5.33E-01

 OMEGA - CORR MATRIX FOR RANDOM EFFECTS - ETAS  *******
         ETA1      ETA2      ETA3
 ETA1
+        9.62E-01
 ETA2
+        3.60E-01  1.26E-02
 ETA3
+       -1.27E-01  8.80E-01  6.77E-01

 SIGMA - CORR MATRIX FOR RANDOM EFFECTS - EPSILONS  ***
         EPS1
 EPS1
+        7.30E-01

 ********************                        FIRST ORDER CONDITIONAL ESTIMATION                      ********************
 ********************                            STANDARD ERROR OF ESTIMATE                          ********************

 THETA - VECTOR OF FIXED EFFECTS PARAMETERS   *********
         TH 1      TH 2      TH 3
         3.09E-01  6.74E-03  3.14E-03

 OMEGA - COV MATRIX FOR RANDOM EFFECTS - ETAS  ********
         ETA1      ETA2      ETA3
 ETA1
+        6.31E-01
 ETA2
+        7.15E-03  1.75E-04
 ETA3
+        3.09E-01  5.63E-03  1.65E-01

 SIGMA - COV MATRIX FOR RANDOM EFFECTS - EPSILONS  ****
         EPS1
 EPS1
+        9.35E-02

 OMEGA - CORR MATRIX FOR RANDOM EFFECTS - ETAS  *******
         ETA1      ETA2      ETA3
 ETA1
+        3.28E-01
 ETA2
+        5.00E-01  6.98E-03
 ETA3
+        4.70E-01  1.28E-01  1.22E-01

 SIGMA - CORR MATRIX FOR RANDOM EFFECTS - EPSILONS  ***
         EPS1
 EPS1
+        6.40E-02

 ********************                        FIRST ORDER CONDITIONAL ESTIMATION                      ********************
 ********************                          COVARIANCE MATRIX OF ESTIMATE                         ********************

            TH 1      TH 2      TH 3      OM11      OM12      OM13      OM22      OM23      OM33      SG11
 TH 1
+        9.57E-02
 TH 2
+        5.53E-05  4.54E-05
 TH 3
+       -1.10E-04  1.58E-05  9.87E-06
 OM11
+        4.65E-02 -4.02E-04  1.01E-04  3.98E-01
 OM12
+       -2.22E-04 -1.02E-05 -3.81E-06 -4.59E-04  5.11E-05
 OM13
+       -7.98E-03 -2.79E-04 -1.58E-04 -7.11E-02  1.90E-03  9.53E-02
 OM22
+       -5.73E-06  2.13E-08 -8.54E-08 -4.45E-05  7.96E-07  3.35E-05  3.07E-08
 OM23
+       -7.50E-05  2.17E-06 -2.59E-06 -1.46E-03  2.00E-05  9.92E-04  9.50E-07  3.16E-05
 OM33
+        8.30E-04  9.03E-06 -7.26E-05 -4.07E-02  4.71E-04  2.26E-02  2.24E-05  8.08E-04  2.73E-02
 SG11
+       -2.24E-03 -2.78E-05 -1.44E-05 -1.13E-02  2.78E-05  1.58E-03  1.18E-06  2.88E-05  8.84E-04  8.74E-03

 ********************                        FIRST ORDER CONDITIONAL ESTIMATION                      ********************
 ********************                          CORRELATION MATRIX OF ESTIMATE                        ********************

            TH 1      TH 2      TH 3      OM11      OM12      OM13      OM22      OM23      OM33      SG11
 TH 1
+        3.09E-01
 TH 2
+        2.65E-02  6.74E-03
 TH 3
+       -1.13E-01  7.44E-01  3.14E-03
 OM11
+        2.38E-01 -9.46E-02  5.11E-02  6.31E-01
 OM12
+       -1.01E-01 -2.13E-01 -1.70E-01 -1.02E-01  7.15E-03
 OM13
+       -8.35E-02 -1.34E-01 -1.63E-01 -3.65E-01  8.63E-01  3.09E-01
 OM22
+       -1.06E-01  1.81E-02 -1.55E-01 -4.03E-01  6.36E-01  6.20E-01  1.75E-04
 OM23
+       -4.31E-02  5.72E-02 -1.47E-01 -4.12E-01  4.98E-01  5.71E-01  9.64E-01  5.63E-03
 OM33
+        1.62E-02  8.11E-03 -1.40E-01 -3.90E-01  3.99E-01  4.42E-01  7.76E-01  8.69E-01  1.65E-01
 SG11
+       -7.75E-02 -4.42E-02 -4.91E-02 -1.91E-01  4.17E-02  5.47E-02  7.22E-02  5.47E-02  5.73E-02  9.35E-02
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 Elapsed finaloutput time in seconds:     0.02
 #CPUT: Total CPU Time in Seconds,       42.354
