Fri 10/12/2018
06:26 PM
$PROBLEM PDLIDR
$ABBR PROTECT
$ABBR DERIV2=NO DERIV2=NOCOMMON ; DERIV1=NO
$INPUT ID TIME DV MDV CMT
$DATA data_LDL_Cholesterol.csv IGNORE=@
$SUBROUTINES ADVAN16 TOL=12
$MODEL NCOMPARTMENTS=3

$PK
Imax=THETA(1)
IC50=THETA(2)
Gam=THETA(3)
RZ0=THETA(4)
kout=THETA(5)
kin = RZ0*kout
Dm = 50*0.3;  % 300 gr rat
ka1 = 1.255;
ka2 = 0.219;
FZ = 0.214;
Fr = 0.715;
kel = 5.57;
k12 = 3.61;
k21 = 2.84;
V = 0.719*0.3;
;  TAUy
TAU1=THETA(6)
; Initial conditions
A_0(1)=0
A_0(2)=0
A_0(3)=RZ0

$DES
; AD_x_y is the State value of A(x) delayed for time TAUy.
; AP_x_y is the State value of A(x) in the past, for time delay TAUy.
AP_3_1=RZ0

;BASE EQUATIONS

CC = (A(1)/V)*1000

DADT(1) = ka1*Dm*FZ*Fr*exp(-ka1*t)+ka2*Dm*FZ*(1-Fr)*exp(-ka2*t)-(kel+k12)*A(1)+k21*A(2)
DADT(2) = k12*A(1)-k21*A(2)
DADT(3) = kin*A(3)-kout*(1-(Imax*(CC**Gam))/((IC50**Gam)+(CC**Gam)))*A(3)*AD_3_1

$ERROR
IPRED = A(3)
IRES = DV-IPRED
W = SQRT((THETA(8)*IPRED)**2+THETA(7)**2)
IWRES =  IRES/W
Y = IPRED+W*ERR(1)

$THETA
1 FIX       ; 1: Imax
(0,100)     ; 2: IC50
0.2 FIX     ; 3: Gam
(0,31.3)    ; 4: RZ0
(0,0.0065)  ; 5: kout
(0,7.12)    ; 6: T
0 FIX       ; 7: Add
(0,1)       ; 8: Prop

$OMEGA
1 FIX

$EST METHOD=0 NOHABORT MAXEVAL=9999 PRINT=1 NSIG=3 SIGL=12
$COV MATRIX=R UNCONDITIONAL
$TABLE ID TIME IPRED NOPRINT ONEHEADER
FILE=DLoIDR.tab

NM-TRAN MESSAGES
 WARNINGS AND ERRORS (IF ANY) FOR PROBLEM    1
 (WARNING  1) NM-TRAN INFERS THAT THE DATA ARE SINGLE-SUBJECT.
  NONMEM RUN CANNOT BE PARALLELIZED.
 (WARNING  83) FUNCTIONS ARE USED IN ABBREVIATED CODE, BUT THE $SUBROUTINES
 RECORD DOES NOT INCLUDE THE "OTHER" OPTION.

1NONLINEAR MIXED EFFECTS MODEL PROGRAM (NONMEM) VERSION 7.5.0 alpha version 4
 ORIGINALLY DEVELOPED BY STUART BEAL, LEWIS SHEINER, AND ALISON BOECKMANN
 CURRENT DEVELOPERS ARE ROBERT BAUER, ICON DEVELOPMENT SOLUTIONS,
 AND ALISON BOECKMANN. IMPLEMENTATION, EFFICIENCY, AND STANDARDIZATION
 PERFORMED BY NOUS INFOSYSTEMS.
 PROBLEM NO.:         1
 PDLIDR
 TOT. NO. OF OBS RECS:       18
 TOT. NO. OF INDIVIDUALS:       18
 GENERAL NONLINEAR KINETICS MODEL WITH STIFF/NONSTIFF AND DELAY EQUATIONS (RADAR5, ADVAN16)
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 #TBLN:      1
 #METH: First Order
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
 #TERM:
0MINIMIZATION SUCCESSFUL
 NO. OF FUNCTION EVALUATIONS USED:      105
 NO. OF SIG. DIGITS IN FINAL EST.:  4.1

 TOTAL DATA POINTS NORMALLY DISTRIBUTED (N):           18
 N*LOG(2PI) CONSTANT TO OBJECTIVE FUNCTION:    33.0817871953682
 OBJECTIVE FUNCTION VALUE WITHOUT CONSTANT:    96.3112923495828
 OBJECTIVE FUNCTION VALUE WITH CONSTANT:       129.393079544951
 REPORTED OBJECTIVE FUNCTION DOES NOT CONTAIN CONSTANT

 TOTAL EFFECTIVE ETAS (NIND*NETA):                            18


 #TERE:
 Elapsed estimation  time in seconds:     0.70
 Elapsed covariance  time in seconds:     0.39
 Elapsed postprocess time in seconds:     0.03

 ********************                                   FIRST ORDER                                  ********************
 #OBJT:**************                       MINIMUM VALUE OF OBJECTIVE FUNCTION                      ********************
 #OBJV:********************************************       96.311       **************************************************

 ********************                                   FIRST ORDER                                  ********************
 ********************                             FINAL PARAMETER ESTIMATE                           ********************

 THETA - VECTOR OF FIXED EFFECTS PARAMETERS   *********
         TH 1      TH 2      TH 3      TH 4      TH 5      TH 6      TH 7      TH 8
         1.00E+00  5.46E+01  2.00E-01  2.92E+01  6.73E-03  6.93E+00  0.00E+00  1.98E-01

 OMEGA - COV MATRIX FOR RANDOM EFFECTS - ETAS  ********
         ETA1
 ETA1
+        1.00E+00

 OMEGA - CORR MATRIX FOR RANDOM EFFECTS - ETAS  *******
         ETA1
 ETA1
+        1.00E+00

 ********************                                   FIRST ORDER                                  ********************
 ********************                            STANDARD ERROR OF ESTIMATE                          ********************

 THETA - VECTOR OF FIXED EFFECTS PARAMETERS   *********
         TH 1      TH 2      TH 3      TH 4      TH 5      TH 6      TH 7      TH 8
        .........  7.91E+01 .........  2.17E+00  5.69E-04  2.54E-01 .........  3.42E-02

 OMEGA - COV MATRIX FOR RANDOM EFFECTS - ETAS  ********
         ETA1
 ETA1
+       .........

 OMEGA - CORR MATRIX FOR RANDOM EFFECTS - ETAS  *******
         ETA1
 ETA1
+       .........

 ********************                                   FIRST ORDER                                  ********************
 ********************                          COVARIANCE MATRIX OF ESTIMATE                         ********************

            TH 1      TH 2      TH 3      TH 4      TH 5      TH 6      TH 7      TH 8      OM11
 TH 1
+       .........
 TH 2
+       .........  6.26E+03
 TH 3
+       ......... ......... .........
 TH 4
+       .........  1.31E+02 .........  4.73E+00
 TH 5
+       ......... -2.14E-02 ......... -1.01E-03  3.23E-07
 TH 6
+       .........  1.23E+01 .........  2.73E-01 -4.57E-05  6.45E-02
 TH 7
+       ......... ......... ......... ......... ......... ......... .........
 TH 8
+       .........  1.33E-02 ......... -1.22E-02  2.81E-06  2.89E-05 .........  1.17E-03
 OM11
+       ......... ......... ......... ......... ......... ......... ......... ......... .........

 ********************                                   FIRST ORDER                                  ********************
 ********************                          CORRELATION MATRIX OF ESTIMATE                        ********************

            TH 1      TH 2      TH 3      TH 4      TH 5      TH 6      TH 7      TH 8      OM11
 TH 1
+       .........
 TH 2
+       .........  7.91E+01
 TH 3
+       ......... ......... .........
 TH 4
+       .........  7.62E-01 .........  2.17E+00
 TH 5
+       ......... -4.76E-01 ......... -8.19E-01  5.69E-04
 TH 6
+       .........  6.10E-01 .........  4.95E-01 -3.16E-01  2.54E-01
 TH 7
+       ......... ......... ......... ......... ......... ......... .........
 TH 8
+       .........  4.91E-03 ......... -1.64E-01  1.44E-01  3.32E-03 .........  3.42E-02
 OM11
+       ......... ......... ......... ......... ......... ......... ......... ......... .........
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 Elapsed finaloutput time in seconds:     0.02
 #CPUT: Total CPU Time in Seconds,        0.920
