Fri 10/12/2018
06:38 PM
$PROBLEM IAV
$INPUT ID AMT TIME DV EVID MDV CMT
$DATA IAV.csv IGNORE=C
$SUBROUTINES ADVAN16 TOL=12
$MODEL NCOMPARTMENTS=5

$PK
BETA=THETA(1)*EXP(ETA(1))
K=THETA(2)
DELTA=THETA(3)
PP=THETA(4)
CC=THETA(5)
RR0=THETA(6)
V0=THETA(7)
EP=THETA(8)
ALPHA=THETA(9)
;  TAUy
TAU1=THETA(10)

U0=CC*DELTA*RR0/(PP*BETA)

; Initial conditions
A_0(1)=U0
A_0(2)=0
A_0(3)=0
A_0(4)=V0
A_0(5)=0

$DES
; AD_x_y is the State value of A(x) delayed for time TAUy.
; AP_x_y is the State value of A(x) in the past, for time delay TAUy.
;PAST
AP_3_1=0
;BASE EQUATIONS
DADT(1)=-BETA*A(1)*A(4)
DADT(2)=BETA*A(1)*A(4)-K*A(2)/(1+EP*A(5))
DADT(3)=K*A(2)/(1+EP*A(5))-DELTA*A(3)
DADT(4)=PP*A(3)-CC*A(4)
DADT(5)=AD_3_1-ALPHA*A(5)

$ERROR

Y1=A(4)
IF(CMT==4) IPRED=Y1
IF(CMT==4) Y=IPRED+EPS(1)

$THETA
0.000021  ; 1: BETA
48.6      ; 2: K
10.9      ; 3: DELTA
0.13      ; 4: PP
11.0      ; 5: CC
6.4       ; 6: RR0
0.00001   ; 7: V0
0.0073    ; 8: EP
4.7       ; 9: ALPHA
1.0       ;10: TAU1

$OMEGA
0 FIX

$SIGMA
0 FIX
$SIMULATION (567811 NORMAL) ONLYSIMULATION SUBPROBLEMS=1

$TABLE ID TIME IPRED DV EVID CMT NOAPPEND NOPRINT ONEHEADER
FILE=IAV.tab

NM-TRAN MESSAGES
 WARNINGS AND ERRORS (IF ANY) FOR PROBLEM    1
 (WARNING  2) NM-TRAN INFERS THAT THE DATA ARE POPULATION.
 (WARNING  3) THERE MAY BE AN ERROR IN THE ABBREVIATED CODE. THE FOLLOWING
 ONE OR MORE RANDOM VARIABLES ARE DEFINED WITH "IF" STATEMENTS THAT DO NOT
 PROVIDE DEFINITIONS FOR BOTH THE "THEN" AND "ELSE" CASES. IF ALL
 CONDITIONS FAIL, THE VALUES OF THESE VARIABLES WILL BE ZERO.
   IPRED Y
 (WARNING  83) FUNCTIONS ARE USED IN ABBREVIATED CODE, BUT THE $SUBROUTINES
 RECORD DOES NOT INCLUDE THE "OTHER" OPTION.

1NONLINEAR MIXED EFFECTS MODEL PROGRAM (NONMEM) VERSION 7.5.0 alpha version 4
 ORIGINALLY DEVELOPED BY STUART BEAL, LEWIS SHEINER, AND ALISON BOECKMANN
 CURRENT DEVELOPERS ARE ROBERT BAUER, ICON DEVELOPMENT SOLUTIONS,
 AND ALISON BOECKMANN. IMPLEMENTATION, EFFICIENCY, AND STANDARDIZATION
 PERFORMED BY NOUS INFOSYSTEMS.
 PROBLEM NO.:         1
 IAV
 TOT. NO. OF OBS RECS:       81
 TOT. NO. OF INDIVIDUALS:        1
 GENERAL NONLINEAR KINETICS MODEL WITH STIFF/NONSTIFF AND DELAY EQUATIONS (RADAR5, ADVAN16)
 PROBLEM NO.:           1      SUBPROBLEM NO.:           1
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 SIMULATION STEP PERFORMED
 Elapsed simulation  time in seconds:     0.03
 Elapsed finaloutput time in seconds:     0.00
 #CPUT: Total CPU Time in Seconds,        0.125
