Tue 05/12/2020
10:40 AM
$PROB RUN# Example 1 (from samp5l)
$INPUT ID TIME  DV=CONC AMT=DOSE RATE EVID MDV CMT SID CID
$DATA superid2.csv

$SUBROUTINES ADVAN1 TRANS2

$PK
MU_1=THETA(1)
MU_2=THETA(2)
CL=DEXP(MU_1+ETA(1)+ETA(3)+ETA(5))
V=DEXP(MU_2+ETA(2)+ETA(4)+ETA(6))
S1=V
IF(COMACT==1) THEN
PREDCL=CL
PREDV=V
ENDIF

$ERROR
IPRED=F
IRES=DV-F
Y = F + F*EPS(1)

; Initial values of THETA
$THETA 5.0 5.0
;$OMEGA 0.02 0.02 0.0 FIXED 0.0 FIXED 0.0 FIXED 0.0 FIXED
$OMEGA BLOCK(2)
0.03
0.00001 0.03

$OMEGA BLOCK(2)
0.03
0.00001 0.03

$OMEGA BLOCK(2)
0.03
0.00001 0.03

$SIGMA
0.05

$LEVEL
SID=(3[1],4[2])
CID=(5[3],6[4])

$EST METHOD=ITS INTERACTION PRINT=1 NSIG=3 NITER=10 SIGL=6 FNLETA=0 MCETA=3 LEVCENTER=1
$COV MATRIX=R UNCONDITIONAL
$TABLE  ID PREDCL PREDV DOSE RATE TIME CONC IPRED PRED IRES RES WRES CWRES EWRES NPDE NOAPPEND ONEHEADER
        FILE=FIXEDETAS.tab  NOPRINT ESAMPLE=1000 SEED=1115678
$TABLE  ID PREDCL PREDV DOSE RATE TIME CONC IPRED PRED IRES RES WRES CWRES EWRES NPDE NOAPPEND ONEHEADER FIXEDETAS=(3 to 6)
        FILE=FIXEDETAS2.tab  NOPRINT ESAMPLE=1000 SEED 1115678

NM-TRAN MESSAGES
 WARNINGS AND ERRORS (IF ANY) FOR PROBLEM    1
 (WARNING  2) NM-TRAN INFERS THAT THE DATA ARE POPULATION.
 (MU_WARNING 12) MU_001: SHOULD NOT BE ASSOCIATED WITH ETA(003)
 (MU_WARNING 11) MU_001: SHOULD NOT BE ASSOCIATED WITH MORE THAN ONE ETA.
 (MU_WARNING 12) MU_001: SHOULD NOT BE ASSOCIATED WITH ETA(005)
 (MU_WARNING 11) MU_001: SHOULD NOT BE ASSOCIATED WITH MORE THAN ONE ETA.
 (MU_WARNING 12) MU_002: SHOULD NOT BE ASSOCIATED WITH ETA(004)
 (MU_WARNING 11) MU_002: SHOULD NOT BE ASSOCIATED WITH MORE THAN ONE ETA.
 (MU_WARNING 12) MU_002: SHOULD NOT BE ASSOCIATED WITH ETA(006)
 (MU_WARNING 11) MU_002: SHOULD NOT BE ASSOCIATED WITH MORE THAN ONE ETA.

1NONLINEAR MIXED EFFECTS MODEL PROGRAM (NONMEM) VERSION 7.5.0 Beta version 4
 ORIGINALLY DEVELOPED BY STUART BEAL, LEWIS SHEINER, AND ALISON BOECKMANN
 CURRENT DEVELOPERS ARE ROBERT BAUER, ICON DEVELOPMENT SOLUTIONS,
 AND ALISON BOECKMANN. IMPLEMENTATION, EFFICIENCY, AND STANDARDIZATION
 PERFORMED BY NOUS INFOSYSTEMS.
 PROBLEM NO.:         1
 RUN# Example 1 (from samp5l)
 TOT. NO. OF OBS RECS:    17500
 TOT. NO. OF INDIVIDUALS:     2500
 ONE COMPARTMENT MODEL (ADVAN1)
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 #TBLN:      1
 #METH: Iterative Two Stage
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
 #TERM:
 OPTIMIZATION WAS NOT TESTED FOR CONVERGENCE

 ETABAR IS THE ARITHMETIC MEAN OF THE ETA-ESTIMATES,
 AND THE P-VALUE IS GIVEN FOR THE NULL HYPOTHESIS THAT THE TRUE MEAN IS 0.

 ETABAR:        -2.2941E-05 -1.2708E-05 -2.7867E-18 -7.5773E-19 -4.1933E-16  1.0348E-15
 SE:             1.6652E-03  1.7458E-03  9.8883E-03  1.0710E-02  6.1688E-02  5.5549E-02
 N:                    2500        2500         250         250          25          25

 P VAL.:         9.8901E-01  9.9419E-01  1.0000E+00  1.0000E+00  1.0000E+00  1.0000E+00

 ETASHRINKSD(%)  1.0854E+01  1.0624E+01  1.0320E-04  8.8093E-05  7.9201E-05  5.6152E-05
 ETASHRINKVR(%)  2.0529E+01  2.0119E+01  2.0640E-04  1.7619E-04  1.5840E-04  1.1230E-04
 EBVSHRINKSD(%)  1.0845E+01  1.0618E+01  0.0000E+00  0.0000E+00  0.0000E+00  0.0000E+00
 EBVSHRINKVR(%)  2.0514E+01  2.0109E+01  0.0000E+00  0.0000E+00  0.0000E+00  0.0000E+00
 RELATIVEINF(%)  7.9315E+01  7.9719E+01  0.0000E+00  0.0000E+00  0.0000E+00  0.0000E+00
 EPSSHRINKSD(%)  1.1907E+01
 EPSSHRINKVR(%)  2.2396E+01


 TOTAL DATA POINTS NORMALLY DISTRIBUTED (N):        17500
 N*LOG(2PI) CONSTANT TO OBJECTIVE FUNCTION:    32162.8486621635
 OBJECTIVE FUNCTION VALUE WITHOUT CONSTANT:   -41170.6057329983
 OBJECTIVE FUNCTION VALUE WITH CONSTANT:      -9007.75707083477
 REPORTED OBJECTIVE FUNCTION DOES NOT CONTAIN CONSTANT

 TOTAL EFFECTIVE ETAS (NIND*NETA):                          4998


 #TERE:
 Elapsed estimation  time in seconds:    30.10
 Elapsed covariance  time in seconds:     0.34

 ********************                               ITERATIVE TWO STAGE                              ********************
 #OBJT:**************                        FINAL VALUE OF OBJECTIVE FUNCTION                       ********************
 #OBJV:********************************************   -41170.606       **************************************************

 ********************                               ITERATIVE TWO STAGE                              ********************
 ********************                             FINAL PARAMETER ESTIMATE                           ********************

 THETA - VECTOR OF FIXED EFFECTS PARAMETERS   *********
         TH 1      TH 2
         2.00E+00  3.63E+00

 OMEGA - COV MATRIX FOR RANDOM EFFECTS - ETAS  ********
         ETA1      ETA2      ETA3      ETA4      ETA5      ETA6
 ETA1
+        9.69E-03
 ETA2
+        3.84E-05  1.06E-02
 ETA3
+        0.00E+00  0.00E+00  2.72E-02
 ETA4
+        0.00E+00  0.00E+00  1.75E-03  3.19E-02
 ETA5
+        0.00E+00  0.00E+00  0.00E+00  0.00E+00  9.91E-02
 ETA6
+        0.00E+00  0.00E+00  0.00E+00  0.00E+00 -1.69E-02  8.04E-02

 SIGMA - COV MATRIX FOR RANDOM EFFECTS - EPSILONS  ****
         EPS1
 EPS1
+        9.96E-03

 OMEGA - CORR MATRIX FOR RANDOM EFFECTS - ETAS  *******
         ETA1      ETA2      ETA3      ETA4      ETA5      ETA6
 ETA1
+        9.85E-02
 ETA2
+        3.79E-03  1.03E-01
 ETA3
+        0.00E+00  0.00E+00  1.65E-01
 ETA4
+        0.00E+00  0.00E+00  5.96E-02  1.78E-01
 ETA5
+        0.00E+00  0.00E+00  0.00E+00  0.00E+00  3.15E-01
 ETA6
+        0.00E+00  0.00E+00  0.00E+00  0.00E+00 -1.89E-01  2.83E-01

 SIGMA - CORR MATRIX FOR RANDOM EFFECTS - EPSILONS  ***
         EPS1
 EPS1
+        9.98E-02

 ********************                               ITERATIVE TWO STAGE                              ********************
 ********************                          STANDARD ERROR OF ESTIMATE (S)                        ********************

 THETA - VECTOR OF FIXED EFFECTS PARAMETERS   *********
         TH 1      TH 2
         2.35E-03  2.44E-03

 OMEGA - COV MATRIX FOR RANDOM EFFECTS - ETAS  ********
         ETA1      ETA2      ETA3      ETA4      ETA5      ETA6
 ETA1
+        3.39E-04
 ETA2
+        2.55E-04  3.78E-04
 ETA3
+        0.00E+00  0.00E+00  2.27E-03
 ETA4
+        0.00E+00  0.00E+00  1.84E-03  2.72E-03
 ETA5
+        0.00E+00  0.00E+00  0.00E+00  0.00E+00  3.17E-02
 ETA6
+        0.00E+00  0.00E+00  0.00E+00  0.00E+00  2.42E-02  2.69E-02

 SIGMA - COV MATRIX FOR RANDOM EFFECTS - EPSILONS  ****
         EPS1
 EPS1
+        1.28E-04

 OMEGA - CORR MATRIX FOR RANDOM EFFECTS - ETAS  *******
         ETA1      ETA2      ETA3      ETA4      ETA5      ETA6
 ETA1
+        1.72E-03
 ETA2
+        2.52E-02  1.84E-03
 ETA3
+       ......... .........  6.89E-03
 ETA4
+       ......... .........  6.28E-02  7.61E-03
 ETA5
+       ......... ......... ......... .........  5.04E-02
 ETA6
+       ......... ......... ......... .........  2.46E-01  4.74E-02

 SIGMA - CORR MATRIX FOR RANDOM EFFECTS - EPSILONS  ***
         EPS1
 EPS1
+        6.39E-04
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 Elapsed postprocess time in seconds:    63.95
 Elapsed finaloutput time in seconds:     1.17
 Elapsed postprocess time in seconds:    64.94
 Elapsed finaloutput time in seconds:     1.18
 #CPUT: Total CPU Time in Seconds,      169.734
