Wed 12/06/2017
10:25 AM
$PROB  AD3TR4
$INPUT  C SET ID JID TIME CONC AMT RATE EVID MDV CMT DV LOQ TYPE

$DATA  ad3tr4.csv IGNORE = C ; IGNORE=(TYPE=2)
$SUBROUTINES ADVAN3 TRANS4

$PK
MU_1 = THETA(1)
MU_2 = THETA(2)
MU_3 = THETA(3)
MU_4 = THETA(4)
CL = EXP(MU_1 + ETA(1))
V1 = EXP(MU_2 + ETA(2))
Q = EXP(MU_3 + ETA(3))
V2 = EXP(MU_4 + ETA(4))
S1=V1

$ERROR
SD = THETA(5)
IPRED = LOG(F)
DUM2 = (DV - IPRED) / SD
DUM = (LOQ - IPRED) / SD
CUMD = PHI(DUM)+1.0E-30
CUMD2 = PHI(DUM2)+1.0E-30
IF(TYPE.EQ.1) THEN
Y=2.0*LOG(SD)+DUM2*DUM2
CDF_L=CUMD2
ENDIF
IF(TYPE.EQ.2) THEN
Y = -2.0*LOG(CUMD)
CDF_L=CUMD
DV_LOQ=LOQ
ENDIF

$THETA
         1.67E+00  1.60E+00  7.76E-01  2.36E+00  2.75E-01

;INITIAL values of OMEGA
$OMEGA BLOCK(4)
0.15   ;[P]
0.01  ;[F]
0.15   ;[P]
0.01  ;[F]
0.01  ;[F]
0.15   ;[P]
0.01  ;[F]
0.01  ;[F]
0.01  ;[F]
0.15   ;[P]

$EST METHOD=COND LAPLACE -2LL MAXEVAL=9999 NSIG=3 SIGL=10 PRINT=5 NOHABORT MCETA=10
;$COV MATRIX=R PRINT=E UNCONDITIONAL
$TABLE ID TIME DV IPRED NPD NOAPPEND ONEHEADER ESAMPLE=1000
 FILE=ad3tr4_loq6.TAB NOPRINT

NM-TRAN MESSAGES
 WARNINGS AND ERRORS (IF ANY) FOR PROBLEM    1
 (WARNING  2) NM-TRAN INFERS THAT THE DATA ARE POPULATION.
 (WARNING  3) THERE MAY BE AN ERROR IN THE ABBREVIATED CODE. THE FOLLOWING
 ONE OR MORE RANDOM VARIABLES ARE DEFINED WITH "IF" STATEMENTS THAT DO NOT
 PROVIDE DEFINITIONS FOR BOTH THE "THEN" AND "ELSE" CASES. IF ALL
 CONDITIONS FAIL, THE VALUES OF THESE VARIABLES WILL BE ZERO.
   Y

1NONLINEAR MIXED EFFECTS MODEL PROGRAM (NONMEM) VERSION 7.4.2
 ORIGINALLY DEVELOPED BY STUART BEAL, LEWIS SHEINER, AND ALISON BOECKMANN
 CURRENT DEVELOPERS ARE ROBERT BAUER, ICON DEVELOPMENT SOLUTIONS,
 AND ALISON BOECKMANN. IMPLEMENTATION, EFFICIENCY, AND STANDARDIZATION
 PERFORMED BY NOUS INFOSYSTEMS.
 PROBLEM NO.:         1
 AD3TR4
 TOT. NO. OF OBS RECS:      500
 TOT. NO. OF INDIVIDUALS:      100
 TWO COMPARTMENT MODEL (ADVAN3)
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 #TBLN:      1
 #METH: Laplacian Conditional Estimation
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
 #TERM:
0MINIMIZATION TERMINATED
 DUE TO ROUNDING ERRORS (ERROR=134)
 NO. OF FUNCTION EVALUATIONS USED:     1310
 NO. OF SIG. DIGITS IN FINAL EST.:  2.8

 ETABAR IS THE ARITHMETIC MEAN OF THE ETA-ESTIMATES,
 AND THE P-VALUE IS GIVEN FOR THE NULL HYPOTHESIS THAT THE TRUE MEAN IS 0.

 ETABAR:         3.4642E-03  5.0417E-03 -1.0070E-02  9.2435E-03
 SE:             3.7995E-02  2.5821E-02  2.1962E-02  3.4038E-02
 N:                     100         100         100         100

 P VAL.:         9.2735E-01  8.4519E-01  6.4657E-01  7.8596E-01

 ETASHRINKSD(%)  2.8773E+00  2.4397E+01  3.4141E+01  2.0305E+01
 ETASHRINKVR(%)  5.6717E+00  4.2841E+01  5.6626E+01  3.6486E+01
 EBVSHRINKSD(%)  1.1068E+01  1.0000E+02  1.0000E+02  1.0000E+02
 EBVSHRINKVR(%)  2.0912E+01  1.0000E+02  1.0000E+02  1.0000E+02
 EPSSHRINKSD(%)  1.0000E+02
 EPSSHRINKVR(%)  1.0000E+02


 TOTAL DATA POINTS NORMALLY DISTRIBUTED (N):            0
 N*LOG(2PI) CONSTANT TO OBJECTIVE FUNCTION:   0.000000000000000E+000
 OBJECTIVE FUNCTION VALUE WITHOUT CONSTANT:   -31.2803389108453
 OBJECTIVE FUNCTION VALUE WITH CONSTANT:      -31.2803389108453
 REPORTED OBJECTIVE FUNCTION DOES NOT CONTAIN CONSTANT

 TOTAL EFFECTIVE ETAS (NIND*NETA):                           400


 #TERE:
 Elapsed estimation  time in seconds:    35.57
 Elapsed postprocess time in seconds:     0.87

 ********************                         LAPLACIAN CONDITIONAL ESTIMATION                       ********************
 #OBJT:**************                       MINIMUM VALUE OF OBJECTIVE FUNCTION                      ********************
 #OBJV:********************************************      -31.280       **************************************************

 ********************                         LAPLACIAN CONDITIONAL ESTIMATION                       ********************
 ********************                             FINAL PARAMETER ESTIMATE                           ********************

 THETA - VECTOR OF FIXED EFFECTS PARAMETERS   *********
         TH 1      TH 2      TH 3      TH 4      TH 5
         1.68E+00  1.60E+00  8.25E-01  2.39E+00  2.69E-01

 OMEGA - COV MATRIX FOR RANDOM EFFECTS - ETAS  ********
         ETA1      ETA2      ETA3      ETA4
 ETA1
+        1.55E-01
 ETA2
+       -6.16E-03  1.18E-01
 ETA3
+       -1.39E-02  8.91E-03  1.12E-01
 ETA4
+       -1.80E-02  2.57E-02  2.73E-02  1.84E-01

 OMEGA - CORR MATRIX FOR RANDOM EFFECTS - ETAS  *******
         ETA1      ETA2      ETA3      ETA4
 ETA1
+        3.93E-01
 ETA2
+       -4.56E-02  3.43E-01
 ETA3
+       -1.06E-01  7.74E-02  3.35E-01
 ETA4
+       -1.07E-01  1.74E-01  1.90E-01  4.29E-01
 Elapsed finaloutput time in seconds:     0.34
 #CPUT: Total CPU Time in Seconds,       35.802
