Wed 12/06/2017
12:31 PM
$PROB  AD3TR4
$INPUT  C SET ID JID TIME CONC AMT RATE EVID MDV CMT DV LOQ TYPE

$DATA  ad3tr4a.csv IGNORE = C
$SUBROUTINES ADVAN3 TRANS4

$PK
MU_1 = THETA(1)
MU_2 = THETA(2)
MU_3 = THETA(3)
MU_4 = THETA(4)
CL = EXP(MU_1 + ETA(1))
V1 = EXP(MU_2 + ETA(2))
Q = EXP(MU_3 + ETA(3))
V2 = EXP(MU_4 + ETA(4))
S1=V1

$ERROR
LAQ=3.0
SD = THETA(5)
IPRED = LOG(F)
DUM = (LOQ - IPRED) / SD
CUMD = PHI(DUM)+1.0E-10
DUMA = (LAQ - IPRED) / SD
CUMDA = PHI(DUMA)-1.0E-10
IF(TYPE.EQ.2) DV_LOQ=LOQ
IF(TYPE.EQ.3) DV_LAQ=LAQ
IF (TYPE .EQ. 1.OR.NPDE_MODE==1) THEN
      F_FLAG = 0
      Y = IPRED + SD * ERR(1)
ENDIF
IF (TYPE .EQ. 2.AND.NPDE_MODE==0) THEN
      F_FLAG = 1
      Y = CUMD
      MDVRES=1
ENDIF
IF (TYPE .EQ. 3.AND.NPDE_MODE==0) THEN
      F_FLAG = 1
      Y = (1.0-CUMDA)
      MDVRES=1
ENDIF
;IF(TYPE==3.0.AND.NPDE_MODE==1) WRITE(*,*) CUMDA

$THETA
         1.67E+00  1.60E+00  7.76E-01  2.36E+00  2.75E-01

;INITIAL values of OMEGA
$OMEGA BLOCK(4)
0.15   ;[P]
0.01  ;[F]
0.15   ;[P]
0.01  ;[F]
0.01  ;[F]
0.15   ;[P]
0.01  ;[F]
0.01  ;[F]
0.01  ;[F]
0.15   ;[P]

;Initial value of SIGMA
$SIGMA
1.0 FIXED   ;[P]

$EST METHOD=COND INTERACTION LAPLACE MAXEVAL=9999 NSIG=3 SIGL=10 PRINT=5 NOHABORT MCETA=10
;$COV MATRIX=R PRINT=E UNCONDITIONAL
$TABLE ID TIME DV IPRED PRED RES EPRED EIPRED EIRES EIWRES CPRED CWRES ECWRES EWRES TYPE NPDE NPD CIWRES NOAPPEND ONEHEADER
 ESAMPLE=1000 NPDTYPE=1 FILE=ad3tr4a_loq1.TAB NOPRINT SEED=16993234

NM-TRAN MESSAGES
 WARNINGS AND ERRORS (IF ANY) FOR PROBLEM    1
 (WARNING  2) NM-TRAN INFERS THAT THE DATA ARE POPULATION.
 (WARNING  3) THERE MAY BE AN ERROR IN THE ABBREVIATED CODE. THE FOLLOWING
 ONE OR MORE RANDOM VARIABLES ARE DEFINED WITH "IF" STATEMENTS THAT DO NOT
 PROVIDE DEFINITIONS FOR BOTH THE "THEN" AND "ELSE" CASES. IF ALL
 CONDITIONS FAIL, THE VALUES OF THESE VARIABLES WILL BE ZERO.
   Y
 (WARNING  66) WITH "LAPLACIAN" AND "INTERACTION", "NUMERICAL" AND "SLOW"
 ARE ALSO REQUIRED ON $ESTIM RECORD. NM-TRAN HAS SUPPLIED THESE OPTIONS.

1NONLINEAR MIXED EFFECTS MODEL PROGRAM (NONMEM) VERSION 7.4.2
 ORIGINALLY DEVELOPED BY STUART BEAL, LEWIS SHEINER, AND ALISON BOECKMANN
 CURRENT DEVELOPERS ARE ROBERT BAUER, ICON DEVELOPMENT SOLUTIONS,
 AND ALISON BOECKMANN. IMPLEMENTATION, EFFICIENCY, AND STANDARDIZATION
 PERFORMED BY NOUS INFOSYSTEMS.
 PROBLEM NO.:         1
 AD3TR4
 TOT. NO. OF OBS RECS:      500
 TOT. NO. OF INDIVIDUALS:      100
 TWO COMPARTMENT MODEL (ADVAN3)
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 #TBLN:      1
 #METH: Laplacian Conditional Estimation with Interaction
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
 #TERM:
0MINIMIZATION SUCCESSFUL
 HOWEVER, PROBLEMS OCCURRED WITH THE MINIMIZATION.
 REGARD THE RESULTS OF THE ESTIMATION STEP CAREFULLY, AND ACCEPT THEM ONLY
 AFTER CHECKING THAT THE COVARIANCE STEP PRODUCES REASONABLE OUTPUT.
 NO. OF FUNCTION EVALUATIONS USED:       94
 NO. OF SIG. DIGITS IN FINAL EST.:  5.2

 ETABAR IS THE ARITHMETIC MEAN OF THE ETA-ESTIMATES,
 AND THE P-VALUE IS GIVEN FOR THE NULL HYPOTHESIS THAT THE TRUE MEAN IS 0.

 ETABAR:         4.4241E-03  2.1112E-03  9.2123E-03 -7.1798E-03
 SE:             3.8954E-02  2.9308E-02  2.5232E-02  3.0527E-02
 N:                     100         100         100         100

 P VAL.:         9.0958E-01  9.4258E-01  7.1503E-01  8.1406E-01

 ETASHRINKSD(%)  1.0000E-10  2.3942E+01  3.4519E+01  2.0781E+01
 ETASHRINKVR(%)  1.0000E-10  4.2152E+01  5.7122E+01  3.7243E+01
 EBVSHRINKSD(%)  4.8267E+00  2.3261E+01  3.2475E+01  1.7732E+01
 EBVSHRINKVR(%)  9.4204E+00  4.1111E+01  5.4404E+01  3.2319E+01
 EPSSHRINKSD(%)  3.5140E+01
 EPSSHRINKVR(%)  5.7932E+01


 TOTAL DATA POINTS NORMALLY DISTRIBUTED (N):          473
 N*LOG(2PI) CONSTANT TO OBJECTIVE FUNCTION:    869.315852411620
 OBJECTIVE FUNCTION VALUE WITHOUT CONSTANT:    2.75267529261327
 OBJECTIVE FUNCTION VALUE WITH CONSTANT:       872.068527704234
 REPORTED OBJECTIVE FUNCTION DOES NOT CONTAIN CONSTANT

 TOTAL EFFECTIVE ETAS (NIND*NETA):                           400


 #TERE:
 Elapsed estimation  time in seconds:     3.52
 Elapsed postprocess time in seconds:     1.36

 ********************                LAPLACIAN CONDITIONAL ESTIMATION WITH INTERACTION               ********************
 #OBJT:**************                       MINIMUM VALUE OF OBJECTIVE FUNCTION                      ********************
 #OBJV:********************************************        2.753       **************************************************

 ********************                LAPLACIAN CONDITIONAL ESTIMATION WITH INTERACTION               ********************
 ********************                             FINAL PARAMETER ESTIMATE                           ********************

 THETA - VECTOR OF FIXED EFFECTS PARAMETERS   *********
         TH 1      TH 2      TH 3      TH 4      TH 5
         1.67E+00  1.58E+00  7.77E-01  2.39E+00  2.73E-01

 OMEGA - COV MATRIX FOR RANDOM EFFECTS - ETAS  ********
         ETA1      ETA2      ETA3      ETA4
 ETA1
+        1.50E-01
 ETA2
+        1.00E-02  1.50E-01
 ETA3
+        1.00E-02  1.00E-02  1.50E-01
 ETA4
+        9.99E-03  1.00E-02  1.00E-02  1.50E-01

 SIGMA - COV MATRIX FOR RANDOM EFFECTS - EPSILONS  ****
         EPS1
 EPS1
+        1.00E+00

 OMEGA - CORR MATRIX FOR RANDOM EFFECTS - ETAS  *******
         ETA1      ETA2      ETA3      ETA4
 ETA1
+        3.87E-01
 ETA2
+        6.67E-02  3.87E-01
 ETA3
+        6.67E-02  6.67E-02  3.87E-01
 ETA4
+        6.66E-02  6.67E-02  6.67E-02  3.87E-01

 SIGMA - CORR MATRIX FOR RANDOM EFFECTS - EPSILONS  ***
         EPS1
 EPS1
+        1.00E+00
 Elapsed finaloutput time in seconds:     0.28
 #CPUT: Total CPU Time in Seconds,        4.867
