Wed 12/06/2017
12:34 PM
$PROB  F_FLAG04est2a.ctl
$INPUT C ID DOSE=AMT TIME DV WT TYPE
$DATA example10lcdf.csv IGNORE=@

$SUBROUTINES  ADVAN2 TRANS2

$PK
   CALLFL=1
   MU_1=THETA(1)
   KA=DEXP(MU_1+ETA(1))
   MU_2=THETA(2)
   V=DEXP(MU_2+ETA(2))
   MU_3=THETA(3)
   CL=DEXP(MU_3+ETA(3))
   SC=V/1000

$THETA  1.6 2.3 0.7 0.1 0.1

$OMEGA BLOCK (3)
0.5
0.01 0.5
0.01 0.01 0.5

; Because THETA(4) and THETA(5) have no inter-subject variability
; associated with them, the algorithm must use a more computationally
; expensive gradient evaluation for these two parameters

$SIGMA 0.1

$PRIOR NWPRI
; Priors to Omegas
$OMEGAP BLOCK (3)
0.09 FIX
0.0 0.09
0.0 0.0 0.09
$OMEGAPD (3 FIX)

$ERROR
EXCL2=1.0-TYPE
EXCL=TYPE
EXCL3=0.0
IF(EVID/=0) EXCL=1.0
IF(EVID/=0) EXCL2=1.0
IF(EVID/=0) EXCL3=1.0
    EXPP=THETA(4)+F*THETA(5)
IPRED=F
; Use protected exponent PEXP, to avoid numerical overflow
A=PEXP(EXPP)
B=1.0+A
IF (TYPE.EQ.0.OR.NPDE_MODE==1) THEN
; PK Data
    F_FLAG=0
    Y=F+F*ERR(1) ; a prediction
 ELSE
; Categorical data
    F_FLAG=1
    Y=DV*A/B+(1.0-DV)/B      ; a likelihood
    MDVRES=1
 ENDIF
IF(TYPE==1)  THEN
CDF_L=(1.0-DV)*1.0/B + DV
CDF_LA=DV*1.0/B
DV_LOQ=DV
DV_LAQ=DV-1.0
ENDIF

$EST METHOD=ITS INTER LAP NITER=30 PRINT=5 SIGL=6 NSIG=2 NOHABORT
     NOPRIOR=1 CTYPE=3 CITER=10 CALPHA=0.05
;$EST METHOD=COND LAP INTER MAXEVAL=9999 PRINT=1 NOPRIOR=1
$COV UNCONDITIONAL PRINT=E MATRIX=R SIGL=10
$TABLE ID TIME DV IPRED PRED RES EPRED EIPRED EIRES EIWRES CPRED CWRES ECWRES EWRES TYPE NPDE NPD CIWRES NOAPPEND ONEHEADER
 ESAMPLE=1000 NPDTYPE=0 EXCLUDE_BY EXCL3 FILE=example10lcdf.TAB NOPRINT SEED=16993234
$TABLE ID TIME DV IPRED PRED RES EPRED EIPRED EIRES EIWRES CPRED CWRES ECWRES EWRES TYPE NPDE NPD CIWRES NOAPPEND ONEHEADER
 ESAMPLE=1000 NPDTYPE=0 EXCLUDE_BY EXCL FILE=example10lcdf0.TAB NOPRINT SEED=16993234
$TABLE ID TIME DV IPRED PRED RES EPRED EIPRED EIRES EIWRES CPRED CWRES ECWRES EWRES TYPE NPDE NPD CIWRES NOAPPEND ONEHEADER
 ESAMPLE=1000 NPDTYPE=0 EXCLUDE_BY EXCL2 FILE=example10lcdf1.TAB NOPRINT SEED=16993234

NM-TRAN MESSAGES
 WARNINGS AND ERRORS (IF ANY) FOR PROBLEM    1
 (WARNING  2) NM-TRAN INFERS THAT THE DATA ARE POPULATION.
 (WARNING  87) WITH "LAPLACIAN" AND "INTERACTION", "NUMERICAL" AND "SLOW"
 ARE ALSO REQUIRED ON $ESTIM RECORD, AND "SLOW" IS REQUIRED ON $COV
 RECORD. NM-TRAN HAS SUPPLIED THESE OPTIONS.

1NONLINEAR MIXED EFFECTS MODEL PROGRAM (NONMEM) VERSION 7.4.2
 ORIGINALLY DEVELOPED BY STUART BEAL, LEWIS SHEINER, AND ALISON BOECKMANN
 CURRENT DEVELOPERS ARE ROBERT BAUER, ICON DEVELOPMENT SOLUTIONS,
 AND ALISON BOECKMANN. IMPLEMENTATION, EFFICIENCY, AND STANDARDIZATION
 PERFORMED BY NOUS INFOSYSTEMS.
 PROBLEM NO.:         1
 F_FLAG04est2a.ctl
 TOT. NO. OF OBS RECS:     4320
 TOT. NO. OF INDIVIDUALS:      288
 ONE COMPARTMENT MODEL WITH FIRST-ORDER ABSORPTION (ADVAN2)
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 #TBLN:      1
 #METH: Iterative Two Stage (No Prior)
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
 #TERM:
 OPTIMIZATION WAS NOT COMPLETED

 ETABAR IS THE ARITHMETIC MEAN OF THE ETA-ESTIMATES,
 AND THE P-VALUE IS GIVEN FOR THE NULL HYPOTHESIS THAT THE TRUE MEAN IS 0.

 ETABAR:        -1.1905E-08 -6.3847E-08 -6.4429E-08
 SE:             1.4383E-02  1.5606E-02  1.6943E-02
 N:                     288         288         288

 P VAL.:         1.0000E+00  1.0000E+00  1.0000E+00

 ETASHRINKSD(%)  1.6452E+01  2.8167E+00  1.6167E+00
 ETASHRINKVR(%)  3.0197E+01  5.5540E+00  3.2073E+00
 EBVSHRINKSD(%)  1.6452E+01  2.8167E+00  1.6167E+00
 EBVSHRINKVR(%)  3.0197E+01  5.5540E+00  3.2073E+00
 EPSSHRINKSD(%)  1.2873E+01
 EPSSHRINKVR(%)  2.4089E+01


 TOTAL DATA POINTS NORMALLY DISTRIBUTED (N):         2880
 N*LOG(2PI) CONSTANT TO OBJECTIVE FUNCTION:    5293.08595125891
 OBJECTIVE FUNCTION VALUE WITHOUT CONSTANT:    10041.4632422967
 OBJECTIVE FUNCTION VALUE WITH CONSTANT:       15334.5491935556
 REPORTED OBJECTIVE FUNCTION DOES NOT CONTAIN CONSTANT

 TOTAL EFFECTIVE ETAS (NIND*NETA):                           864


 #TERE:
 Elapsed estimation  time in seconds:    25.36
 Elapsed covariance  time in seconds:     0.12

 ********************                          ITERATIVE TWO STAGE (NO PRIOR)                        ********************
 #OBJT:**************                        FINAL VALUE OF OBJECTIVE FUNCTION                       ********************
 #OBJV:********************************************    10041.463       **************************************************

 ********************                          ITERATIVE TWO STAGE (NO PRIOR)                        ********************
 ********************                             FINAL PARAMETER ESTIMATE                           ********************

 THETA - VECTOR OF FIXED EFFECTS PARAMETERS   *********
         TH 1      TH 2      TH 3      TH 4      TH 5
         1.07E+00  3.39E+00  2.44E+00 -6.48E-01  8.06E-02

 OMEGA - COV MATRIX FOR RANDOM EFFECTS - ETAS  ********
         ETA1      ETA2      ETA3
 ETA1
+        8.56E-02
 ETA2
+        3.73E-03  7.45E-02
 ETA3
+        3.59E-02  2.99E-02  8.57E-02

 SIGMA - COV MATRIX FOR RANDOM EFFECTS - EPSILONS  ****
         EPS1
 EPS1
+        2.27E-02

 OMEGA - CORR MATRIX FOR RANDOM EFFECTS - ETAS  *******
         ETA1      ETA2      ETA3
 ETA1
+        2.93E-01
 ETA2
+        4.67E-02  2.73E-01
 ETA3
+        4.19E-01  3.75E-01  2.93E-01

 SIGMA - CORR MATRIX FOR RANDOM EFFECTS - EPSILONS  ***
         EPS1
 EPS1
+        1.51E-01

 ********************                          ITERATIVE TWO STAGE (NO PRIOR)                        ********************
 ********************                          STANDARD ERROR OF ESTIMATE (S)                        ********************

 THETA - VECTOR OF FIXED EFFECTS PARAMETERS   *********
         TH 1      TH 2      TH 3      TH 4      TH 5
         2.29E-02  1.67E-02  1.76E-02  9.97E-02  7.20E-03

 OMEGA - COV MATRIX FOR RANDOM EFFECTS - ETAS  ********
         ETA1      ETA2      ETA3
 ETA1
+        9.94E-03
 ETA2
+        6.31E-03  6.42E-03
 ETA3
+        7.19E-03  5.17E-03  7.27E-03

 SIGMA - COV MATRIX FOR RANDOM EFFECTS - EPSILONS  ****
         EPS1
 EPS1
+        7.73E-04

 OMEGA - CORR MATRIX FOR RANDOM EFFECTS - ETAS  *******
         ETA1      ETA2      ETA3
 ETA1
+        1.70E-02
 ETA2
+        7.83E-02  1.18E-02
 ETA3
+        6.12E-02  5.31E-02  1.24E-02

 SIGMA - CORR MATRIX FOR RANDOM EFFECTS - EPSILONS  ***
         EPS1
 EPS1
+        2.56E-03

 ********************                          ITERATIVE TWO STAGE (NO PRIOR)                        ********************
 ********************                        COVARIANCE MATRIX OF ESTIMATE (S)                       ********************

            TH 1      TH 2      TH 3      TH 4      TH 5      OM11      OM12      OM13      OM22      OM23      OM33      SG11
 TH 1
+        5.25E-04
 TH 2
+        3.38E-05  2.79E-04
 TH 3
+        1.35E-04  1.18E-04  3.11E-04
 TH 4
+       -3.18E-05 -9.05E-05 -9.62E-05  9.94E-03
 TH 5
+        8.05E-06  6.45E-06  5.62E-06 -4.92E-04  5.18E-05
 OM11
+        7.31E-05  2.96E-06 -1.99E-06  6.36E-05 -2.34E-06  9.88E-05
 OM12
+        1.39E-05  5.56E-06  6.11E-06 -9.16E-05  4.25E-06  1.21E-05  3.98E-05
 OM13
+        2.22E-05  4.26E-06  1.78E-06 -2.13E-05  8.53E-07  5.52E-05  1.82E-05  5.17E-05
 OM22
+        8.18E-06 -2.54E-06  9.80E-07  3.07E-06  1.77E-06  6.27E-06  4.40E-06  5.14E-06  4.12E-05
 OM23
+        5.30E-06  1.20E-06  2.05E-06 -3.00E-05  3.42E-06  5.23E-06  1.49E-05  9.61E-06  1.49E-05  2.67E-05
 OM33
+        2.48E-06  3.15E-06  4.35E-06 -5.95E-05  1.47E-06  6.37E-06  1.21E-05  1.99E-05  3.76E-06  1.79E-05  5.29E-05
 SG11
+        2.19E-07  9.73E-07  2.13E-07  7.07E-07  3.00E-07 -5.50E-08 -2.56E-07  1.71E-07 -6.57E-07 -6.40E-07  3.38E-07  5.97E-07

 ********************                          ITERATIVE TWO STAGE (NO PRIOR)                        ********************
 ********************                        CORRELATION MATRIX OF ESTIMATE (S)                      ********************

            TH 1      TH 2      TH 3      TH 4      TH 5      OM11      OM12      OM13      OM22      OM23      OM33      SG11
 TH 1
+        2.29E-02
 TH 2
+        8.82E-02  1.67E-02
 TH 3
+        3.34E-01  4.02E-01  1.76E-02
 TH 4
+       -1.39E-02 -5.44E-02 -5.47E-02  9.97E-02
 TH 5
+        4.88E-02  5.36E-02  4.43E-02 -6.86E-01  7.20E-03
 OM11
+        3.21E-01  1.78E-02 -1.13E-02  6.42E-02 -3.27E-02  9.94E-03
 OM12
+        9.60E-02  5.28E-02  5.49E-02 -1.46E-01  9.35E-02  1.93E-01  6.31E-03
 OM13
+        1.35E-01  3.54E-02  1.40E-02 -2.97E-02  1.65E-02  7.72E-01  4.01E-01  7.19E-03
 OM22
+        5.56E-02 -2.37E-02  8.65E-03  4.80E-03  3.82E-02  9.82E-02  1.09E-01  1.11E-01  6.42E-03
 OM23
+        4.48E-02  1.39E-02  2.25E-02 -5.83E-02  9.20E-02  1.02E-01  4.57E-01  2.59E-01  4.50E-01  5.17E-03
 OM33
+        1.49E-02  2.59E-02  3.39E-02 -8.21E-02  2.81E-02  8.81E-02  2.64E-01  3.81E-01  8.05E-02  4.77E-01  7.27E-03
 SG11
+        1.23E-02  7.54E-02  1.57E-02  9.17E-03  5.40E-02 -7.16E-03 -5.25E-02  3.08E-02 -1.32E-01 -1.60E-01  6.01E-02  7.73E-04
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
 ********************                          ITERATIVE TWO STAGE (NO PRIOR)                        ********************
 ********************                    EIGENVALUES OF COR MATRIX OF ESTIMATE (S)                   ********************

             1         2         3         4         5         6         7         8         9        10        11        12
         1.33E-01  2.74E-01  3.51E-01  5.04E-01  6.96E-01  8.06E-01  8.78E-01  1.12E+00  1.33E+00  1.58E+00  1.75E+00  2.58E+00
 Elapsed postprocess time in seconds:    12.40
 Elapsed finaloutput time in seconds:     0.52
 #CPUT: Total CPU Time in Seconds,       37.971
