Tue 04/23/2019
09:01 PM

$PROB RUN# Example 1 (from samp5l)

$INPUT ID  TIME  EVID  MDV  DV=CONC  AMT=DOSE  RATE  CMT
$DATA optdesignw.csv IGNORE=C

$SUBROUTINES ADVAN3 TRANS4

$PK
; The thetas are MU modeled.
; Best that there is a linear relationship between THETAs and Mus
; The linear MU modeling of THETAS allows them to be efficiently
; Gibbs sampled.

MU_1=THETA(1)
MU_2=THETA(2)
MU_3=THETA(3)
MU_4=THETA(4)
CL=DEXP(MU_1+ETA(1))
V1=DEXP(MU_2+ETA(2))
Q=DEXP(MU_3+ETA(3))
V2=DEXP(MU_4+ETA(4))
S1=V1
XCLD=MDV

$ERROR
Y = F + F*EPS(1)+EPS(2)

; Initial values of THETA
$THETA
 1.68338E+00  1.58812E+00  8.12710E-01  2.37436E+00

;INITIAL values of OMEGA
;$OMEGA BLOCK(4) VALUES(0.0225,0.001)
$OMEGA (0.0225 FIXED)X4

;Initial value of SIGMA
$SIGMA
 (0.0225 )
 (0.0001 FIXED)

$DESIGN FEDOROV FIMTYPE=1 MAXEVAL=9999 SIGL=12
$TABLE ID TIME EVID MDV DV NOPRINT NOAPPEND EXCLUDE_BY XCLD FILE=optdesign.tab

NM-TRAN MESSAGES
 WARNINGS AND ERRORS (IF ANY) FOR PROBLEM    1
 (WARNING  2) NM-TRAN INFERS THAT THE DATA ARE POPULATION.
 (DATA WARNING   5) RECORD         2, DATA ITEM   5, CONTENTS: 1.00E+00
 THE DV DATA ITEM IS POSITIVE, BUT THE MDV DATA ITEM IS 1
 (DATA WARNING   5) RECORD         3, DATA ITEM   5, CONTENTS: 1.00E+00
 THE DV DATA ITEM IS POSITIVE, BUT THE MDV DATA ITEM IS 1
 * THE MAXIMUM NUMBER OF WARNINGS OF ONE OR MORE TYPES WAS REACHED.
 IT IS POSSIBLE THAT SOME WARNING MESSAGES WERE SUPPRESSED.
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
1NONLINEAR MIXED EFFECTS MODEL PROGRAM (NONMEM) VERSION 7.5.0 alpha version 7
 ORIGINALLY DEVELOPED BY STUART BEAL, LEWIS SHEINER, AND ALISON BOECKMANN
 CURRENT DEVELOPERS ARE ROBERT BAUER, ICON DEVELOPMENT SOLUTIONS,
 AND ALISON BOECKMANN. IMPLEMENTATION, EFFICIENCY, AND STANDARDIZATION
 PERFORMED BY NOUS INFOSYSTEMS.
 PROBLEM NO.:         1
 RUN# Example 1 (from samp5l)
 TOT. NO. OF OBS RECS:        5
 TOT. NO. OF INDIVIDUALS:        1
 TWO COMPARTMENT MODEL (ADVAN3)
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 #TBLN:      1
 #METH: First Order: D-OPTIMALITY
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
 #TERM:
 NO. OF FUNCTION EVALUATIONS USED:      770
0MINIMIZATION SUCCESSFUL

 ETABAR IS THE ARITHMETIC MEAN OF THE ETA-ESTIMATES,
 AND THE P-VALUE IS GIVEN FOR THE NULL HYPOTHESIS THAT THE TRUE MEAN IS 0.

 ETABAR:         0.0000E+00  0.0000E+00  0.0000E+00  0.0000E+00
 SE:             0.0000E+00  0.0000E+00  0.0000E+00  0.0000E+00
 N:                       1           1           1           1

 P VAL.:         1.0000E+00  1.0000E+00  1.0000E+00  1.0000E+00

 ETASHRINKSD(%)  1.0000E+02  1.0000E+02  1.0000E+02  1.0000E+02
 ETASHRINKVR(%)  1.0000E+02  1.0000E+02  1.0000E+02  1.0000E+02
 EBVSHRINKSD(%)  7.0430E+00  1.5763E+01  3.7428E+01  3.0648E+01
 EBVSHRINKVR(%)  1.3590E+01  2.9041E+01  6.0848E+01  5.1904E+01
 EPSSHRINKSD(%)  5.5279E+01  5.5279E+01
 EPSSHRINKVR(%)  8.0000E+01  8.0000E+01


 #TERE:
 Elapsed opt. design time in seconds:     0.21
 Elapsed postprocess time in seconds:     0.00

 ********************                            FIRST ORDER: D-OPTIMALITY                           ********************
 #OBJT:**************                MINIMUM VALUE OF OBJECTIVE FUNCTION: D-OPTIMALITY               ********************
 #OBJV:********************************************      -20.132       **************************************************

 ********************                            FIRST ORDER: D-OPTIMALITY                           ********************
 ********************                             FINAL PARAMETER ESTIMATE                           ********************

 THETA - VECTOR OF FIXED EFFECTS PARAMETERS   *********
         TH 1      TH 2      TH 3      TH 4
         1.68E+00  1.59E+00  8.13E-01  2.37E+00

 OMEGA - COV MATRIX FOR RANDOM EFFECTS - ETAS  ********
         ETA1      ETA2      ETA3      ETA4
 ETA1
+        2.25E-02
 ETA2
+        0.00E+00  2.25E-02
 ETA3
+        0.00E+00  0.00E+00  2.25E-02
 ETA4
+        0.00E+00  0.00E+00  0.00E+00  2.25E-02

 SIGMA - COV MATRIX FOR RANDOM EFFECTS - EPSILONS  ****
         EPS1      EPS2
 EPS1
+        2.25E-02
 EPS2
+        0.00E+00  1.00E-04

 OMEGA - CORR MATRIX FOR RANDOM EFFECTS - ETAS  *******
         ETA1      ETA2      ETA3      ETA4
 ETA1
+        1.50E-01
 ETA2
+        0.00E+00  1.50E-01
 ETA3
+        0.00E+00  0.00E+00  1.50E-01
 ETA4
+        0.00E+00  0.00E+00  0.00E+00  1.50E-01

 SIGMA - CORR MATRIX FOR RANDOM EFFECTS - EPSILONS  ***
         EPS1      EPS2
 EPS1
+        1.50E-01
 EPS2
+        0.00E+00  1.00E-02

 ********************                            FIRST ORDER: D-OPTIMALITY                           ********************
 ********************                            STANDARD ERROR OF ESTIMATE                          ********************

 THETA - VECTOR OF FIXED EFFECTS PARAMETERS   *********
         TH 1      TH 2      TH 3      TH 4
         1.68E-01  1.84E-01  2.76E-01  2.46E-01

 OMEGA - COV MATRIX FOR RANDOM EFFECTS - ETAS  ********
         ETA1      ETA2      ETA3      ETA4
 ETA1
+       .........
 ETA2
+       ......... .........
 ETA3
+       ......... ......... .........
 ETA4
+       ......... ......... ......... .........

 SIGMA - COV MATRIX FOR RANDOM EFFECTS - EPSILONS  ****
         EPS1      EPS2
 EPS1
+        2.40E-02
 EPS2
+       ......... .........

 OMEGA - CORR MATRIX FOR RANDOM EFFECTS - ETAS  *******
         ETA1      ETA2      ETA3      ETA4
 ETA1
+       .........
 ETA2
+       ......... .........
 ETA3
+       ......... ......... .........
 ETA4
+       ......... ......... ......... .........

 SIGMA - CORR MATRIX FOR RANDOM EFFECTS - EPSILONS  ***
         EPS1      EPS2
 EPS1
+        8.01E-02
 EPS2
+       ......... .........

 ********************                            FIRST ORDER: D-OPTIMALITY                           ********************
 ********************                          COVARIANCE MATRIX OF ESTIMATE                         ********************

     TH 1 | TH 1      TH 2 | TH 1      TH 2 | TH 2      TH 3 | TH 1      TH 3 | TH 2      TH 3 | TH 3      TH 4 | TH 1
     2.82E-02         4.71E-03         3.40E-02         1.04E-02         9.53E-03         7.62E-02         8.04E-03
     TH 4 | TH 2      TH 4 | TH 3      TH 4 | TH 4    SG11 | TH 1      SG11 | TH 2      SG11 | TH 3      SG11 | TH 4
     7.91E-03         3.04E-02         6.05E-02         0.00E+00         0.00E+00         0.00E+00         0.00E+00
   SG11 | SG11
     5.77E-04

 ********************                            FIRST ORDER: D-OPTIMALITY                           ********************
 ********************                          CORRELATION MATRIX OF ESTIMATE                        ********************

     TH 1 | TH 1      TH 2 | TH 1      TH 2 | TH 2      TH 3 | TH 1      TH 3 | TH 2      TH 3 | TH 3      TH 4 | TH 1
     1.68E-01         1.52E-01         1.84E-01         2.25E-01         1.87E-01         2.76E-01         1.95E-01
     TH 4 | TH 2      TH 4 | TH 3      TH 4 | TH 4    SG11 | TH 1      SG11 | TH 2      SG11 | TH 3      SG11 | TH 4
     1.74E-01         4.47E-01         2.46E-01         0.00E+00         0.00E+00         0.00E+00         0.00E+00
   SG11 | SG11
     2.40E-02
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 Elapsed finaloutput time in seconds:     0.01
 #CPUT: Total CPU Time in Seconds,        0.281
