$PROB RUN# Example 1 (from samp5l)
$INPUT C SET ID JID TIME  DV=CONC AMT=DOSE RATE EVID MDV CMT TYPE NMIN NMAX TSTRAT TMIN TMAX
$DATA optdesign11.csv IGNORE=C

$SUBROUTINES ADVAN3 TRANS4

$PK
; The thetas are MU modeled.
; Best that there is a linear relationship between THETAs and Mus
; The linear MU modeling of THETAS allows them to be efficiently
; Gibbs sampled.

IF(TYPE==1) MU_1=THETA(1)
IF(TYPE==2) MU_1=THETA(5)
IF(TYPE==3) MU_1=THETA(6)
MU_2=THETA(2)
MU_3=THETA(3)
MU_4=THETA(4)
CL=DEXP(MU_1+ETA(1))
V1=DEXP(MU_2+ETA(2))
Q=DEXP(MU_3+ETA(3))
V2=DEXP(MU_4+ETA(4))
S1=V1

$ERROR
Y = F + F*EPS(1)+EPS(2)

; Initial values of THETA
$THETA
 1.68338E+00  1.58812E+00  8.12710E-01  2.37436E+00 1.50 1.80


;INITIAL values of OMEGA
;$OMEGA BLOCK(4) VALUES(0.0225,0.001)
$OMEGA (0.0225 FIXED)X4

;Initial value of SIGMA
$SIGMA
( 0.0225)
( 0.0001 FIXED)


$DESIGN STGR DESEL=TIME DESELSTRAT=TSTRAT DESELMIN=TMIN DESELMAX=TMAX
        MAXEVAL=9999 SIGL=10 nohabort PRINT=10
$COV MATRIX=R UNCONDITIONAL SIGL=10 CHOLROFF=0
$TABLE ID TIME EVID MDV DV NOPRINT NOAPPEND FILE=optdesign12c.tab  FORMAT=S1PE23.16
