Tue 04/23/2019
12:04 PM

$PROB RUN# Example 1 (from samp5l)
$INPUT C SET ID JID TIME  DV=CONC AMT=DOSE RATE EVID MDV CMT TYPE NMIN NMAX TSTRAT TMIN TMAX
$DATA optdesign11.csv IGNORE=C

$SUBROUTINES ADVAN3 TRANS4

$PK
; The thetas are MU modeled.
; Best that there is a linear relationship between THETAs and Mus
; The linear MU modeling of THETAS allows them to be efficiently
; Gibbs sampled.

IF(TYPE==1) MU_1=THETA(1)
IF(TYPE==2) MU_1=THETA(5)
IF(TYPE==3) MU_1=THETA(6)
MU_2=THETA(2)
MU_3=THETA(3)
MU_4=THETA(4)
CL=DEXP(MU_1+ETA(1))
V1=DEXP(MU_2+ETA(2))
Q=DEXP(MU_3+ETA(3))
V2=DEXP(MU_4+ETA(4))
S1=V1

$ERROR
Y = F + F*EPS(1)+EPS(2)

; Initial values of THETA
$THETA
 1.68338E+00  1.58812E+00  8.12710E-01  2.37436E+00 1.50 1.80

;INITIAL values of OMEGA
;$OMEGA BLOCK(4) VALUES(0.0225,0.001)
$OMEGA (0.0225 FIXED)X4

;Initial value of SIGMA
$SIGMA
( 0.0225)
( 0.0001 FIXED)

$DESIGN DISCRETE_RS FIMTYPE=1
        NMIN=NMIN NMAX=NMAX DESEL=TIME DESELSTRAT=TSTRAT DESELMIN=TMIN DESELMAX=TMAX
        MAXEVAL=400 SIGL=12 nohabort PRINT=100
$TABLE ID TIME EVID MDV DV NOPRINT NOAPPEND FILE=optdesign13.tab  FORMAT=S1PE23.16

NM-TRAN MESSAGES
 WARNINGS AND ERRORS (IF ANY) FOR PROBLEM    1
 (WARNING  2) NM-TRAN INFERS THAT THE DATA ARE POPULATION.
 (DATA WARNING   5) RECORD         4, DATA ITEM   6, CONTENTS: 1
 THE DV DATA ITEM IS POSITIVE, BUT THE MDV DATA ITEM IS 1
 (DATA WARNING   5) RECORD         5, DATA ITEM   6, CONTENTS: 1
 THE DV DATA ITEM IS POSITIVE, BUT THE MDV DATA ITEM IS 1
 (MU_WARNING 8) MU_001: SHOULD NOT BE DEFINED CONDITIONALLY.
 (MU_WARNING 2) MU_001: SHOULD BE DEFINED ONLY ONCE.
 (MU_WARNING 2) MU_001: SHOULD BE DEFINED ONLY ONCE.
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
1NONLINEAR MIXED EFFECTS MODEL PROGRAM (NONMEM) VERSION 7.5.0 alpha version 7
 ORIGINALLY DEVELOPED BY STUART BEAL, LEWIS SHEINER, AND ALISON BOECKMANN
 CURRENT DEVELOPERS ARE ROBERT BAUER, ICON DEVELOPMENT SOLUTIONS,
 AND ALISON BOECKMANN. IMPLEMENTATION, EFFICIENCY, AND STANDARDIZATION
 PERFORMED BY NOUS INFOSYSTEMS.
 PROBLEM NO.:         1
 RUN# Example 1 (from samp5l)
 TOT. NO. OF OBS RECS:       12
 TOT. NO. OF INDIVIDUALS:        3
 TWO COMPARTMENT MODEL (ADVAN3)
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 #TBLN:      1
 #METH: First Order: D-OPTIMALITY
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
0R MATRIX ALGORITHMICALLY NON-POSITIVE-SEMIDEFINITE
 BUT NONSINGULAR
0COVARIANCE STEP ABORTED
                ITERATION NO.:       1700    OBJECTIVE VALUE:  -30.1932062795006        NO. OF FUNC. EVALS.:        1705
                ITERATION NO.:       1800    OBJECTIVE VALUE:  -30.1932062795006        NO. OF FUNC. EVALS.:        1805
                ITERATION NO.:       1900    OBJECTIVE VALUE:  -30.1932062795006        NO. OF FUNC. EVALS.:        1905
                ITERATION NO.:       2000    OBJECTIVE VALUE:  -30.4826538140014        NO. OF FUNC. EVALS.:        2005
0CONFIG TEST,   ITERATION NO.:       2000    OBJECTIVE VALUE:  -30.4826538140014        NO. OF FUNC. EVALS.:        2005

                ITERATION NO.:       2000    OBJECTIVE VALUE:  -29.6995951997675        NO. OF FUNC. EVALS.:        2006
0R MATRIX ALGORITHMICALLY NON-POSITIVE-SEMIDEFINITE
 BUT NONSINGULAR
0COVARIANCE STEP ABORTED
                ITERATION NO.:       2100    OBJECTIVE VALUE:  -29.6995951997675        NO. OF FUNC. EVALS.:        2106
                ITERATION NO.:       2200    OBJECTIVE VALUE:  -29.8019158931080        NO. OF FUNC. EVALS.:        2206
                ITERATION NO.:       2300    OBJECTIVE VALUE:  -29.8511523255465        NO. OF FUNC. EVALS.:        2306
                ITERATION NO.:       2400    OBJECTIVE VALUE:  -30.2732980907847        NO. OF FUNC. EVALS.:        2406
0CONFIG TEST,   ITERATION NO.:       2400    OBJECTIVE VALUE:  -30.2732980907847        NO. OF FUNC. EVALS.:        2406

                ITERATION NO.:       2400    OBJECTIVE VALUE:  -29.9104050484532        NO. OF FUNC. EVALS.:        2407
                ITERATION NO.:       2500    OBJECTIVE VALUE:  -29.9104050484532        NO. OF FUNC. EVALS.:        2507
                ITERATION NO.:       2600    OBJECTIVE VALUE:  -30.0059488373032        NO. OF FUNC. EVALS.:        2607
                ITERATION NO.:       2700    OBJECTIVE VALUE:  -30.0111257671109        NO. OF FUNC. EVALS.:        2707
                ITERATION NO.:       2800    OBJECTIVE VALUE:  -30.5077595122393        NO. OF FUNC. EVALS.:        2807
0CONFIG TEST,   ITERATION NO.:       2800    OBJECTIVE VALUE:  -30.5077595122393        NO. OF FUNC. EVALS.:        2807

                ITERATION NO.:       2800    OBJECTIVE VALUE:  -29.9130241957214        NO. OF FUNC. EVALS.:        2808
                ITERATION NO.:       2900    OBJECTIVE VALUE:  -29.9130241957214        NO. OF FUNC. EVALS.:        2908
                ITERATION NO.:       3000    OBJECTIVE VALUE:  -30.2272721598190        NO. OF FUNC. EVALS.:        3008
                ITERATION NO.:       3100    OBJECTIVE VALUE:  -30.4850547922309        NO. OF FUNC. EVALS.:        3108
                ITERATION NO.:       3200    OBJECTIVE VALUE:  -30.5129589912319        NO. OF FUNC. EVALS.:        3208
0BEST CONFIG,   ITERATION NO.:       3200    OBJECTIVE VALUE:  -30.5129589912319        NO. OF FUNC. EVALS.:        3208


 #TERM:
 NO. OF FUNCTION EVALUATIONS USED:     3208
0MINIMIZATION SUCCESSFUL

 ETABAR IS THE ARITHMETIC MEAN OF THE ETA-ESTIMATES,
 AND THE P-VALUE IS GIVEN FOR THE NULL HYPOTHESIS THAT THE TRUE MEAN IS 0.

 ETABAR:         0.0000E+00  0.0000E+00  0.0000E+00  0.0000E+00
 SE:             0.0000E+00  0.0000E+00  0.0000E+00  0.0000E+00
 N:                       3           3           3           3

 P VAL.:         1.0000E+00  1.0000E+00  1.0000E+00  1.0000E+00

 ETASHRINKSD(%)  1.0000E+02  1.0000E+02  1.0000E+02  1.0000E+02
 ETASHRINKVR(%)  1.0000E+02  1.0000E+02  1.0000E+02  1.0000E+02
 EBVSHRINKSD(%)  8.9018E+00  2.1484E+01  4.8723E+01  3.2072E+01
 EBVSHRINKVR(%)  1.7011E+01  3.8353E+01  7.3707E+01  5.3858E+01
 EPSSHRINKSD(%)  1.0000E+02  1.0000E+02
 EPSSHRINKVR(%)  1.0000E+02  1.0000E+02


 #TERE:
 Elapsed opt. design time in seconds:     4.40
 Elapsed postprocess time in seconds:     0.00

 ********************                            FIRST ORDER: D-OPTIMALITY                           ********************
 #OBJT:**************                MINIMUM VALUE OF OBJECTIVE FUNCTION: D-OPTIMALITY               ********************
 #OBJV:********************************************      -30.513       **************************************************

 ********************                            FIRST ORDER: D-OPTIMALITY                           ********************
 ********************                             FINAL PARAMETER ESTIMATE                           ********************

 THETA - VECTOR OF FIXED EFFECTS PARAMETERS   *********
         TH 1      TH 2      TH 3      TH 4      TH 5      TH 6
         1.68E+00  1.59E+00  8.13E-01  2.37E+00  1.50E+00  1.80E+00

 OMEGA - COV MATRIX FOR RANDOM EFFECTS - ETAS  ********
         ETA1      ETA2      ETA3      ETA4
 ETA1
+        2.25E-02
 ETA2
+        0.00E+00  2.25E-02
 ETA3
+        0.00E+00  0.00E+00  2.25E-02
 ETA4
+        0.00E+00  0.00E+00  0.00E+00  2.25E-02

 SIGMA - COV MATRIX FOR RANDOM EFFECTS - EPSILONS  ****
         EPS1      EPS2
 EPS1
+        2.25E-02
 EPS2
+        0.00E+00  1.00E-04

 OMEGA - CORR MATRIX FOR RANDOM EFFECTS - ETAS  *******
         ETA1      ETA2      ETA3      ETA4
 ETA1
+        1.50E-01
 ETA2
+        0.00E+00  1.50E-01
 ETA3
+        0.00E+00  0.00E+00  1.50E-01
 ETA4
+        0.00E+00  0.00E+00  0.00E+00  1.50E-01

 SIGMA - CORR MATRIX FOR RANDOM EFFECTS - EPSILONS  ***
         EPS1      EPS2
 EPS1
+        1.50E-01
 EPS2
+        0.00E+00  1.00E-02

 ********************                            FIRST ORDER: D-OPTIMALITY                           ********************
 ********************                            STANDARD ERROR OF ESTIMATE                          ********************

 THETA - VECTOR OF FIXED EFFECTS PARAMETERS   *********
         TH 1      TH 2      TH 3      TH 4      TH 5      TH 6
         1.66E-01  1.18E-01  1.97E-01  1.49E-01  1.75E-01  1.65E-01

 OMEGA - COV MATRIX FOR RANDOM EFFECTS - ETAS  ********
         ETA1      ETA2      ETA3      ETA4
 ETA1
+       .........
 ETA2
+       ......... .........
 ETA3
+       ......... ......... .........
 ETA4
+       ......... ......... ......... .........

 SIGMA - COV MATRIX FOR RANDOM EFFECTS - EPSILONS  ****
         EPS1      EPS2
 EPS1
+        1.79E-02
 EPS2
+       ......... .........

 OMEGA - CORR MATRIX FOR RANDOM EFFECTS - ETAS  *******
         ETA1      ETA2      ETA3      ETA4
 ETA1
+       .........
 ETA2
+       ......... .........
 ETA3
+       ......... ......... .........
 ETA4
+       ......... ......... ......... .........

 SIGMA - CORR MATRIX FOR RANDOM EFFECTS - EPSILONS  ***
         EPS1      EPS2
 EPS1
+        5.96E-02
 EPS2
+       ......... .........

 ********************                            FIRST ORDER: D-OPTIMALITY                           ********************
 ********************                          COVARIANCE MATRIX OF ESTIMATE                         ********************

     TH 1 | TH 1      TH 2 | TH 1      TH 2 | TH 2      TH 3 | TH 1      TH 3 | TH 2      TH 3 | TH 3      TH 4 | TH 1
     2.77E-02         2.76E-03         1.38E-02         6.25E-03         5.02E-03         3.90E-02         4.01E-03
     TH 4 | TH 2      TH 4 | TH 3      TH 4 | TH 4      TH 5 | TH 1      TH 5 | TH 2      TH 5 | TH 3      TH 5 | TH 4
     4.47E-03         1.37E-02         2.22E-02         6.77E-04         3.12E-03         7.42E-05         3.10E-03
     TH 5 | TH 5      TH 6 | TH 1      TH 6 | TH 2      TH 6 | TH 3      TH 6 | TH 4      TH 6 | TH 5      TH 6 | TH 6
     3.06E-02         1.13E-03         2.24E-03         5.09E-03         3.10E-03         5.25E-04         2.71E-02
   SG11 | TH 1      SG11 | TH 2      SG11 | TH 3      SG11 | TH 4      SG11 | TH 5      SG11 | TH 6      SG11 | SG11
     0.00E+00         0.00E+00         0.00E+00         0.00E+00         0.00E+00         0.00E+00         3.20E-04

 ********************                            FIRST ORDER: D-OPTIMALITY                           ********************
 ********************                          CORRELATION MATRIX OF ESTIMATE                        ********************

     TH 1 | TH 1      TH 2 | TH 1      TH 2 | TH 2      TH 3 | TH 1      TH 3 | TH 2      TH 3 | TH 3      TH 4 | TH 1
     1.66E-01         1.41E-01         1.18E-01         1.90E-01         2.17E-01         1.97E-01         1.62E-01
     TH 4 | TH 2      TH 4 | TH 3      TH 4 | TH 4      TH 5 | TH 1      TH 5 | TH 2      TH 5 | TH 3      TH 5 | TH 4
     2.55E-01         4.68E-01         1.49E-01         2.32E-02         1.52E-01         2.15E-03         1.19E-01
     TH 5 | TH 5      TH 6 | TH 1      TH 6 | TH 2      TH 6 | TH 3      TH 6 | TH 4      TH 6 | TH 5      TH 6 | TH 6
     1.75E-01         4.13E-02         1.16E-01         1.57E-01         1.26E-01         1.82E-02         1.65E-01
   SG11 | TH 1      SG11 | TH 2      SG11 | TH 3      SG11 | TH 4      SG11 | TH 5      SG11 | TH 6      SG11 | SG11
     0.00E+00         0.00E+00         0.00E+00         0.00E+00         0.00E+00         0.00E+00         1.79E-02
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 Elapsed finaloutput time in seconds:     0.03
 #CPUT: Total CPU Time in Seconds,        3.510
