Tue 04/23/2019
12:05 PM

$PROB RUN# Example 1 (from samp5l)
$INPUT C SET ID JID TIME  DV=CONC AMT=DOSE RATE EVID MDV CMT TYPE STRAT STRATF TSTRAT TMIN TMAX
$DATA optdesign14.csv IGNORE=C

$SUBROUTINES ADVAN3 TRANS4

$PK
; The thetas are MU modeled.
; Best that there is a linear relationship between THETAs and Mus
; The linear MU modeling of THETAS allows them to be efficiently
; Gibbs sampled.

IF(TYPE==1) MU_1=THETA(1)
IF(TYPE==2) MU_1=THETA(5)
IF(TYPE==3) MU_1=THETA(6)
MU_2=THETA(2)
MU_3=THETA(3)
MU_4=THETA(4)
CL=DEXP(MU_1+ETA(1))
V1=DEXP(MU_2+ETA(2))
Q=DEXP(MU_3+ETA(3))
V2=DEXP(MU_4+ETA(4))
S1=V1

$ERROR
Y = F + F*EPS(1)+EPS(2)

; Initial values of THETA
$THETA
 1.68338E+00  1.58812E+00  8.12710E-01  2.37436E+00 1.50 1.80

;INITIAL values of OMEGA
;$OMEGA BLOCK(4) VALUES(0.0225,0.001)
$OMEGA (0.0225 FIXED)X4

;Initial value of SIGMA
$SIGMA
( 0.0225)
( 0.0001 FIXED)

$DESIGN NELDER FIMTYPE=1 STRAT=STRAT STRATF=STRATF DESEL=TIME DESELSTRAT=TSTRAT DESELMIN=TMIN DESELMAX=TMAX
           MAXEVAL=400 SIGL=12 nohabort PRINT=10
$COV PRINT=E
$TABLE ID STRAT STRATF TIME EVID MDV DV NOPRINT NOAPPEND FILE=optdesign14.tab  FORMAT=S1PE23.16

NM-TRAN MESSAGES
 WARNINGS AND ERRORS (IF ANY) FOR PROBLEM    1
 (WARNING  2) NM-TRAN INFERS THAT THE DATA ARE POPULATION.
 (MU_WARNING 8) MU_001: SHOULD NOT BE DEFINED CONDITIONALLY.
 (MU_WARNING 2) MU_001: SHOULD BE DEFINED ONLY ONCE.
 (MU_WARNING 2) MU_001: SHOULD BE DEFINED ONLY ONCE.

1NONLINEAR MIXED EFFECTS MODEL PROGRAM (NONMEM) VERSION 7.5.0 alpha version 7
 ORIGINALLY DEVELOPED BY STUART BEAL, LEWIS SHEINER, AND ALISON BOECKMANN
 CURRENT DEVELOPERS ARE ROBERT BAUER, ICON DEVELOPMENT SOLUTIONS,
 AND ALISON BOECKMANN. IMPLEMENTATION, EFFICIENCY, AND STANDARDIZATION
 PERFORMED BY NOUS INFOSYSTEMS.
 PROBLEM NO.:         1
 RUN# Example 1 (from samp5l)
 TOT. NO. OF OBS RECS:       15
 TOT. NO. OF INDIVIDUALS:        3
 TWO COMPARTMENT MODEL (ADVAN3)
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 #TBLN:      1
 #METH: First Order: D-OPTIMALITY
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
 #TERM:
 NO. OF FUNCTION EVALUATIONS USED:     2233
0MINIMIZATION TERMINATED
  DUE TO MAXIMUM NUMBER OF ITERATIONS EXCEEDED

 ETABAR IS THE ARITHMETIC MEAN OF THE ETA-ESTIMATES,
 AND THE P-VALUE IS GIVEN FOR THE NULL HYPOTHESIS THAT THE TRUE MEAN IS 0.

 ETABAR:         0.0000E+00  0.0000E+00  0.0000E+00  0.0000E+00
 SE:             0.0000E+00  0.0000E+00  0.0000E+00  0.0000E+00
 N:                       3           3           3           3

 P VAL.:         1.0000E+00  1.0000E+00  1.0000E+00  1.0000E+00

 ETASHRINKSD(%)  1.0000E+02  1.0000E+02  1.0000E+02  1.0000E+02
 ETASHRINKVR(%)  1.0000E+02  1.0000E+02  1.0000E+02  1.0000E+02
 EBVSHRINKSD(%)  6.6647E+00  2.3141E+01  3.3246E+01  2.9858E+01
 EBVSHRINKVR(%)  1.2885E+01  4.0927E+01  5.5440E+01  5.0800E+01
 EPSSHRINKSD(%)  5.5279E+01  5.5279E+01
 EPSSHRINKVR(%)  8.0000E+01  8.0000E+01


 #TERE:
 Elapsed opt. design time in seconds:     2.82
 Elapsed postprocess time in seconds:     0.00

 ********************                            FIRST ORDER: D-OPTIMALITY                           ********************
 #OBJT:**************                MINIMUM VALUE OF OBJECTIVE FUNCTION: D-OPTIMALITY               ********************
 #OBJV:********************************************      -31.748       **************************************************

 ********************                            FIRST ORDER: D-OPTIMALITY                           ********************
 ********************                             FINAL PARAMETER ESTIMATE                           ********************

 THETA - VECTOR OF FIXED EFFECTS PARAMETERS   *********
         TH 1      TH 2      TH 3      TH 4      TH 5      TH 6
         1.68E+00  1.59E+00  8.13E-01  2.37E+00  1.50E+00  1.80E+00

 OMEGA - COV MATRIX FOR RANDOM EFFECTS - ETAS  ********
         ETA1      ETA2      ETA3      ETA4
 ETA1
+        2.25E-02
 ETA2
+        0.00E+00  2.25E-02
 ETA3
+        0.00E+00  0.00E+00  2.25E-02
 ETA4
+        0.00E+00  0.00E+00  0.00E+00  2.25E-02

 SIGMA - COV MATRIX FOR RANDOM EFFECTS - EPSILONS  ****
         EPS1      EPS2
 EPS1
+        2.25E-02
 EPS2
+        0.00E+00  1.00E-04

 OMEGA - CORR MATRIX FOR RANDOM EFFECTS - ETAS  *******
         ETA1      ETA2      ETA3      ETA4
 ETA1
+        1.50E-01
 ETA2
+        0.00E+00  1.50E-01
 ETA3
+        0.00E+00  0.00E+00  1.50E-01
 ETA4
+        0.00E+00  0.00E+00  0.00E+00  1.50E-01

 SIGMA - CORR MATRIX FOR RANDOM EFFECTS - EPSILONS  ***
         EPS1      EPS2
 EPS1
+        1.50E-01
 EPS2
+        0.00E+00  1.00E-02

 ********************                            FIRST ORDER: D-OPTIMALITY                           ********************
 ********************                            STANDARD ERROR OF ESTIMATE                          ********************

 THETA - VECTOR OF FIXED EFFECTS PARAMETERS   *********
         TH 1      TH 2      TH 3      TH 4      TH 5      TH 6
         1.60E-01  1.20E-01  1.54E-01  1.43E-01  1.64E-01  1.68E-01

 OMEGA - COV MATRIX FOR RANDOM EFFECTS - ETAS  ********
         ETA1      ETA2      ETA3      ETA4
 ETA1
+       .........
 ETA2
+       ......... .........
 ETA3
+       ......... ......... .........
 ETA4
+       ......... ......... ......... .........

 SIGMA - COV MATRIX FOR RANDOM EFFECTS - EPSILONS  ****
         EPS1      EPS2
 EPS1
+        1.37E-02
 EPS2
+       ......... .........

 OMEGA - CORR MATRIX FOR RANDOM EFFECTS - ETAS  *******
         ETA1      ETA2      ETA3      ETA4
 ETA1
+       .........
 ETA2
+       ......... .........
 ETA3
+       ......... ......... .........
 ETA4
+       ......... ......... ......... .........

 SIGMA - CORR MATRIX FOR RANDOM EFFECTS - EPSILONS  ***
         EPS1      EPS2
 EPS1
+        4.58E-02
 EPS2
+       ......... .........

 ********************                            FIRST ORDER: D-OPTIMALITY                           ********************
 ********************                          COVARIANCE MATRIX OF ESTIMATE                         ********************

     TH 1 | TH 1      TH 2 | TH 1      TH 2 | TH 2      TH 3 | TH 1      TH 3 | TH 2      TH 3 | TH 3      TH 4 | TH 1
     2.57E-02         2.20E-03         1.43E-02         3.12E-03         4.73E-03         2.37E-02         2.64E-03
     TH 4 | TH 2      TH 4 | TH 3      TH 4 | TH 4      TH 5 | TH 1      TH 5 | TH 2      TH 5 | TH 3      TH 5 | TH 4
     3.99E-03         1.06E-02         2.06E-02         8.48E-04         2.54E-03         4.39E-03         3.31E-03
     TH 5 | TH 5      TH 6 | TH 1      TH 6 | TH 2      TH 6 | TH 3      TH 6 | TH 4      TH 6 | TH 5      TH 6 | TH 6
     2.70E-02         8.87E-04         2.78E-03         4.71E-03         3.11E-03         1.15E-03         2.82E-02
   SG11 | TH 1      SG11 | TH 2      SG11 | TH 3      SG11 | TH 4      SG11 | TH 5      SG11 | TH 6      SG11 | SG11
     0.00E+00         0.00E+00         0.00E+00         0.00E+00         0.00E+00         0.00E+00         1.89E-04

 ********************                            FIRST ORDER: D-OPTIMALITY                           ********************
 ********************                          CORRELATION MATRIX OF ESTIMATE                        ********************

     TH 1 | TH 1      TH 2 | TH 1      TH 2 | TH 2      TH 3 | TH 1      TH 3 | TH 2      TH 3 | TH 3      TH 4 | TH 1
     1.60E-01         1.15E-01         1.20E-01         1.26E-01         2.56E-01         1.54E-01         1.15E-01
     TH 4 | TH 2      TH 4 | TH 3      TH 4 | TH 4      TH 5 | TH 1      TH 5 | TH 2      TH 5 | TH 3      TH 5 | TH 4
     2.32E-01         4.81E-01         1.43E-01         3.22E-02         1.29E-01         1.74E-01         1.41E-01
     TH 5 | TH 5      TH 6 | TH 1      TH 6 | TH 2      TH 6 | TH 3      TH 6 | TH 4      TH 6 | TH 5      TH 6 | TH 6
     1.64E-01         3.30E-02         1.39E-01         1.82E-01         1.29E-01         4.19E-02         1.68E-01
   SG11 | TH 1      SG11 | TH 2      SG11 | TH 3      SG11 | TH 4      SG11 | TH 5      SG11 | TH 6      SG11 | SG11
     0.00E+00         0.00E+00         0.00E+00         0.00E+00         0.00E+00         0.00E+00         1.37E-02
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
 ********************                            FIRST ORDER: D-OPTIMALITY                           ********************
 ********************                      EIGENVALUES OF COR MATRIX OF ESTIMATE                     ********************

             1         2         3         4         5         6         7
         5.14E-01  8.04E-01  8.73E-01  9.59E-01  9.72E-01  1.00E+00  1.88E+00
 Elapsed finaloutput time in seconds:     0.02
 #CPUT: Total CPU Time in Seconds,        2.371
