Tue 04/23/2019
12:05 PM

$PROB RUN# Example 1 (from samp5l)
$INPUT C SET ID JID TIME  DV=CONC AMT=DOSE RATE EVID MDV CMT TSTRAT TMIN TMAX
$DATA optdesign2.csv IGNORE=C

$SUBROUTINES ADVAN3 TRANS4

$PK
; The thetas are MU modeled.
; Best that there is a linear relationship between THETAs and Mus
; The linear MU modeling of THETAS allows them to be efficiently
; Gibbs sampled.

MU_1=THETA(1)
MU_2=THETA(2)
MU_3=THETA(3)
MU_4=THETA(4)
CL=DEXP(MU_1+ETA(1))
V1=DEXP(MU_2+ETA(2))
Q=DEXP(MU_3+ETA(3))
V2=DEXP(MU_4+ETA(4))
S1=V1
CLN=THETA(1)
V1N=THETA(2)
QN=THETA(3)
V2N=THETA(4)

$ERROR
Y = F + F*EPS(1)+EPS(2)

; Initial values of THETA
$THETA
 1.68338E+00  1.58812E+00  8.12710E-01  2.37436E+00

;INITIAL values of OMEGA
;$OMEGA BLOCK(4) VALUES(0.0225,0.001)
$OMEGA (0.0225 FIXED)X4

;Initial value of SIGMA
$SIGMA
( 0.0225)
( 0.0001 FIXED)

$PRIOR NWPRI PLEV=0.9999

$THETAP  (1.68338E+00 FIXED) (1.58812E+00 FIXED) (8.12710E-01 FIXED) (2.37436E+00 FIXED)

$THETAPV BLOCK(4) FIXED VALUES(0.03,0.001)

$DESIGN STGR EOPTD=1 FIMTYPE=1 SEED=1222345 DESEL=TIME DESELSTRAT=TSTRAT DESELMIN=TMIN DESELMAX=TMAX
           MAXEVAL=9999 SIGL=12 nohabort PRINT=10 NOPRIOR=1
$TABLE ID CLN V1N QN V2N TIME EVID MDV DV NOPRINT NOAPPEND FILE=optdesign16.tab  FORMAT=S1PE23.16

NM-TRAN MESSAGES
 WARNINGS AND ERRORS (IF ANY) FOR PROBLEM    1
 (WARNING  2) NM-TRAN INFERS THAT THE DATA ARE POPULATION.
 (MU_WARNING 17) MU_001: THETA(001) SHOULD NOT BE USED IN THE MODEL AFTER MU ASSOCIATION.
 (MU_WARNING 17) MU_002: THETA(002) SHOULD NOT BE USED IN THE MODEL AFTER MU ASSOCIATION.
 (MU_WARNING 17) MU_003: THETA(003) SHOULD NOT BE USED IN THE MODEL AFTER MU ASSOCIATION.
 (MU_WARNING 17) MU_004: THETA(004) SHOULD NOT BE USED IN THE MODEL AFTER MU ASSOCIATION.

1NONLINEAR MIXED EFFECTS MODEL PROGRAM (NONMEM) VERSION 7.5.0 alpha version 7
 ORIGINALLY DEVELOPED BY STUART BEAL, LEWIS SHEINER, AND ALISON BOECKMANN
 CURRENT DEVELOPERS ARE ROBERT BAUER, ICON DEVELOPMENT SOLUTIONS,
 AND ALISON BOECKMANN. IMPLEMENTATION, EFFICIENCY, AND STANDARDIZATION
 PERFORMED BY NOUS INFOSYSTEMS.
 PROBLEM NO.:         1
 RUN# Example 1 (from samp5l)
 TOT. NO. OF OBS RECS:        5
 TOT. NO. OF INDIVIDUALS:        1
 TWO COMPARTMENT MODEL (ADVAN3)
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 #TBLN:      1
 #METH: First Order (No Prior): ED-OPTIMALITY
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
 #TERM:
 NO. OF FUNCTION EVALUATIONS USED:      358
0MINIMIZATION SUCCESSFUL

 ETABAR IS THE ARITHMETIC MEAN OF THE ETA-ESTIMATES,
 AND THE P-VALUE IS GIVEN FOR THE NULL HYPOTHESIS THAT THE TRUE MEAN IS 0.

 ETABAR:         0.0000E+00  0.0000E+00  0.0000E+00  0.0000E+00
 SE:             0.0000E+00  0.0000E+00  0.0000E+00  0.0000E+00
 N:                       1           1           1           1

 P VAL.:         1.0000E+00  1.0000E+00  1.0000E+00  1.0000E+00

 ETASHRINKSD(%)  1.0000E+02  1.0000E+02  1.0000E+02  1.0000E+02
 ETASHRINKVR(%)  1.0000E+02  1.0000E+02  1.0000E+02  1.0000E+02
 EBVSHRINKSD(%)  8.4236E+00  3.7138E+01  3.7159E+01  4.3253E+01
 EBVSHRINKVR(%)  1.6138E+01  6.0483E+01  6.0510E+01  6.7798E+01
 EPSSHRINKSD(%)  5.5279E+01  5.5279E+01
 EPSSHRINKVR(%)  8.0000E+01  8.0000E+01


 #TERE:
 Elapsed opt. design time in seconds:     0.20
 Elapsed postprocess time in seconds:     0.00

 ********************                      FIRST ORDER (NO PRIOR): ED-OPTIMALITY                     ********************
 #OBJT:**************                MINIMUM VALUE OF OBJECTIVE FUNCTION: ED-OPTIMALITY              ********************
 #OBJV:********************************************      -18.769       **************************************************

 ********************                      FIRST ORDER (NO PRIOR): ED-OPTIMALITY                     ********************
 ********************                             FINAL PARAMETER ESTIMATE                           ********************

 THETA - VECTOR OF FIXED EFFECTS PARAMETERS   *********
         TH 1      TH 2      TH 3      TH 4
         1.68E+00  1.59E+00  8.13E-01  2.37E+00

 OMEGA - COV MATRIX FOR RANDOM EFFECTS - ETAS  ********
         ETA1      ETA2      ETA3      ETA4
 ETA1
+        2.25E-02
 ETA2
+        0.00E+00  2.25E-02
 ETA3
+        0.00E+00  0.00E+00  2.25E-02
 ETA4
+        0.00E+00  0.00E+00  0.00E+00  2.25E-02

 SIGMA - COV MATRIX FOR RANDOM EFFECTS - EPSILONS  ****
         EPS1      EPS2
 EPS1
+        2.25E-02
 EPS2
+        0.00E+00  1.00E-04

 OMEGA - CORR MATRIX FOR RANDOM EFFECTS - ETAS  *******
         ETA1      ETA2      ETA3      ETA4
 ETA1
+        1.50E-01
 ETA2
+        0.00E+00  1.50E-01
 ETA3
+        0.00E+00  0.00E+00  1.50E-01
 ETA4
+        0.00E+00  0.00E+00  0.00E+00  1.50E-01

 SIGMA - CORR MATRIX FOR RANDOM EFFECTS - EPSILONS  ***
         EPS1      EPS2
 EPS1
+        1.50E-01
 EPS2
+        0.00E+00  1.00E-02

 ********************                      FIRST ORDER (NO PRIOR): ED-OPTIMALITY                     ********************
 ********************                            STANDARD ERROR OF ESTIMATE                          ********************

 THETA - VECTOR OF FIXED EFFECTS PARAMETERS   *********
         TH 1      TH 2      TH 3      TH 4
         1.90E-01  2.47E-01  3.46E-01  3.58E-01

 OMEGA - COV MATRIX FOR RANDOM EFFECTS - ETAS  ********
         ETA1      ETA2      ETA3      ETA4
 ETA1
+       .........
 ETA2
+       ......... .........
 ETA3
+       ......... ......... .........
 ETA4
+       ......... ......... ......... .........

 SIGMA - COV MATRIX FOR RANDOM EFFECTS - EPSILONS  ****
         EPS1      EPS2
 EPS1
+        2.28E-02
 EPS2
+       ......... .........

 OMEGA - CORR MATRIX FOR RANDOM EFFECTS - ETAS  *******
         ETA1      ETA2      ETA3      ETA4
 ETA1
+       .........
 ETA2
+       ......... .........
 ETA3
+       ......... ......... .........
 ETA4
+       ......... ......... ......... .........

 SIGMA - CORR MATRIX FOR RANDOM EFFECTS - EPSILONS  ***
         EPS1      EPS2
 EPS1
+        7.61E-02
 EPS2
+       ......... .........

 ********************                      FIRST ORDER (NO PRIOR): ED-OPTIMALITY                     ********************
 ********************                          COVARIANCE MATRIX OF ESTIMATE                         ********************

     TH 1 | TH 1      TH 2 | TH 1      TH 2 | TH 2      TH 3 | TH 1      TH 3 | TH 2      TH 3 | TH 3      TH 4 | TH 1
     3.62E-02        -3.82E-03         6.11E-02         3.28E-02        -1.77E-02         1.20E-01         2.69E-02
     TH 4 | TH 2      TH 4 | TH 3      TH 4 | TH 4    SG11 | TH 1      SG11 | TH 2      SG11 | TH 3      SG11 | TH 4
    -1.30E-02         8.21E-02         1.28E-01         0.00E+00         0.00E+00         0.00E+00         0.00E+00
   SG11 | SG11
     5.22E-04

 ********************                      FIRST ORDER (NO PRIOR): ED-OPTIMALITY                     ********************
 ********************                          CORRELATION MATRIX OF ESTIMATE                        ********************

     TH 1 | TH 1      TH 2 | TH 1      TH 2 | TH 2      TH 3 | TH 1      TH 3 | TH 2      TH 3 | TH 3      TH 4 | TH 1
     1.90E-01        -8.13E-02         2.47E-01         4.98E-01        -2.07E-01         3.46E-01         3.95E-01
     TH 4 | TH 2      TH 4 | TH 3      TH 4 | TH 4    SG11 | TH 1      SG11 | TH 2      SG11 | TH 3      SG11 | TH 4
    -1.47E-01         6.63E-01         3.58E-01         0.00E+00         0.00E+00         0.00E+00         0.00E+00
   SG11 | SG11
     2.28E-02
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 Elapsed finaloutput time in seconds:     0.02
 #CPUT: Total CPU Time in Seconds,        0.140
