Tue 04/23/2019
12:26 PM

$PROB RUN# Example 1 (from samp5l)
$INPUT C SET ID JID TIME  DV=CONC AMT=DOSE RATE EVID MDV CMT TSTRAT TMIN TMAX
$DATA optdesign21.csv IGNORE=C REPL=100

$SUBROUTINES ADVAN3 TRANS4

$PK
; The thetas are MU modeled.
; Best that there is a linear relationship between THETAs and Mus
; The linear MU modeling of THETAS allows them to be efficiently
; Gibbs sampled.

MU_1=THETA(1)
MU_2=THETA(2)
MU_3=THETA(3)
MU_4=THETA(4)
CL=DEXP(MU_1+ETA(1))
V1=DEXP(MU_2+ETA(2))
Q=DEXP(MU_3+ETA(3))
V2=DEXP(MU_4+ETA(4))
S1=V1

$ERROR
Y = F + F*EPS(1)+EPS(2)

; Initial values of THETA
$THETA
 1.68338E+00  1.58812E+00  8.12710E-01  2.37436E+00

;INITIAL values of OMEGA
;$OMEGA BLOCK(4) VALUES(0.0225,0.001)
$OMEGA (0.0225 FIXED)X4

;Initial value of SIGMA
$SIGMA
( 0.0225)
( 0.0001 FIXED)

$DESIGN NELDER MODE=2 FIMTYPE=1 GROUPSIZE=0.01 DESEL=TIME DESELSTRAT=TSTRAT DESELMIN=TMIN DESELMAX=TMAX APPROX=FOCEI
           MAXEVAL=400 SIGL=10 nohabort FNLETA=0
$SIM (1222345 NORMAL) (2933012 UNIFORM)
$TABLE ID ETA1 ETA2 ETA3 ETA4 TIME EVID MDV DV NOPRINT NOAPPEND FILE=optdesign21.tab  FORMAT=S1PE23.16

NM-TRAN MESSAGES
 WARNINGS AND ERRORS (IF ANY) FOR PROBLEM    1
 (WARNING  2) NM-TRAN INFERS THAT THE DATA ARE POPULATION.

1NONLINEAR MIXED EFFECTS MODEL PROGRAM (NONMEM) VERSION 7.5.0 alpha version 7
 ORIGINALLY DEVELOPED BY STUART BEAL, LEWIS SHEINER, AND ALISON BOECKMANN
 CURRENT DEVELOPERS ARE ROBERT BAUER, ICON DEVELOPMENT SOLUTIONS,
 AND ALISON BOECKMANN. IMPLEMENTATION, EFFICIENCY, AND STANDARDIZATION
 PERFORMED BY NOUS INFOSYSTEMS.
 PROBLEM NO.:         1
 RUN# Example 1 (from samp5l)
 TOT. NO. OF DATA RECS:       600
 TOT. NO. OF OBS RECS:      500
 TOT. NO. OF INDIVIDUALS:      100
 TWO COMPARTMENT MODEL (ADVAN3)
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 #TBLN:      1
 #METH: First Order Conditional Estimation with Interaction: D-OPTIMALITY
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
 #TERM:
 NO. OF FUNCTION EVALUATIONS USED:      374
0MINIMIZATION SUCCESSFUL

 ETABAR IS THE ARITHMETIC MEAN OF THE ETA-ESTIMATES,
 AND THE P-VALUE IS GIVEN FOR THE NULL HYPOTHESIS THAT THE TRUE MEAN IS 0.

 ETABAR:        -2.6969E-03  1.3130E-02 -2.7732E-02 -9.1458E-04
 SE:             1.5508E-02  1.4335E-02  1.4052E-02  1.5858E-02
 N:                     100         100         100         100

 P VAL.:         8.6194E-01  3.5967E-01  4.8425E-02  9.5401E-01

 ETASHRINKSD(%)  1.0000E-10  3.9547E+00  5.8510E+00  1.0000E-10
 ETASHRINKVR(%)  1.0000E-10  7.7531E+00  1.1360E+01  1.0000E-10
 EBVSHRINKSD(%)  6.9642E+00  2.3316E+01  3.4945E+01  3.2863E+01
 EBVSHRINKVR(%)  1.3443E+01  4.1196E+01  5.7678E+01  5.4927E+01
 EPSSHRINKSD(%)  5.5279E+01  5.5279E+01
 EPSSHRINKVR(%)  8.0000E+01  8.0000E+01


 #TERE:
 Elapsed opt. design time in seconds:     2.96
 SKIPPING EXECUTION OF SLOW FNLMOD/FNLETA BY USER REQUEST
 Elapsed postprocess time in seconds:     0.00

 ********************        FIRST ORDER CONDITIONAL ESTIMATION WITH INTERACTION: D-OPTIMALITY       ********************
 #OBJT:**************                MINIMUM VALUE OF OBJECTIVE FUNCTION: D-OPTIMALITY               ********************
 #OBJV:********************************************      -19.958       **************************************************

 ********************        FIRST ORDER CONDITIONAL ESTIMATION WITH INTERACTION: D-OPTIMALITY       ********************
 ********************                             FINAL PARAMETER ESTIMATE                           ********************

 THETA - VECTOR OF FIXED EFFECTS PARAMETERS   *********
         TH 1      TH 2      TH 3      TH 4
         1.68E+00  1.59E+00  8.13E-01  2.37E+00

 OMEGA - COV MATRIX FOR RANDOM EFFECTS - ETAS  ********
         ETA1      ETA2      ETA3      ETA4
 ETA1
+        2.25E-02
 ETA2
+        0.00E+00  2.25E-02
 ETA3
+        0.00E+00  0.00E+00  2.25E-02
 ETA4
+        0.00E+00  0.00E+00  0.00E+00  2.25E-02

 SIGMA - COV MATRIX FOR RANDOM EFFECTS - EPSILONS  ****
         EPS1      EPS2
 EPS1
+        2.25E-02
 EPS2
+        0.00E+00  1.00E-04

 OMEGA - CORR MATRIX FOR RANDOM EFFECTS - ETAS  *******
         ETA1      ETA2      ETA3      ETA4
 ETA1
+        1.50E-01
 ETA2
+        0.00E+00  1.50E-01
 ETA3
+        0.00E+00  0.00E+00  1.50E-01
 ETA4
+        0.00E+00  0.00E+00  0.00E+00  1.50E-01

 SIGMA - CORR MATRIX FOR RANDOM EFFECTS - EPSILONS  ***
         EPS1      EPS2
 EPS1
+        1.50E-01
 EPS2
+        0.00E+00  1.00E-02

 ********************        FIRST ORDER CONDITIONAL ESTIMATION WITH INTERACTION: D-OPTIMALITY       ********************
 ********************                            STANDARD ERROR OF ESTIMATE                          ********************

 THETA - VECTOR OF FIXED EFFECTS PARAMETERS   *********
         TH 1      TH 2      TH 3      TH 4
         1.68E-01  2.07E-01  2.61E-01  2.52E-01

 OMEGA - COV MATRIX FOR RANDOM EFFECTS - ETAS  ********
         ETA1      ETA2      ETA3      ETA4
 ETA1
+       .........
 ETA2
+       ......... .........
 ETA3
+       ......... ......... .........
 ETA4
+       ......... ......... ......... .........

 SIGMA - COV MATRIX FOR RANDOM EFFECTS - EPSILONS  ****
         EPS1      EPS2
 EPS1
+        2.35E-02
 EPS2
+       ......... .........

 OMEGA - CORR MATRIX FOR RANDOM EFFECTS - ETAS  *******
         ETA1      ETA2      ETA3      ETA4
 ETA1
+       .........
 ETA2
+       ......... .........
 ETA3
+       ......... ......... .........
 ETA4
+       ......... ......... ......... .........

 SIGMA - CORR MATRIX FOR RANDOM EFFECTS - EPSILONS  ***
         EPS1      EPS2
 EPS1
+        7.83E-02
 EPS2
+       ......... .........

 ********************        FIRST ORDER CONDITIONAL ESTIMATION WITH INTERACTION: D-OPTIMALITY       ********************
 ********************                          COVARIANCE MATRIX OF ESTIMATE                         ********************

     TH 1 | TH 1      TH 2 | TH 1      TH 2 | TH 2      TH 3 | TH 1      TH 3 | TH 2      TH 3 | TH 3      TH 4 | TH 1
     2.81E-02         6.85E-03         4.28E-02         7.64E-03         1.06E-02         6.82E-02         6.36E-03
     TH 4 | TH 2      TH 4 | TH 3      TH 4 | TH 4    SG11 | TH 1      SG11 | TH 2      SG11 | TH 3      SG11 | TH 4
     1.03E-02         2.55E-02         6.33E-02         0.00E+00         0.00E+00         0.00E+00         0.00E+00
   SG11 | SG11
     5.52E-04

 ********************        FIRST ORDER CONDITIONAL ESTIMATION WITH INTERACTION: D-OPTIMALITY       ********************
 ********************                          CORRELATION MATRIX OF ESTIMATE                        ********************

     TH 1 | TH 1      TH 2 | TH 1      TH 2 | TH 2      TH 3 | TH 1      TH 3 | TH 2      TH 3 | TH 3      TH 4 | TH 1
     1.68E-01         1.98E-01         2.07E-01         1.75E-01         1.97E-01         2.61E-01         1.51E-01
     TH 4 | TH 2      TH 4 | TH 3      TH 4 | TH 4    SG11 | TH 1      SG11 | TH 2      SG11 | TH 3      SG11 | TH 4
     1.97E-01         3.89E-01         2.52E-01         0.00E+00         0.00E+00         0.00E+00         0.00E+00
   SG11 | SG11
     2.35E-02
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 Elapsed finaloutput time in seconds:     0.06
 #CPUT: Total CPU Time in Seconds,        2.980
