Thu 04/25/2019
05:32 PM
$PROBLEM WARFARIN
$INPUT ID TIME AMT RATE EVID MDV DV TSTRAT TMIN TMAX
$DATA priortrue.csv ignore=@

$SUBROUTINES ADVAN2 TRANS2

$PK
MU_1=LOG(THETA(1))
MU_2=LOG(THETA(2))
MU_3=LOG(THETA(3))
CL=THETA(1)*EXP(ETA(1))
V=THETA(2)*EXP(ETA(2))
KA=THETA(3)*EXP(ETA(3))
S2=V
F1=1.0
TVCL=THETA(1)
TVV=THETA(2)
TVKA=THETA(3)

$ERROR
IPRED=A(2)/V
Y=IPRED*(1.0+EPS(1)) + EPS(2)

$THETA
0.15 ;[CL]
8.0  ;[V]
1.0  ;[KA]

$OMEGA (0.07 ) (0.02 ) (0.6 )
$SIGMA (0.01 ) (0.0001 FIXED )

$PRIOR NWPRI PLEV=0.99
$THETAP (0.15 FIXED) (0.80 FIXED) (1.0 FIXED)
$THETAPV BLOCK(3) ; 30% CV
0.0025 FIX
0.0   0.07
0.0   0.0   0.11

$SIM (4442223) SUBPROB=100 TRUE=PRIOR
$DESIGN NELDER FIMDIAG=1 GROUPSIZE=32 OFVTYPE=0 DESEL=TIME DESELSTRAT=TSTRAT DESELMIN=TMIN DESELMAX=TMAX
        MAXEVAL=4000 SIGL=10 nohabort PRINT=100 NOPRIOR=1
$TABLE ID TVCL TVV TVKA TIME EVID MDV DV IPRED NOPRINT NOAPPEND FILE=priortrue.tab

NM-TRAN MESSAGES
 WARNINGS AND ERRORS (IF ANY) FOR PROBLEM    1
 (WARNING  2) NM-TRAN INFERS THAT THE DATA ARE POPULATION.
 (MU_WARNING 18) MU_001: USED ON THE RIGHT BUT NOT WITH AN ETA.
 (MU_WARNING 18) MU_002: USED ON THE RIGHT BUT NOT WITH AN ETA.
 (MU_WARNING 18) MU_003: USED ON THE RIGHT BUT NOT WITH AN ETA.

1NONLINEAR MIXED EFFECTS MODEL PROGRAM (NONMEM) VERSION 7.5.0 alpha version 7
 ORIGINALLY DEVELOPED BY STUART BEAL, LEWIS SHEINER, AND ALISON BOECKMANN
 CURRENT DEVELOPERS ARE ROBERT BAUER, ICON DEVELOPMENT SOLUTIONS,
 AND ALISON BOECKMANN. IMPLEMENTATION, EFFICIENCY, AND STANDARDIZATION
 PERFORMED BY NOUS INFOSYSTEMS.
 PROBLEM NO.:         1
 WARFARIN
 TOT. NO. OF OBS RECS:        4
 TOT. NO. OF INDIVIDUALS:        1
 ONE COMPARTMENT MODEL WITH FIRST-ORDER ABSORPTION (ADVAN2)
 PROBLEM NO.:           1      SUBPROBLEM NO.:           1
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 SIMULATION STEP PERFORMED
 Elapsed simulation  time in seconds:     0.01
 #TBLN:      1
 #METH: First Order (No Prior): D-OPTIMALITY
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
 #TERM:
 NO. OF FUNCTION EVALUATIONS USED:      107
0MINIMIZATION SUCCESSFUL

 ETABAR IS THE ARITHMETIC MEAN OF THE ETA-ESTIMATES,
 AND THE P-VALUE IS GIVEN FOR THE NULL HYPOTHESIS THAT THE TRUE MEAN IS 0.

 ETABAR:         0.0000E+00  0.0000E+00  0.0000E+00
 SE:             0.0000E+00  0.0000E+00  0.0000E+00
 N:                       1           1           1

 P VAL.:         1.0000E+00  1.0000E+00  1.0000E+00

 ETASHRINKSD(%)  1.0000E+02  1.0000E+02  1.0000E+02
 ETASHRINKVR(%)  1.0000E+02  1.0000E+02  1.0000E+02
 EBVSHRINKSD(%)  3.8757E+00  2.1986E+01  6.5259E+00
 EBVSHRINKVR(%)  7.6012E+00  3.9138E+01  1.2626E+01
 EPSSHRINKSD(%)  5.0000E+01  5.0000E+01
 EPSSHRINKVR(%)  7.5000E+01  7.5000E+01


 #TERE:
 Elapsed opt. design time in seconds:     0.05
 Elapsed postprocess time in seconds:     0.00

 ********************                       FIRST ORDER (NO PRIOR): D-OPTIMALITY                     ********************
 #OBJT:**************                MINIMUM VALUE OF OBJECTIVE FUNCTION: D-OPTIMALITY               ********************
 #OBJV:********************************************      -50.955       **************************************************

 ********************                       FIRST ORDER (NO PRIOR): D-OPTIMALITY                     ********************
 ********************                             FINAL PARAMETER ESTIMATE                           ********************

 THETA - VECTOR OF FIXED EFFECTS PARAMETERS   *********
         TH 1      TH 2      TH 3
         1.84E-01  8.73E-01  1.42E+00

 OMEGA - COV MATRIX FOR RANDOM EFFECTS - ETAS  ********
         ETA1      ETA2      ETA3
 ETA1
+        7.00E-02
 ETA2
+        0.00E+00  2.00E-02
 ETA3
+        0.00E+00  0.00E+00  6.00E-01

 SIGMA - COV MATRIX FOR RANDOM EFFECTS - EPSILONS  ****
         EPS1      EPS2
 EPS1
+        1.00E-02
 EPS2
+        0.00E+00  1.00E-04

 OMEGA - CORR MATRIX FOR RANDOM EFFECTS - ETAS  *******
         ETA1      ETA2      ETA3
 ETA1
+        2.65E-01
 ETA2
+        0.00E+00  1.41E-01
 ETA3
+        0.00E+00  0.00E+00  7.75E-01

 SIGMA - CORR MATRIX FOR RANDOM EFFECTS - EPSILONS  ***
         EPS1      EPS2
 EPS1
+        1.00E-01
 EPS2
+        0.00E+00  1.00E-02

 ********************                       FIRST ORDER (NO PRIOR): D-OPTIMALITY                     ********************
 ********************                            STANDARD ERROR OF ESTIMATE                          ********************

 THETA - VECTOR OF FIXED EFFECTS PARAMETERS   *********
         TH 1      TH 2      TH 3
         9.24E-03  2.96E-02  2.15E-01

 OMEGA - COV MATRIX FOR RANDOM EFFECTS - ETAS  ********
         ETA1      ETA2      ETA3
 ETA1
+        1.90E-02
 ETA2
+       .........  1.01E-02
 ETA3
+       ......... .........  1.75E-01

 SIGMA - COV MATRIX FOR RANDOM EFFECTS - EPSILONS  ****
         EPS1      EPS2
 EPS1
+        5.77E-03
 EPS2
+       ......... .........

 OMEGA - CORR MATRIX FOR RANDOM EFFECTS - ETAS  *******
         ETA1      ETA2      ETA3
 ETA1
+        3.59E-02
 ETA2
+       .........  3.57E-02
 ETA3
+       ......... .........  1.13E-01

 SIGMA - CORR MATRIX FOR RANDOM EFFECTS - EPSILONS  ***
         EPS1      EPS2
 EPS1
+        2.89E-02
 EPS2
+       ......... .........

 ********************                       FIRST ORDER (NO PRIOR): D-OPTIMALITY                     ********************
 ********************                          COVARIANCE MATRIX OF ESTIMATE                         ********************

     TH 1 | TH 1      TH 2 | TH 1      TH 2 | TH 2      TH 3 | TH 1      TH 3 | TH 2      TH 3 | TH 3    OM11 | TH 1
     8.53E-05         6.62E-05         8.78E-04         2.42E-04         1.51E-03         4.61E-02         0.00E+00
   OM11 | TH 2      OM11 | TH 3      OM11 | OM11      OM22 | TH 1      OM22 | TH 2      OM22 | TH 3      OM22 | OM11
     0.00E+00         0.00E+00         3.61E-04         0.00E+00         0.00E+00         0.00E+00        -1.32E-06
   OM22 | OM22      OM33 | TH 1      OM33 | TH 2      OM33 | TH 3      OM33 | OM11      OM33 | OM22      OM33 | OM33
     1.02E-04         0.00E+00         0.00E+00         0.00E+00         2.73E-05         1.19E-04         3.07E-02
   SG11 | TH 1      SG11 | TH 2      SG11 | TH 3      SG11 | OM11      SG11 | OM22      SG11 | OM33      SG11 | SG11
     0.00E+00         0.00E+00         0.00E+00        -6.33E-06        -3.33E-05        -1.86E-04         3.33E-05

 ********************                       FIRST ORDER (NO PRIOR): D-OPTIMALITY                     ********************
 ********************                          CORRELATION MATRIX OF ESTIMATE                        ********************

     TH 1 | TH 1      TH 2 | TH 1      TH 2 | TH 2      TH 3 | TH 1      TH 3 | TH 2      TH 3 | TH 3    OM11 | TH 1
     9.24E-03         2.42E-01         2.96E-02         1.22E-01         2.38E-01         2.15E-01         0.00E+00
   OM11 | TH 2      OM11 | TH 3      OM11 | OM11      OM22 | TH 1      OM22 | TH 2      OM22 | TH 3      OM22 | OM11
     0.00E+00         0.00E+00         1.90E-02         0.00E+00         0.00E+00         0.00E+00        -6.86E-03
   OM22 | OM22      OM33 | TH 1      OM33 | TH 2      OM33 | TH 3      OM33 | OM11      OM33 | OM22      OM33 | OM33
     1.01E-02         0.00E+00         0.00E+00         0.00E+00         8.20E-03         6.75E-02         1.75E-01
   SG11 | TH 1      SG11 | TH 2      SG11 | TH 3      SG11 | OM11      SG11 | OM22      SG11 | OM33      SG11 | SG11
     0.00E+00         0.00E+00         0.00E+00        -5.77E-02        -5.72E-01        -1.84E-01         5.77E-03
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 Elapsed finaloutput time in seconds:     0.03
 PROBLEM NO.:           1      SUBPROBLEM NO.:           2
 SIMULATION STEP PERFORMED
 Elapsed simulation  time in seconds:     0.01
 #TBLN:      2
 #METH: First Order (No Prior): D-OPTIMALITY
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
 #TERM:
 NO. OF FUNCTION EVALUATIONS USED:      203
0MINIMIZATION SUCCESSFUL

 ETABAR IS THE ARITHMETIC MEAN OF THE ETA-ESTIMATES,
 AND THE P-VALUE IS GIVEN FOR THE NULL HYPOTHESIS THAT THE TRUE MEAN IS 0.

 ETABAR:         0.0000E+00  0.0000E+00  0.0000E+00
 SE:             0.0000E+00  0.0000E+00  0.0000E+00
 N:                       1           1           1

 P VAL.:         1.0000E+00  1.0000E+00  1.0000E+00

 ETASHRINKSD(%)  1.0000E+02  1.0000E+02  1.0000E+02
 ETASHRINKVR(%)  1.0000E+02  1.0000E+02  1.0000E+02
 EBVSHRINKSD(%)  3.4338E+00  2.3120E+01  6.3582E+00
 EBVSHRINKVR(%)  6.7496E+00  4.0894E+01  1.2312E+01
 EPSSHRINKSD(%)  5.0000E+01  5.0000E+01
 EPSSHRINKVR(%)  7.5000E+01  7.5000E+01


 #TERE:
 Elapsed opt. design time in seconds:     0.04
 Elapsed postprocess time in seconds:     0.00

 ********************                       FIRST ORDER (NO PRIOR): D-OPTIMALITY                     ********************
 #OBJT:**************                MINIMUM VALUE OF OBJECTIVE FUNCTION: D-OPTIMALITY               ********************
 #OBJV:********************************************      -52.150       **************************************************

 ********************                       FIRST ORDER (NO PRIOR): D-OPTIMALITY                     ********************
 ********************                             FINAL PARAMETER ESTIMATE                           ********************

 THETA - VECTOR OF FIXED EFFECTS PARAMETERS   *********
         TH 1      TH 2      TH 3
         1.87E-01  7.71E-01  8.33E-01

 OMEGA - COV MATRIX FOR RANDOM EFFECTS - ETAS  ********
         ETA1      ETA2      ETA3
 ETA1
+        7.00E-02
 ETA2
+        0.00E+00  2.00E-02
 ETA3
+        0.00E+00  0.00E+00  6.00E-01

 SIGMA - COV MATRIX FOR RANDOM EFFECTS - EPSILONS  ****
         EPS1      EPS2
 EPS1
+        1.00E-02
 EPS2
+        0.00E+00  1.00E-04

 OMEGA - CORR MATRIX FOR RANDOM EFFECTS - ETAS  *******
         ETA1      ETA2      ETA3
 ETA1
+        2.65E-01
 ETA2
+        0.00E+00  1.41E-01
 ETA3
+        0.00E+00  0.00E+00  7.75E-01

 SIGMA - CORR MATRIX FOR RANDOM EFFECTS - EPSILONS  ***
         EPS1      EPS2
 EPS1
+        1.00E-01
 EPS2
+        0.00E+00  1.00E-02

 ********************                       FIRST ORDER (NO PRIOR): D-OPTIMALITY                     ********************
 ********************                            STANDARD ERROR OF ESTIMATE                          ********************

 THETA - VECTOR OF FIXED EFFECTS PARAMETERS   *********
         TH 1      TH 2      TH 3
         9.34E-03  2.65E-02  1.26E-01

 OMEGA - COV MATRIX FOR RANDOM EFFECTS - ETAS  ********
         ETA1      ETA2      ETA3
 ETA1
+        1.88E-02
 ETA2
+       .........  1.07E-02
 ETA3
+       ......... .........  1.74E-01

 SIGMA - COV MATRIX FOR RANDOM EFFECTS - EPSILONS  ****
         EPS1      EPS2
 EPS1
+        5.87E-03
 EPS2
+       ......... .........

 OMEGA - CORR MATRIX FOR RANDOM EFFECTS - ETAS  *******
         ETA1      ETA2      ETA3
 ETA1
+        3.56E-02
 ETA2
+       .........  3.77E-02
 ETA3
+       ......... .........  1.13E-01

 SIGMA - CORR MATRIX FOR RANDOM EFFECTS - EPSILONS  ***
         EPS1      EPS2
 EPS1
+        2.94E-02
 EPS2
+       ......... .........

 ********************                       FIRST ORDER (NO PRIOR): D-OPTIMALITY                     ********************
 ********************                          COVARIANCE MATRIX OF ESTIMATE                         ********************

     TH 1 | TH 1      TH 2 | TH 1      TH 2 | TH 2      TH 3 | TH 1      TH 3 | TH 2      TH 3 | TH 3    OM0101 | TH 1
     8.72E-05         5.68E-05         7.03E-04         1.27E-04         7.96E-04         1.58E-02         0.00E+00
   OM0101 | TH 2    OM0101 | TH 3    OM0101 | OM0101  OM0202 | TH 1    OM0202 | TH 2    OM0202 | TH 3    OM0202 | OM0101
     0.00E+00         0.00E+00         3.54E-04         0.00E+00         0.00E+00         0.00E+00        -8.24E-07
   OM0202 | OM0202  OM0303 | TH 1    OM0303 | TH 2    OM0303 | TH 3    OM0303 | OM0101  OM0303 | OM0202  OM0303 | OM0303
     1.14E-04         0.00E+00         0.00E+00         0.00E+00         2.77E-05         1.27E-04         3.04E-02
   SG0101 | TH 1    SG0101 | TH 2    SG0101 | TH 3    SG0101 | OM0101  SG0101 | OM0202  SG0101 | OM0303  SG0101 | SG0101
     0.00E+00         0.00E+00         0.00E+00        -5.80E-06        -3.75E-05        -1.83E-04         3.45E-05

 ********************                       FIRST ORDER (NO PRIOR): D-OPTIMALITY                     ********************
 ********************                          CORRELATION MATRIX OF ESTIMATE                        ********************

     TH 1 | TH 1      TH 2 | TH 1      TH 2 | TH 2      TH 3 | TH 1      TH 3 | TH 2      TH 3 | TH 3    OM0101 | TH 1
     9.34E-03         2.30E-01         2.65E-02         1.08E-01         2.39E-01         1.26E-01         0.00E+00
   OM0101 | TH 2    OM0101 | TH 3    OM0101 | OM0101  OM0202 | TH 1    OM0202 | TH 2    OM0202 | TH 3    OM0202 | OM0101
     0.00E+00         0.00E+00         1.88E-02         0.00E+00         0.00E+00         0.00E+00        -4.11E-03
   OM0202 | OM0202  OM0303 | TH 1    OM0303 | TH 2    OM0303 | TH 3    OM0303 | OM0101  OM0303 | OM0202  OM0303 | OM0303
     1.07E-02         0.00E+00         0.00E+00         0.00E+00         8.43E-03         6.84E-02         1.74E-01
   SG0101 | TH 1    SG0101 | TH 2    SG0101 | TH 3    SG0101 | OM0101  SG0101 | OM0202  SG0101 | OM0303  SG0101 | SG0101
     0.00E+00         0.00E+00         0.00E+00        -5.25E-02        -5.99E-01        -1.78E-01         5.87E-03
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 Elapsed finaloutput time in seconds:     0.01
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 #CPUT: Total CPU Time in Seconds,        6.958
