Tue 04/23/2019
12:12 PM
$PROBLEM WARFARIN
$INPUT ID TIME AMT RATE EVID MDV DV TSTRAT TMIN TMAX REPX
$DATA warfarin.csv ignore=C ; REPL=5

$SUBROUTINES ADVAN2 TRANS2

$PK
MU_1=LOG(THETA(1))
MU_2=LOG(THETA(2))
MU_3=LOG(THETA(3))
CL=THETA(1)*EXP(ETA(1))
V=THETA(2)*EXP(ETA(2))
KA=THETA(3)*EXP(ETA(3))
S2=V
F1=1.0

$ERROR
IPRED=A(2)/V
Y=IPRED*(1.0+EPS(1))

$THETA
0.15 ;[CL]
8.0  ;[V]
1.0  ;[KA]

$OMEGA (0.07 ) (0.02) (0.6 )
$SIGMA (0.01 )

;$OMEGA (1.61) (0.46) (13.8)
;$SIGMA (5.714)

$OPTDESIGN MODE=0 FIMDIAG=1 OFVTYPE=0 GROUPSIZE=1.0 NELDER DESEL=TIME DESELSTRAT=TSTRAT DESELMIN=TMIN DESELMAX=TMAX SEED=4455322
$EST METHOD=0 MAXEVAL=0 SIGL=12 nohabort PRINT=10 ; FORMAT=S1PE23.16
$COV MATRIX=R UNCONDITIONAL SIGL=12 CHOLROFF=0
$TABLE ID TIME EVID MDV DV IPRED NOPRINT NOAPPEND VARCALC=3 FILE=warfarin.tab   ; FORMAT=S1PE23.16

NM-TRAN MESSAGES
 WARNINGS AND ERRORS (IF ANY) FOR PROBLEM    1
 (WARNING  2) NM-TRAN INFERS THAT THE DATA ARE POPULATION.

1NONLINEAR MIXED EFFECTS MODEL PROGRAM (NONMEM) VERSION 7.5.0 alpha version 7
 ORIGINALLY DEVELOPED BY STUART BEAL, LEWIS SHEINER, AND ALISON BOECKMANN
 CURRENT DEVELOPERS ARE ROBERT BAUER, ICON DEVELOPMENT SOLUTIONS,
 AND ALISON BOECKMANN. IMPLEMENTATION, EFFICIENCY, AND STANDARDIZATION
 PERFORMED BY NOUS INFOSYSTEMS.
 PROBLEM NO.:         1
 WARFARIN
 TOT. NO. OF OBS RECS:        8
 TOT. NO. OF INDIVIDUALS:        1
 ONE COMPARTMENT MODEL WITH FIRST-ORDER ABSORPTION (ADVAN2)
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 #TBLN:      1
 #METH: First Order (Evaluation): D-OPTIMALITY
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
 #TERM:

 ETABAR IS THE ARITHMETIC MEAN OF THE ETA-ESTIMATES,
 AND THE P-VALUE IS GIVEN FOR THE NULL HYPOTHESIS THAT THE TRUE MEAN IS 0.

 ETABAR:         0.0000E+00  0.0000E+00  0.0000E+00
 SE:             0.0000E+00  0.0000E+00  0.0000E+00
 N:                       1           1           1

 P VAL.:         1.0000E+00  1.0000E+00  1.0000E+00

 ETASHRINKSD(%)  1.0000E+02  1.0000E+02  1.0000E+02
 ETASHRINKVR(%)  1.0000E+02  1.0000E+02  1.0000E+02
 EBVSHRINKSD(%)  1.2059E+00  8.9505E+00  1.4889E+00
 EBVSHRINKVR(%)  2.3973E+00  1.7100E+01  2.9557E+00
 EPSSHRINKSD(%)  2.0943E+01
 EPSSHRINKVR(%)  3.7500E+01


 #TERE:
 Elapsed opt. design time in seconds:     0.23
 Elapsed postprocess time in seconds:     0.02

 ********************                      FIRST ORDER (EVALUATION): D-OPTIMALITY                    ********************
 #OBJT:**************                MINIMUM VALUE OF OBJECTIVE FUNCTION: D-OPTIMALITY               ********************
 #OBJV:********************************************      -28.188       **************************************************

 ********************                      FIRST ORDER (EVALUATION): D-OPTIMALITY                    ********************
 ********************                             FINAL PARAMETER ESTIMATE                           ********************

 THETA - VECTOR OF FIXED EFFECTS PARAMETERS   *********
         TH 1      TH 2      TH 3
         1.50E-01  8.00E+00  1.00E+00

 OMEGA - COV MATRIX FOR RANDOM EFFECTS - ETAS  ********
         ETA1      ETA2      ETA3
 ETA1
+        7.00E-02
 ETA2
+        0.00E+00  2.00E-02
 ETA3
+        0.00E+00  0.00E+00  6.00E-01

 SIGMA - COV MATRIX FOR RANDOM EFFECTS - EPSILONS  ****
         EPS1
 EPS1
+        1.00E-02

 OMEGA - CORR MATRIX FOR RANDOM EFFECTS - ETAS  *******
         ETA1      ETA2      ETA3
 ETA1
+        2.65E-01
 ETA2
+        0.00E+00  1.41E-01
 ETA3
+        0.00E+00  0.00E+00  7.75E-01

 SIGMA - CORR MATRIX FOR RANDOM EFFECTS - EPSILONS  ***
         EPS1
 EPS1
+        1.00E-01

 ********************                      FIRST ORDER (EVALUATION): D-OPTIMALITY                    ********************
 ********************                            STANDARD ERROR OF ESTIMATE                          ********************

 THETA - VECTOR OF FIXED EFFECTS PARAMETERS   *********
         TH 1      TH 2      TH 3
         4.02E-02  1.25E+00  7.88E-01

 OMEGA - COV MATRIX FOR RANDOM EFFECTS - ETAS  ********
         ETA1      ETA2      ETA3
 ETA1
+        1.01E-01
 ETA2
+       .........  3.43E-02
 ETA3
+       ......... .........  8.75E-01

 SIGMA - COV MATRIX FOR RANDOM EFFECTS - EPSILONS  ****
         EPS1
 EPS1
+        6.32E-03

 OMEGA - CORR MATRIX FOR RANDOM EFFECTS - ETAS  *******
         ETA1      ETA2      ETA3
 ETA1
+        1.92E-01
 ETA2
+       .........  1.21E-01
 ETA3
+       ......... .........  5.65E-01

 SIGMA - CORR MATRIX FOR RANDOM EFFECTS - EPSILONS  ***
         EPS1
 EPS1
+        3.16E-02

 ********************                      FIRST ORDER (EVALUATION): D-OPTIMALITY                    ********************
 ********************                          COVARIANCE MATRIX OF ESTIMATE                         ********************

     TH 1 | TH 1      TH 2 | TH 1      TH 2 | TH 2      TH 3 | TH 1      TH 3 | TH 2      TH 3 | TH 3    OM11 | TH 1
     1.62E-03         1.74E-03         1.56E+00         3.30E-04         5.46E-02         6.21E-01         0.00E+00
   OM11 | TH 2      OM11 | TH 3      OM11 | OM11      OM22 | TH 1      OM22 | TH 2      OM22 | TH 3      OM22 | OM11
     0.00E+00         0.00E+00         1.03E-02         0.00E+00         0.00E+00         0.00E+00        -1.32E-06
   OM22 | OM22      OM33 | TH 1      OM33 | TH 2      OM33 | TH 3      OM33 | OM11      OM33 | OM22      OM33 | OM33
     1.18E-03         0.00E+00         0.00E+00         0.00E+00         4.96E-06        -6.42E-05         7.65E-01
   SG11 | TH 1      SG11 | TH 2      SG11 | TH 3      SG11 | OM11      SG11 | OM22      SG11 | OM33      SG11 | SG11
     0.00E+00         0.00E+00         0.00E+00        -6.64E-06        -1.64E-05        -6.66E-05         3.99E-05

 ********************                      FIRST ORDER (EVALUATION): D-OPTIMALITY                    ********************
 ********************                          CORRELATION MATRIX OF ESTIMATE                        ********************

     TH 1 | TH 1      TH 2 | TH 1      TH 2 | TH 2      TH 3 | TH 1      TH 3 | TH 2      TH 3 | TH 3    OM11 | TH 1
     4.02E-02         3.47E-02         1.25E+00         1.04E-02         5.56E-02         7.88E-01         0.00E+00
   OM11 | TH 2      OM11 | TH 3      OM11 | OM11      OM22 | TH 1      OM22 | TH 2      OM22 | TH 3      OM22 | OM11
     0.00E+00         0.00E+00         1.01E-01         0.00E+00         0.00E+00         0.00E+00        -3.78E-04
   OM22 | OM22      OM33 | TH 1      OM33 | TH 2      OM33 | TH 3      OM33 | OM11      OM33 | OM22      OM33 | OM33
     3.43E-02         0.00E+00         0.00E+00         0.00E+00         5.59E-05        -2.14E-03         8.75E-01
   SG11 | TH 1      SG11 | TH 2      SG11 | TH 3      SG11 | OM11      SG11 | OM22      SG11 | OM33      SG11 | SG11
     0.00E+00         0.00E+00         0.00E+00        -1.04E-02        -7.55E-02        -1.20E-02         6.32E-03
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 Elapsed finaloutput time in seconds:     0.11
 #CPUT: Total CPU Time in Seconds,        0.047
