Tue 04/23/2019
12:12 PM
$PROBLEM WARFARIN
$INPUT ID TIME AMT RATE EVID MDV DV TSTRAT TMIN TMAX
$DATA warfarin_opt.csv ignore=@

$SUBROUTINES ADVAN2 TRANS2

$PK
MU_1=LOG(THETA(1))
MU_2=LOG(THETA(2))
MU_3=LOG(THETA(3))
CL=THETA(1)*EXP(ETA(1))
V=THETA(2)*EXP(ETA(2))
KA=THETA(3)*EXP(ETA(3))
S2=V
F1=1.0

$ERROR
IPRED=A(2)/V
Y=IPRED*(1.0+EPS(1)) + EPS(2)

$THETA
0.15 ;[CL]
8.0  ;[V]
1.0  ;[KA]

;$OMEGA (0.0049) (0.0004) (0.36)
;$SIGMA (0.0001)

$OMEGA (0.07 ) (0.02 ) (0.6 )
$SIGMA (0.01 ) (0.0001 FIXED )

$DESIGN RS FIMDIAG=1 GROUPSIZE=32 OFVTYPE=0 DESEL=TIME DESELSTRAT=TSTRAT DESELMIN=TMIN DESELMAX=TMAX
        MAXEVAL=4000 SIGL=10 nohabort PRINT=1000
$TABLE ID TIME EVID MDV DV IPRED NOPRINT NOAPPEND FILE=warfarin_optimize.tab  FORMAT=S1PE23.16
$TABLE ID TIME AMT RATE EVID MDV DV TSTRAT TMIN TMAX NOPRINT NOHEADER NOAPPEND FILE=warfarin_1.CSV  FORMAT=S1PE23.16

$PROBLEM WARFARIN #2
$INPUT ID TIME AMT RATE EVID MDV DV TSTRAT TMIN TMAX
;$DATA warfarin_opt.csv REWIND IGNORE=@
$DATA warfarin_1.csv NOOPEN
(1X,10(1X1PE23.16))

$THETA
0.15 ;[CL]
8.0  ;[V]
1.0  ;[KA]

;$OMEGA (0.0049) (0.0004) (0.36)
;$SIGMA (0.0001)

$OMEGA (0.07 ) (0.02 ) (0.6 )
$SIGMA (0.01 ) (0.0001 FIXED )

$DESIGN NELDER FIMDIAG=1 GROUPSIZE=32 OFVTYPE=0 DESEL=TIME DESELSTRAT=TSTRAT DESELMIN=TMIN DESELMAX=TMAX
        MAXEVAL=4000 SIGL=10 nohabort PRINT=100
$TABLE ID TIME EVID MDV DV IPRED NOPRINT NOAPPEND FILE=warfarin_optimize2.tab  FORMAT=S1PE23.16
$TABLE ID TIME AMT RATE EVID MDV DV TSTRAT TMIN TMAX NOPRINT NOAPPEND FILE=warfarin_nelder.CSV  FORMAT=S1PE23.16

NM-TRAN MESSAGES
 WARNINGS AND ERRORS (IF ANY) FOR PROBLEM    1
 (WARNING  2) NM-TRAN INFERS THAT THE DATA ARE POPULATION.
 WARNINGS AND ERRORS (IF ANY) FOR PROBLEM    2
 (WARNING  2) NM-TRAN INFERS THAT THE DATA ARE POPULATION.

1NONLINEAR MIXED EFFECTS MODEL PROGRAM (NONMEM) VERSION 7.5.0 alpha version 7
 ORIGINALLY DEVELOPED BY STUART BEAL, LEWIS SHEINER, AND ALISON BOECKMANN
 CURRENT DEVELOPERS ARE ROBERT BAUER, ICON DEVELOPMENT SOLUTIONS,
 AND ALISON BOECKMANN. IMPLEMENTATION, EFFICIENCY, AND STANDARDIZATION
 PERFORMED BY NOUS INFOSYSTEMS.
 PROBLEM NO.:         1
 WARFARIN
 TOT. NO. OF OBS RECS:        8
 TOT. NO. OF INDIVIDUALS:        1
 ONE COMPARTMENT MODEL WITH FIRST-ORDER ABSORPTION (ADVAN2)
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 #TBLN:      1
 #METH: First Order: D-OPTIMALITY
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
0R MATRIX ALGORITHMICALLY SINGULAR
 AND ALGORITHMICALLY NON-POSITIVE-SEMIDEFINITE
0COVARIANCE STEP ABORTED
 ITERATION NO.:       1000    OBJECTIVE VALUE:  -52.7449880194277        NO. OF FUNC. EVALS.:        1001
 ITERATION NO.:       2000    OBJECTIVE VALUE:  -52.7692440684477        NO. OF FUNC. EVALS.:        2001
 ITERATION NO.:       3000    OBJECTIVE VALUE:  -52.7693448079587        NO. OF FUNC. EVALS.:        3001
 ITERATION NO.:       4000    OBJECTIVE VALUE:  -52.7693816585190        NO. OF FUNC. EVALS.:        4001


 #TERM:
 NO. OF FUNCTION EVALUATIONS USED:        0
0MINIMIZATION SUCCESSFUL

 ETABAR IS THE ARITHMETIC MEAN OF THE ETA-ESTIMATES,
 AND THE P-VALUE IS GIVEN FOR THE NULL HYPOTHESIS THAT THE TRUE MEAN IS 0.

 ETABAR:         0.0000E+00  0.0000E+00  0.0000E+00
 SE:             0.0000E+00  0.0000E+00  0.0000E+00
 N:                       1           1           1

 P VAL.:         1.0000E+00  1.0000E+00  1.0000E+00

 ETASHRINKSD(%)  1.0000E+02  1.0000E+02  1.0000E+02
 ETASHRINKVR(%)  1.0000E+02  1.0000E+02  1.0000E+02
 EBVSHRINKSD(%)  1.5558E+00  4.1741E+00  1.0149E+00
 EBVSHRINKVR(%)  3.0874E+00  8.1740E+00  2.0195E+00
 EPSSHRINKSD(%)  2.0943E+01  2.0943E+01
 EPSSHRINKVR(%)  3.7500E+01  3.7500E+01


 #TERE:
 Elapsed opt. design time in seconds:     1.09
 Elapsed postprocess time in seconds:     0.00

 ********************                            FIRST ORDER: D-OPTIMALITY                           ********************
 #OBJT:**************                MINIMUM VALUE OF OBJECTIVE FUNCTION: D-OPTIMALITY               ********************
 #OBJV:********************************************      -52.769       **************************************************

 ********************                            FIRST ORDER: D-OPTIMALITY                           ********************
 ********************                             FINAL PARAMETER ESTIMATE                           ********************

 THETA - VECTOR OF FIXED EFFECTS PARAMETERS   *********
         TH 1      TH 2      TH 3
         1.50E-01  8.00E+00  1.00E+00

 OMEGA - COV MATRIX FOR RANDOM EFFECTS - ETAS  ********
         ETA1      ETA2      ETA3
 ETA1
+        7.00E-02
 ETA2
+        0.00E+00  2.00E-02
 ETA3
+        0.00E+00  0.00E+00  6.00E-01

 SIGMA - COV MATRIX FOR RANDOM EFFECTS - EPSILONS  ****
         EPS1      EPS2
 EPS1
+        1.00E-02
 EPS2
+        0.00E+00  1.00E-04

 OMEGA - CORR MATRIX FOR RANDOM EFFECTS - ETAS  *******
         ETA1      ETA2      ETA3
 ETA1
+        2.65E-01
 ETA2
+        0.00E+00  1.41E-01
 ETA3
+        0.00E+00  0.00E+00  7.75E-01

 SIGMA - CORR MATRIX FOR RANDOM EFFECTS - EPSILONS  ***
         EPS1      EPS2
 EPS1
+        1.00E-01
 EPS2
+        0.00E+00  1.00E-02

 ********************                            FIRST ORDER: D-OPTIMALITY                           ********************
 ********************                            STANDARD ERROR OF ESTIMATE                          ********************

 THETA - VECTOR OF FIXED EFFECTS PARAMETERS   *********
         TH 1      TH 2      TH 3
         7.13E-03  2.09E-01  1.38E-01

 OMEGA - COV MATRIX FOR RANDOM EFFECTS - ETAS  ********
         ETA1      ETA2      ETA3
 ETA1
+        1.81E-02
 ETA2
+       .........  5.46E-03
 ETA3
+       ......... .........  1.53E-01

 SIGMA - COV MATRIX FOR RANDOM EFFECTS - EPSILONS  ****
         EPS1      EPS2
 EPS1
+        1.12E-03
 EPS2
+       ......... .........

 OMEGA - CORR MATRIX FOR RANDOM EFFECTS - ETAS  *******
         ETA1      ETA2      ETA3
 ETA1
+        3.41E-02
 ETA2
+       .........  1.93E-02
 ETA3
+       ......... .........  9.89E-02

 SIGMA - CORR MATRIX FOR RANDOM EFFECTS - EPSILONS  ***
         EPS1      EPS2
 EPS1
+        5.59E-03
 EPS2
+       ......... .........

 ********************                            FIRST ORDER: D-OPTIMALITY                           ********************
 ********************                          COVARIANCE MATRIX OF ESTIMATE                         ********************

     TH 1 | TH 1      TH 2 | TH 1      TH 2 | TH 2      TH 3 | TH 1      TH 3 | TH 2      TH 3 | TH 3    OM11 | TH 1
     5.08E-05         2.91E-05         4.37E-02         3.04E-06         4.44E-04         1.91E-02         0.00E+00
   OM11 | TH 2      OM11 | TH 3      OM11 | OM11      OM22 | TH 1      OM22 | TH 2      OM22 | TH 3      OM22 | OM11
     0.00E+00         0.00E+00         3.27E-04         0.00E+00         0.00E+00         0.00E+00         1.27E-08
   OM22 | OM22      OM33 | TH 1      OM33 | TH 2      OM33 | TH 3      OM33 | OM11      OM33 | OM22      OM33 | OM33
     2.98E-05         0.00E+00         0.00E+00         0.00E+00         3.14E-07         7.56E-08         2.35E-02
   SG11 | TH 1      SG11 | TH 2      SG11 | TH 3      SG11 | OM11      SG11 | OM22      SG11 | OM33      SG11 | SG11
     0.00E+00         0.00E+00         0.00E+00        -2.78E-07        -2.25E-07        -1.50E-06         1.25E-06

 ********************                            FIRST ORDER: D-OPTIMALITY                           ********************
 ********************                          CORRELATION MATRIX OF ESTIMATE                        ********************

     TH 1 | TH 1      TH 2 | TH 1      TH 2 | TH 2      TH 3 | TH 1      TH 3 | TH 2      TH 3 | TH 3    OM11 | TH 1
     7.13E-03         1.95E-02         2.09E-01         3.08E-03         1.54E-02         1.38E-01         0.00E+00
   OM11 | TH 2      OM11 | TH 3      OM11 | OM11      OM22 | TH 1      OM22 | TH 2      OM22 | TH 3      OM22 | OM11
     0.00E+00         0.00E+00         1.81E-02         0.00E+00         0.00E+00         0.00E+00         1.28E-04
   OM22 | OM22      OM33 | TH 1      OM33 | TH 2      OM33 | TH 3      OM33 | OM11      OM33 | OM22      OM33 | OM33
     5.46E-03         0.00E+00         0.00E+00         0.00E+00         1.13E-04         9.05E-05         1.53E-01
   SG11 | TH 1      SG11 | TH 2      SG11 | TH 3      SG11 | OM11      SG11 | OM22      SG11 | OM33      SG11 | SG11
     0.00E+00         0.00E+00         0.00E+00        -1.38E-02        -3.69E-02        -8.78E-03         1.12E-03
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 Elapsed finaloutput time in seconds:     0.05

 PROBLEM NO.:         2
 WARFARIN #2
 TOT. NO. OF DATA RECS:         9
 TOT. NO. OF OBS RECS:        8
 TOT. NO. OF INDIVIDUALS:        1
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 #TBLN:      2
 #METH: First Order: D-OPTIMALITY
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
 #TERM:
 NO. OF FUNCTION EVALUATIONS USED:      162
0MINIMIZATION SUCCESSFUL

 ETABAR IS THE ARITHMETIC MEAN OF THE ETA-ESTIMATES,
 AND THE P-VALUE IS GIVEN FOR THE NULL HYPOTHESIS THAT THE TRUE MEAN IS 0.

 ETABAR:         0.0000E+00  0.0000E+00  0.0000E+00
 SE:             0.0000E+00  0.0000E+00  0.0000E+00
 N:                       1           1           1

 P VAL.:         1.0000E+00  1.0000E+00  1.0000E+00

 ETASHRINKSD(%)  1.0000E+02  1.0000E+02  1.0000E+02
 ETASHRINKVR(%)  1.0000E+02  1.0000E+02  1.0000E+02
 EBVSHRINKSD(%)  1.5550E+00  4.1750E+00  1.0143E+00
 EBVSHRINKVR(%)  3.0857E+00  8.1757E+00  2.0182E+00
 EPSSHRINKSD(%)  2.0943E+01  2.0943E+01
 EPSSHRINKVR(%)  3.7500E+01  3.7500E+01


 #TERE:
 Elapsed opt. design time in seconds:     0.05
 Elapsed postprocess time in seconds:     0.00

 ********************                            FIRST ORDER: D-OPTIMALITY                           ********************
 #OBJT:**************                MINIMUM VALUE OF OBJECTIVE FUNCTION: D-OPTIMALITY               ********************
 #OBJV:********************************************      -52.769       **************************************************

 ********************                            FIRST ORDER: D-OPTIMALITY                           ********************
 ********************                             FINAL PARAMETER ESTIMATE                           ********************

 THETA - VECTOR OF FIXED EFFECTS PARAMETERS   *********
         TH 1      TH 2      TH 3
         1.50E-01  8.00E+00  1.00E+00

 OMEGA - COV MATRIX FOR RANDOM EFFECTS - ETAS  ********
         ETA1      ETA2      ETA3
 ETA1
+        7.00E-02
 ETA2
+        0.00E+00  2.00E-02
 ETA3
+        0.00E+00  0.00E+00  6.00E-01

 SIGMA - COV MATRIX FOR RANDOM EFFECTS - EPSILONS  ****
         EPS1      EPS2
 EPS1
+        1.00E-02
 EPS2
+        0.00E+00  1.00E-04

 OMEGA - CORR MATRIX FOR RANDOM EFFECTS - ETAS  *******
         ETA1      ETA2      ETA3
 ETA1
+        2.65E-01
 ETA2
+        0.00E+00  1.41E-01
 ETA3
+        0.00E+00  0.00E+00  7.75E-01

 SIGMA - CORR MATRIX FOR RANDOM EFFECTS - EPSILONS  ***
         EPS1      EPS2
 EPS1
+        1.00E-01
 EPS2
+        0.00E+00  1.00E-02

 ********************                            FIRST ORDER: D-OPTIMALITY                           ********************
 ********************                            STANDARD ERROR OF ESTIMATE                          ********************

 THETA - VECTOR OF FIXED EFFECTS PARAMETERS   *********
         TH 1      TH 2      TH 3
         7.13E-03  2.09E-01  1.38E-01

 OMEGA - COV MATRIX FOR RANDOM EFFECTS - ETAS  ********
         ETA1      ETA2      ETA3
 ETA1
+        1.81E-02
 ETA2
+       .........  5.46E-03
 ETA3
+       ......... .........  1.53E-01

 SIGMA - COV MATRIX FOR RANDOM EFFECTS - EPSILONS  ****
         EPS1      EPS2
 EPS1
+        1.12E-03
 EPS2
+       ......... .........

 OMEGA - CORR MATRIX FOR RANDOM EFFECTS - ETAS  *******
         ETA1      ETA2      ETA3
 ETA1
+        3.41E-02
 ETA2
+       .........  1.93E-02
 ETA3
+       ......... .........  9.89E-02

 SIGMA - CORR MATRIX FOR RANDOM EFFECTS - EPSILONS  ***
         EPS1      EPS2
 EPS1
+        5.59E-03
 EPS2
+       ......... .........

 ********************                            FIRST ORDER: D-OPTIMALITY                           ********************
 ********************                          COVARIANCE MATRIX OF ESTIMATE                         ********************

     TH 1 | TH 1      TH 2 | TH 1      TH 2 | TH 2      TH 3 | TH 1      TH 3 | TH 2      TH 3 | TH 3    OM11 | TH 1
     5.08E-05         2.91E-05         4.37E-02         3.03E-06         4.44E-04         1.91E-02         0.00E+00
   OM11 | TH 2      OM11 | TH 3      OM11 | OM11      OM22 | TH 1      OM22 | TH 2      OM22 | TH 3      OM22 | OM11
     0.00E+00         0.00E+00         3.27E-04         0.00E+00         0.00E+00         0.00E+00         1.28E-08
   OM22 | OM22      OM33 | TH 1      OM33 | TH 2      OM33 | TH 3      OM33 | OM11      OM33 | OM22      OM33 | OM33
     2.98E-05         0.00E+00         0.00E+00         0.00E+00         3.14E-07         7.64E-08         2.35E-02
   SG11 | TH 1      SG11 | TH 2      SG11 | TH 3      SG11 | OM11      SG11 | OM22      SG11 | OM33      SG11 | SG11
     0.00E+00         0.00E+00         0.00E+00        -2.78E-07        -2.25E-07        -1.51E-06         1.25E-06

 ********************                            FIRST ORDER: D-OPTIMALITY                           ********************
 ********************                          CORRELATION MATRIX OF ESTIMATE                        ********************

     TH 1 | TH 1      TH 2 | TH 1      TH 2 | TH 2      TH 3 | TH 1      TH 3 | TH 2      TH 3 | TH 3    OM11 | TH 1
     7.13E-03         1.95E-02         2.09E-01         3.07E-03         1.54E-02         1.38E-01         0.00E+00
   OM11 | TH 2      OM11 | TH 3      OM11 | OM11      OM22 | TH 1      OM22 | TH 2      OM22 | TH 3      OM22 | OM11
     0.00E+00         0.00E+00         1.81E-02         0.00E+00         0.00E+00         0.00E+00         1.30E-04
   OM22 | OM22      OM33 | TH 1      OM33 | TH 2      OM33 | TH 3      OM33 | OM11      OM33 | OM22      OM33 | OM33
     5.46E-03         0.00E+00         0.00E+00         0.00E+00         1.14E-04         9.14E-05         1.53E-01
   SG11 | TH 1      SG11 | TH 2      SG11 | TH 3      SG11 | OM11      SG11 | OM22      SG11 | OM33      SG11 | SG11
     0.00E+00         0.00E+00         0.00E+00        -1.38E-02        -3.69E-02        -8.81E-03         1.12E-03
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 Elapsed finaloutput time in seconds:     0.02
 #CPUT: Total CPU Time in Seconds,        1.092
