Tue 04/23/2019
12:12 PM
$PROBLEM WARFARIN
$INPUT ID TIME AMT RATE EVID MDV DV TSTRAT TMIN TMAX
$DATA warfarin_opt.csv ignore=@

$SUBROUTINES ADVAN2 TRANS2

$PK
MU_1=LOG(THETA(1))
MU_2=LOG(THETA(2))
MU_3=LOG(THETA(3))
CL=THETA(1)*EXP(ETA(1))
V=THETA(2)*EXP(ETA(2))
KA=THETA(3)*EXP(ETA(3))
S2=V
F1=1.0

$ERROR
IPRED=A(2)/V
Y=IPRED*(1.0+EPS(1)) + EPS(2)

$THETA
0.15 ;[CL]
8.0  ;[V]
1.0  ;[KA]

;$OMEGA (0.0049) (0.0004) (0.36)
;$SIGMA (0.0001)

$OMEGA (0.07 ) (0.02 ) (0.6 )
$SIGMA (0.01 ) (0.0001 FIXED )

$DESIGN RS FIMDIAG=1 GROUPSIZE=32 OFVTYPE=0
           APPROX=FOI SIGL=10 NOHABORT PRINT=100 MAXEVAL=400
           DESEL=TIME DESELSTRAT=TSTRAT DESELMIN=TMIN DESELMAX=TMAX
$DESIGN STGR DESEL=TIME DESELSTRAT=TSTRAT DESELMIN=TMIN DESELMAX=TMAX
$DESIGN NELDER DESEL=TIME DESELSTRAT=TSTRAT DESELMIN=TMIN DESELMAX=TMAX
$TABLE ID TIME EVID MDV DV IPRED NOPRINT NOAPPEND FILE=warfarin_optimize3.tab  FORMAT=S1PE23.16

NM-TRAN MESSAGES
 WARNINGS AND ERRORS (IF ANY) FOR PROBLEM    1
 (WARNING  2) NM-TRAN INFERS THAT THE DATA ARE POPULATION.

1NONLINEAR MIXED EFFECTS MODEL PROGRAM (NONMEM) VERSION 7.5.0 alpha version 7
 ORIGINALLY DEVELOPED BY STUART BEAL, LEWIS SHEINER, AND ALISON BOECKMANN
 CURRENT DEVELOPERS ARE ROBERT BAUER, ICON DEVELOPMENT SOLUTIONS,
 AND ALISON BOECKMANN. IMPLEMENTATION, EFFICIENCY, AND STANDARDIZATION
 PERFORMED BY NOUS INFOSYSTEMS.
 PROBLEM NO.:         1
 WARFARIN
 TOT. NO. OF OBS RECS:        8
 TOT. NO. OF INDIVIDUALS:        1
 ONE COMPARTMENT MODEL WITH FIRST-ORDER ABSORPTION (ADVAN2)
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 #TBLN:      1
 #METH: First Order with Interaction: D-OPTIMALITY
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
 #TERM:
 NO. OF FUNCTION EVALUATIONS USED:        0
0MINIMIZATION SUCCESSFUL

 ETABAR IS THE ARITHMETIC MEAN OF THE ETA-ESTIMATES,
 AND THE P-VALUE IS GIVEN FOR THE NULL HYPOTHESIS THAT THE TRUE MEAN IS 0.

 ETABAR:         0.0000E+00  0.0000E+00  0.0000E+00
 SE:             0.0000E+00  0.0000E+00  0.0000E+00
 N:                       1           1           1

 P VAL.:         1.0000E+00  1.0000E+00  1.0000E+00

 ETASHRINKSD(%)  1.0000E+02  1.0000E+02  1.0000E+02
 ETASHRINKVR(%)  1.0000E+02  1.0000E+02  1.0000E+02
 EBVSHRINKSD(%)  1.2241E+00  6.0169E+00  6.6553E-01
 EBVSHRINKVR(%)  2.4333E+00  1.1672E+01  1.3266E+00
 EPSSHRINKSD(%)  2.0943E+01  2.0943E+01
 EPSSHRINKVR(%)  3.7500E+01  3.7500E+01


 #TERE:
 Elapsed opt. design time in seconds:     0.17
 #TBLN:      2
 #METH: First Order with Interaction: D-OPTIMALITY
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
 #TERM:
 NO. OF FUNCTION EVALUATIONS USED:     6801
0MINIMIZATION TERMINATED
  DUE TO MAXIMUM NUMBER OF ITERATIONS EXCEEDED

 ETABAR IS THE ARITHMETIC MEAN OF THE ETA-ESTIMATES,
 AND THE P-VALUE IS GIVEN FOR THE NULL HYPOTHESIS THAT THE TRUE MEAN IS 0.

 ETABAR:         0.0000E+00  0.0000E+00  0.0000E+00
 SE:             0.0000E+00  0.0000E+00  0.0000E+00
 N:                       1           1           1

 P VAL.:         1.0000E+00  1.0000E+00  1.0000E+00

 ETASHRINKSD(%)  1.0000E+02  1.0000E+02  1.0000E+02
 ETASHRINKVR(%)  1.0000E+02  1.0000E+02  1.0000E+02
 EBVSHRINKSD(%)  1.1069E+00  5.9799E+00  6.5223E-01
 EBVSHRINKVR(%)  2.2016E+00  1.1602E+01  1.3002E+00
 EPSSHRINKSD(%)  2.0943E+01  2.0943E+01
 EPSSHRINKVR(%)  3.7500E+01  3.7500E+01


 #TERE:
 Elapsed opt. design time in seconds:    14.07
 #TBLN:      3
 #METH: First Order with Interaction: D-OPTIMALITY
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
 #TERM:
 NO. OF FUNCTION EVALUATIONS USED:      187
0MINIMIZATION SUCCESSFUL

 ETABAR IS THE ARITHMETIC MEAN OF THE ETA-ESTIMATES,
 AND THE P-VALUE IS GIVEN FOR THE NULL HYPOTHESIS THAT THE TRUE MEAN IS 0.

 ETABAR:         0.0000E+00  0.0000E+00  0.0000E+00
 SE:             0.0000E+00  0.0000E+00  0.0000E+00
 N:                       1           1           1

 P VAL.:         1.0000E+00  1.0000E+00  1.0000E+00

 ETASHRINKSD(%)  1.0000E+02  1.0000E+02  1.0000E+02
 ETASHRINKVR(%)  1.0000E+02  1.0000E+02  1.0000E+02
 EBVSHRINKSD(%)  1.1069E+00  5.9800E+00  6.5199E-01
 EBVSHRINKVR(%)  2.2016E+00  1.1602E+01  1.2997E+00
 EPSSHRINKSD(%)  2.0943E+01  2.0943E+01
 EPSSHRINKVR(%)  3.7500E+01  3.7500E+01


 #TERE:
 Elapsed opt. design time in seconds:     0.06
 Elapsed postprocess time in seconds:     0.00

 ********************                    FIRST ORDER WITH INTERACTION: D-OPTIMALITY                  ********************
 #OBJT:**************                MINIMUM VALUE OF OBJECTIVE FUNCTION: D-OPTIMALITY               ********************
 #OBJV:********************************************      -52.818       **************************************************

 ********************                    FIRST ORDER WITH INTERACTION: D-OPTIMALITY                  ********************
 ********************                             FINAL PARAMETER ESTIMATE                           ********************

 THETA - VECTOR OF FIXED EFFECTS PARAMETERS   *********
         TH 1      TH 2      TH 3
         1.50E-01  8.00E+00  1.00E+00

 OMEGA - COV MATRIX FOR RANDOM EFFECTS - ETAS  ********
         ETA1      ETA2      ETA3
 ETA1
+        7.00E-02
 ETA2
+        0.00E+00  2.00E-02
 ETA3
+        0.00E+00  0.00E+00  6.00E-01

 SIGMA - COV MATRIX FOR RANDOM EFFECTS - EPSILONS  ****
         EPS1      EPS2
 EPS1
+        1.00E-02
 EPS2
+        0.00E+00  1.00E-04

 OMEGA - CORR MATRIX FOR RANDOM EFFECTS - ETAS  *******
         ETA1      ETA2      ETA3
 ETA1
+        2.65E-01
 ETA2
+        0.00E+00  1.41E-01
 ETA3
+        0.00E+00  0.00E+00  7.75E-01

 SIGMA - CORR MATRIX FOR RANDOM EFFECTS - EPSILONS  ***
         EPS1      EPS2
 EPS1
+        1.00E-01
 EPS2
+        0.00E+00  1.00E-02

 ********************                    FIRST ORDER WITH INTERACTION: D-OPTIMALITY                  ********************
 ********************                            STANDARD ERROR OF ESTIMATE                          ********************

 THETA - VECTOR OF FIXED EFFECTS PARAMETERS   *********
         TH 1      TH 2      TH 3
         7.12E-03  2.13E-01  1.38E-01

 OMEGA - COV MATRIX FOR RANDOM EFFECTS - ETAS  ********
         ETA1      ETA2      ETA3
 ETA1
+        1.75E-02
 ETA2
+       .........  5.69E-03
 ETA3
+       ......... .........  1.45E-01

 SIGMA - COV MATRIX FOR RANDOM EFFECTS - EPSILONS  ****
         EPS1      EPS2
 EPS1
+        1.15E-03
 EPS2
+       ......... .........

 OMEGA - CORR MATRIX FOR RANDOM EFFECTS - ETAS  *******
         ETA1      ETA2      ETA3
 ETA1
+        3.30E-02
 ETA2
+       .........  2.01E-02
 ETA3
+       ......... .........  9.37E-02

 SIGMA - CORR MATRIX FOR RANDOM EFFECTS - EPSILONS  ***
         EPS1      EPS2
 EPS1
+        5.74E-03
 EPS2
+       ......... .........

 ********************                    FIRST ORDER WITH INTERACTION: D-OPTIMALITY                  ********************
 ********************                          COVARIANCE MATRIX OF ESTIMATE                         ********************

     TH 1 | TH 1      TH 2 | TH 1      TH 2 | TH 2      TH 3 | TH 1      TH 3 | TH 2      TH 3 | TH 3    OM11 | TH 1
     5.07E-05         5.10E-05         4.55E-02         6.11E-06         7.02E-04         1.91E-02         0.00E+00
   OM11 | TH 2      OM11 | TH 3      OM11 | OM11      OM22 | TH 1      OM22 | TH 2      OM22 | TH 3      OM22 | OM11
     0.00E+00         0.00E+00         3.05E-04         0.00E+00         0.00E+00         0.00E+00         3.53E-07
   OM22 | OM22      OM33 | TH 1      OM33 | TH 2      OM33 | TH 3      OM33 | OM11      OM33 | OM22      OM33 | OM33
     3.24E-05         0.00E+00         0.00E+00         0.00E+00         4.93E-05         7.66E-06         2.11E-02
   SG11 | TH 1      SG11 | TH 2      SG11 | TH 3      SG11 | OM11      SG11 | OM22      SG11 | OM33      SG11 | SG11
     0.00E+00         0.00E+00         0.00E+00        -2.51E-06        -6.18E-07        -2.59E-05         1.32E-06

 ********************                    FIRST ORDER WITH INTERACTION: D-OPTIMALITY                  ********************
 ********************                          CORRELATION MATRIX OF ESTIMATE                        ********************

     TH 1 | TH 1      TH 2 | TH 1      TH 2 | TH 2      TH 3 | TH 1      TH 3 | TH 2      TH 3 | TH 3    OM11 | TH 1
     7.12E-03         3.36E-02         2.13E-01         6.21E-03         2.38E-02         1.38E-01         0.00E+00
   OM11 | TH 2      OM11 | TH 3      OM11 | OM11      OM22 | TH 1      OM22 | TH 2      OM22 | TH 3      OM22 | OM11
     0.00E+00         0.00E+00         1.75E-02         0.00E+00         0.00E+00         0.00E+00         3.55E-03
   OM22 | OM22      OM33 | TH 1      OM33 | TH 2      OM33 | TH 3      OM33 | OM11      OM33 | OM22      OM33 | OM33
     5.69E-03         0.00E+00         0.00E+00         0.00E+00         1.94E-02         9.27E-03         1.45E-01
   SG11 | TH 1      SG11 | TH 2      SG11 | TH 3      SG11 | OM11      SG11 | OM22      SG11 | OM33      SG11 | SG11
     0.00E+00         0.00E+00         0.00E+00        -1.25E-01        -9.45E-02        -1.56E-01         1.15E-03
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 Elapsed finaloutput time in seconds:     0.06
 #CPUT: Total CPU Time in Seconds,        2.480
