Tue 04/23/2019
12:13 PM
$PROBLEM WARFARIN
$INPUT ID TIME AMT RATE EVID MDV DV TSTRAT TMIN TMAX
$DATA warfarin_pfim.csv ignore=C

$SUBROUTINES ADVAN2 TRANS1

$PK
KA=THETA(1)*EXP(ETA(1))
K=THETA(2)*EXP(ETA(2))
V=THETA(3)*EXP(ETA(3))
S2=V
F1=1.0

$ERROR
IPRED=A(2)/V
;W=THETA(4)+THETA(5)*IPRED
;Y=IPRED + W*EPS(1)
Y=IPRED + EPS(1) + IPRED*EPS(2)

$THETA
2.0 ;[KA]
0.25  ;[K]
15.0  ;[V]
;0.5  ; [siga]
;0.15 ; [SIGP]

$OMEGA (1.0) (0.25) (0.10)
;$SIGMA (1.0 FIXED)
$SIGMA 0.25 0.0225

$DESIGN GROUPSIZE=200 FIMTYPE=1 VARCROSS=1 APPROX=FO

NM-TRAN MESSAGES
 WARNINGS AND ERRORS (IF ANY) FOR PROBLEM    1
 (WARNING  2) NM-TRAN INFERS THAT THE DATA ARE POPULATION.

1NONLINEAR MIXED EFFECTS MODEL PROGRAM (NONMEM) VERSION 7.5.0 alpha version 7
 ORIGINALLY DEVELOPED BY STUART BEAL, LEWIS SHEINER, AND ALISON BOECKMANN
 CURRENT DEVELOPERS ARE ROBERT BAUER, ICON DEVELOPMENT SOLUTIONS,
 AND ALISON BOECKMANN. IMPLEMENTATION, EFFICIENCY, AND STANDARDIZATION
 PERFORMED BY NOUS INFOSYSTEMS.
 PROBLEM NO.:         1
 WARFARIN
 TOT. NO. OF OBS RECS:        4
 TOT. NO. OF INDIVIDUALS:        1
 ONE COMPARTMENT MODEL WITH FIRST-ORDER ABSORPTION (ADVAN2)
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 #TBLN:      1
 #METH: First Order (Evaluation): D-OPTIMALITY
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
 #TERM:

 ETABAR IS THE ARITHMETIC MEAN OF THE ETA-ESTIMATES,
 AND THE P-VALUE IS GIVEN FOR THE NULL HYPOTHESIS THAT THE TRUE MEAN IS 0.

 ETABAR:         0.0000E+00  0.0000E+00  0.0000E+00
 SE:             0.0000E+00  0.0000E+00  0.0000E+00
 N:                       1           1           1

 P VAL.:         1.0000E+00  1.0000E+00  1.0000E+00

 ETASHRINKSD(%)  1.0000E+02  1.0000E+02  1.0000E+02
 ETASHRINKVR(%)  1.0000E+02  1.0000E+02  1.0000E+02
 EBVSHRINKSD(%)  1.1953E+01  1.8978E+01  2.4989E+01
 EBVSHRINKVR(%)  2.2478E+01  3.4355E+01  4.3733E+01
 EPSSHRINKSD(%)  5.0000E+01  5.0000E+01
 EPSSHRINKVR(%)  7.5000E+01  7.5000E+01


 #TERE:
 Elapsed opt. design time in seconds:     0.01
 Elapsed postprocess time in seconds:     0.00

 ********************                      FIRST ORDER (EVALUATION): D-OPTIMALITY                    ********************
 #OBJT:**************                MINIMUM VALUE OF OBJECTIVE FUNCTION: D-OPTIMALITY               ********************
 #OBJV:********************************************      -49.535       **************************************************

 ********************                      FIRST ORDER (EVALUATION): D-OPTIMALITY                    ********************
 ********************                             FINAL PARAMETER ESTIMATE                           ********************

 THETA - VECTOR OF FIXED EFFECTS PARAMETERS   *********
         TH 1      TH 2      TH 3
         2.00E+00  2.50E-01  1.50E+01

 OMEGA - COV MATRIX FOR RANDOM EFFECTS - ETAS  ********
         ETA1      ETA2      ETA3
 ETA1
+        1.00E+00
 ETA2
+        0.00E+00  2.50E-01
 ETA3
+        0.00E+00  0.00E+00  1.00E-01

 SIGMA - COV MATRIX FOR RANDOM EFFECTS - EPSILONS  ****
         EPS1      EPS2
 EPS1
+        2.50E-01
 EPS2
+        0.00E+00  2.25E-02

 OMEGA - CORR MATRIX FOR RANDOM EFFECTS - ETAS  *******
         ETA1      ETA2      ETA3
 ETA1
+        1.00E+00
 ETA2
+        0.00E+00  5.00E-01
 ETA3
+        0.00E+00  0.00E+00  3.16E-01

 SIGMA - CORR MATRIX FOR RANDOM EFFECTS - EPSILONS  ***
         EPS1      EPS2
 EPS1
+        5.00E-01
 EPS2
+        0.00E+00  1.50E-01

 ********************                      FIRST ORDER (EVALUATION): D-OPTIMALITY                    ********************
 ********************                            STANDARD ERROR OF ESTIMATE                          ********************

 THETA - VECTOR OF FIXED EFFECTS PARAMETERS   *********
         TH 1      TH 2      TH 3
         1.75E-01  1.24E-02  5.23E-01

 OMEGA - COV MATRIX FOR RANDOM EFFECTS - ETAS  ********
         ETA1      ETA2      ETA3
 ETA1
+        1.32E-01
 ETA2
+       .........  3.98E-02
 ETA3
+       ......... .........  1.93E-02

 SIGMA - COV MATRIX FOR RANDOM EFFECTS - EPSILONS  ****
         EPS1      EPS2
 EPS1
+        4.08E-02
 EPS2
+       .........  6.88E-03

 OMEGA - CORR MATRIX FOR RANDOM EFFECTS - ETAS  *******
         ETA1      ETA2      ETA3
 ETA1
+        6.60E-02
 ETA2
+       .........  3.98E-02
 ETA3
+       ......... .........  3.06E-02

 SIGMA - CORR MATRIX FOR RANDOM EFFECTS - EPSILONS  ***
         EPS1      EPS2
 EPS1
+        4.08E-02
 EPS2
+       .........  2.29E-02

 ********************                      FIRST ORDER (EVALUATION): D-OPTIMALITY                    ********************
 ********************                          COVARIANCE MATRIX OF ESTIMATE                         ********************

     TH 1 | TH 1      TH 2 | TH 1      TH 2 | TH 2      TH 3 | TH 1      TH 3 | TH 2      TH 3 | TH 3    OM11 | TH 1
     3.06E-02        -6.15E-04         1.54E-04         3.30E-02        -2.89E-03         2.73E-01         0.00E+00
   OM11 | TH 2      OM11 | TH 3      OM11 | OM11      OM22 | TH 1      OM22 | TH 2      OM22 | TH 3      OM22 | OM11
     0.00E+00         0.00E+00         1.74E-02         0.00E+00         0.00E+00         0.00E+00         4.70E-06
   OM22 | OM22      OM33 | TH 1      OM33 | TH 2      OM33 | TH 3      OM33 | OM11      OM33 | OM22      OM33 | OM33
     1.58E-03         0.00E+00         0.00E+00         0.00E+00        -4.36E-05        -1.01E-04         3.74E-04
   SG11 | TH 1      SG11 | TH 2      SG11 | TH 3      SG11 | OM11      SG11 | OM22      SG11 | OM33      SG11 | SG11
     0.00E+00         0.00E+00         0.00E+00         1.00E-04        -2.96E-04         1.01E-04         1.66E-03
   SG22 | TH 1      SG22 | TH 2      SG22 | TH 3      SG22 | OM11      SG22 | OM22      SG22 | OM33      SG22 | SG11
     0.00E+00         0.00E+00         0.00E+00        -1.17E-04         1.57E-05        -4.12E-05        -1.91E-04
   SG22 | SG22
     4.74E-05

 ********************                      FIRST ORDER (EVALUATION): D-OPTIMALITY                    ********************
 ********************                          CORRELATION MATRIX OF ESTIMATE                        ********************

     TH 1 | TH 1      TH 2 | TH 1      TH 2 | TH 2      TH 3 | TH 1      TH 3 | TH 2      TH 3 | TH 3    OM11 | TH 1
     1.75E-01        -2.84E-01         1.24E-02         3.61E-01        -4.47E-01         5.23E-01         0.00E+00
   OM11 | TH 2      OM11 | TH 3      OM11 | OM11      OM22 | TH 1      OM22 | TH 2      OM22 | TH 3      OM22 | OM11
     0.00E+00         0.00E+00         1.32E-01         0.00E+00         0.00E+00         0.00E+00         8.95E-04
   OM22 | OM22      OM33 | TH 1      OM33 | TH 2      OM33 | TH 3      OM33 | OM11      OM33 | OM22      OM33 | OM33
     3.98E-02         0.00E+00         0.00E+00         0.00E+00        -1.71E-02        -1.31E-01         1.93E-02
   SG11 | TH 1      SG11 | TH 2      SG11 | TH 3      SG11 | OM11      SG11 | OM22      SG11 | OM33      SG11 | SG11
     0.00E+00         0.00E+00         0.00E+00         1.86E-02        -1.82E-01         1.29E-01         4.08E-02
   SG22 | TH 1      SG22 | TH 2      SG22 | TH 3      SG22 | OM11      SG22 | OM22      SG22 | OM33      SG22 | SG11
     0.00E+00         0.00E+00         0.00E+00        -1.28E-01         5.74E-02        -3.10E-01        -6.82E-01
   SG22 | SG22
     6.88E-03
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 Elapsed finaloutput time in seconds:     0.02
 #CPUT: Total CPU Time in Seconds,        0.047
