Fri 02/08/2019
12:47 PM
;$SIZES MAXNRDS=1 PAST_SIZE=10000
$PROBLEM RA
$ABBR DERIV2=NO DERIV2=NOCOMMON DES=FULL ; DERIV1=NO
$INPUT ID TIME  AMT  RATE II ADDL CMT  EVID MDV  DV
$DATA simpleDii16_2d.csv IGNORE=C
$SUBROUTINES ADVAN16 TOL=10 ATOL=10 SSTOL=6 SSATOL=6
$MODEL NCOMPARTMENTS=4

$PK
ADDLA=ADDL_ACTUAL
ADDLTIME=ADDL_TIME
TSTATEW=TSTATE
DOSTIMW=DOSTIM
MXSTEP=200000000
K10=THETA(1)+ETA(1)
K12=THETA(2)+ETA(2)
K21=THETA(3)+ETA(3)
V1=1.0
S1=V1
IF(ADDL_TIMEDIFF/=0.0.AND.MTIME(1)==0.0) THEN
MTIME(1)=812.5+ADDL_TIMEDIFF
MTDIFF=1
ELSE
MTIME(1)=MTIME(1)
ENDIF
KEO=THETA(4)
K40=THETA(5)
TAU1=THETA(6)
" AQ=0.0

$DES
PASTZERO=0.0
 AP_1_1=0.0

 DADT(1)=-K10*A(1)-K12*A(1)+K21*A(2)
 DADT(2)=K12*A(1)-K21*A(2)
 DADT(3)=KEO*A(1)-KEO*AD_1_1
 DADT(4)=KEO*AD_1_1-K40*A(4)

 AQ=AD_1_1

$ERROR

IPRED=A(1)/V1
Y=IPRED*(1.0+EPS(1))
A1=A(1)
A2=A(2)
A3=A(3)
A4=A(4)
A5=0.0
" A5=AQ

$THETA
0.17 ; [K10]
0.37 ; [K12]
0.25 ; [K21]
0.2   ; KEO
0.05  ; K40
4.0 ; [TAU1]

$OMEGA (0.0 FIXED) (0.0 FIXED) (0.0 FIXED)
$SIGMA (0.0 FIXED)

$SIMULATION (567811 NORMAL) ONLYSIMULATION SUBPROBLEMS=1

$TABLE ID DOSTIMW TIME ADDLTIME TSTATEW A1 A4 A5 ADDL ADDLA NOAPPEND NOPRINT ONEHEADER
FILE=simpledii16_2d.tab FORMAT=s1PE10.3

NM-TRAN MESSAGES
 WARNINGS AND ERRORS (IF ANY) FOR PROBLEM    1
 (WARNING  2) NM-TRAN INFERS THAT THE DATA ARE POPULATION.
 (WARNING  83) FUNCTIONS ARE USED IN ABBREVIATED CODE, BUT THE $SUBROUTINES
 RECORD DOES NOT INCLUDE THE "OTHER" OPTION.

1NONLINEAR MIXED EFFECTS MODEL PROGRAM (NONMEM) VERSION 7.5.0 alpha version 7
 ORIGINALLY DEVELOPED BY STUART BEAL, LEWIS SHEINER, AND ALISON BOECKMANN
 CURRENT DEVELOPERS ARE ROBERT BAUER, ICON DEVELOPMENT SOLUTIONS,
 AND ALISON BOECKMANN. IMPLEMENTATION, EFFICIENCY, AND STANDARDIZATION
 PERFORMED BY NOUS INFOSYSTEMS.
 PROBLEM NO.:         1
 RA
 TOT. NO. OF OBS RECS:       52
 TOT. NO. OF INDIVIDUALS:        1
 GENERAL NONLINEAR KINETICS MODEL WITH STIFF/NONSTIFF AND DELAY EQUATIONS (RADAR5, ADVAN16)
 PROBLEM NO.:           1      SUBPROBLEM NO.:           1
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 SIMULATION STEP PERFORMED
 Elapsed simulation  time in seconds:     0.05
 Elapsed finaloutput time in seconds:     0.01
 #CPUT: Total CPU Time in Seconds,        0.125
