Wed 09/18/2019
11:50 AM
$PROBLEM Stan model
$DATA full3.csv IGNORE=@
$INPUT DV TIME MDV EVID AMT CMT DRUG SARM ID

$THETAI
THETA(4:5)=LOG(EXP(THETAI(4:5))+1.0)
THETA(9:10)=LOG(EXP(THETAI(9:10))+1.0)

$THETAR
THETAR(4:5)=LOG(EXP(THETA(4:5))-1.0)
THETAR(9:10)=LOG(EXP(THETA(9:10))-1.0)

$PRED
ALPHAC=50.0
; MU REFERENCE NEEDED TO do Gibbs sampling
LALPHA0=THETA(1)
LALPHAS=THETA(2)
LKAPPA=THETA(3)
LEMAX1=THETA(4)
LEMAX2=THETA(5)
STIM=0.0
IF(SARM==2) STIM=LEMAX1
IF(SARM==3) STIM=LEMAX2
MU_1=LALPHA0
MU_2=(LKAPPA+LALPHAS)/2.0+STIM
MU_3=(LKAPPA-LALPHAS)/2.0
G0=ALPHAC*EXP(MU_1+ETA(1))
KIN=EXP(MU_2+ETA(2))
KOUT=EXP(MU_3+ETA(3))
ALPHA=KIN/KOUT
F=ALPHA+(G0-ALPHA)*EXP(-KOUT*TIME)
Y=F+EPS(1)

$THETA 0.01 4.0 -5.0 -1.1 -1.6

$OMEGA BLOCK(3) VALUES(0.5,0.001)

$SIGMA 25.0

$PRIOR NWPRI

$THETAP (0.0 FIXED) (3.738 FIXED) (-4.451 FIXED) (-1.386 FIXED) (-1.386 FIXED)

$THETAPV BLOCK(5)
0.0086529 FIXED
0.0 0.042795
0.0 0.0 0.125065
0.0 0.0 0.0  0.67427
0.0 0.0 0.0  0.0   0.67427

$OMEGAP BLOCK(3)
0.011 FIX
0.0  0.161
0.0  0.0 0.041

$OMEGAPD (4 FIX)

$SIGMAP BLOCK(1)
16.0 FIX

$SIGMAPD (2 FIX)

$EST METHOD=BAYES NBURN=1000 NITER=0 PRINT=50 MASSRESET=1 file=stanrb_178_beys.ext
     OLKJDF=6 OSAMPLE_M1=1 PKAPPA=0.75
$EST METHOD=NUTS NBURN=500 NITER=500 PRINT=20 file=stanrb_178.ext
     OLKJDF=6.0 MASSRESET=0 PKAPPA=1.0

NM-TRAN MESSAGES
 WARNINGS AND ERRORS (IF ANY) FOR PROBLEM    1
 (WARNING  2) NM-TRAN INFERS THAT THE DATA ARE POPULATION.
 (WARNING  121) INTERACTION IS IMPLIED WITH EM/BAYES ESTIMATION METHODS
 (MU_WARNING 6) THETA(003): SHOULD BE ASSOCIATED WITH ONLY ONE MU_.
 (MU_WARNING 6) THETA(002): SHOULD BE ASSOCIATED WITH ONLY ONE MU_.

1NONLINEAR MIXED EFFECTS MODEL PROGRAM (NONMEM) VERSION 7.5.0 alpha version 9
 ORIGINALLY DEVELOPED BY STUART BEAL, LEWIS SHEINER, AND ALISON BOECKMANN
 CURRENT DEVELOPERS ARE ROBERT BAUER, ICON DEVELOPMENT SOLUTIONS,
 AND ALISON BOECKMANN. IMPLEMENTATION, EFFICIENCY, AND STANDARDIZATION
 PERFORMED BY NOUS INFOSYSTEMS.
 PROBLEM NO.:         1
 Stan model
 TOT. NO. OF OBS RECS:     9000
 TOT. NO. OF INDIVIDUALS:      900
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 #TBLN:      1
 #METH: MCMC Bayesian Analysis
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
 #TERM:
 BURN-IN WAS NOT TESTED FOR CONVERGENCE
 STATISTICAL PORTION WAS NOT PERFORMED

 ETABAR IS THE ARITHMETIC MEAN OF THE ETA-ESTIMATES,
 AND THE P-VALUE IS GIVEN FOR THE NULL HYPOTHESIS THAT THE TRUE MEAN IS 0.

 ETABAR:         8.8871E-04 -3.9544E-03  5.8599E-03
 SE:             3.3659E-03  1.3705E-02  6.7136E-03
 N:                     900         900         900

 P VAL.:         7.9176E-01  7.7294E-01  3.8275E-01

 ETASHRINKSD(%)  1.0000E-10  1.0000E-10  3.6918E+00
 ETASHRINKVR(%)  1.0000E-10  1.0000E-10  7.2473E+00
 EBVSHRINKSD(%)         NaN         NaN         NaN
 EBVSHRINKVR(%)         NaN         NaN         NaN
 EPSSHRINKSD(%)  1.0000E-10
 EPSSHRINKVR(%)  1.0000E-10


 TOTAL DATA POINTS NORMALLY DISTRIBUTED (N):         9000
 N*LOG(2PI) CONSTANT TO OBJECTIVE FUNCTION:    16540.8935976841
 OBJECTIVE FUNCTION VALUE WITHOUT CONSTANT:    27086.0605517604
 OBJECTIVE FUNCTION VALUE WITH CONSTANT:       43626.9541494445
 REPORTED OBJECTIVE FUNCTION DOES NOT CONTAIN CONSTANT

 TOTAL EFFECTIVE ETAS (NIND*NETA):                          2700
 NIND*NETA*LOG(2PI) CONSTANT TO OBJECTIVE FUNCTION:    4962.26807930523
 OBJECTIVE FUNCTION VALUE WITHOUT CONSTANT:    27086.0605517604
 OBJECTIVE FUNCTION VALUE WITH CONSTANT:       32048.3286310656
 REPORTED OBJECTIVE FUNCTION DOES NOT CONTAIN CONSTANT

 PRIOR CONSTANT TO OBJECTIVE FUNCTION:   -10.0300439664667
 OBJECTIVE FUNCTION VALUE WITHOUT CONSTANT:    27086.0605517604
 OBJECTIVE FUNCTION VALUE WITH CONSTANT:       27076.0305077939
 REPORTED OBJECTIVE FUNCTION DOES NOT CONTAIN CONSTANT


 #TERE:
 Elapsed estimation  time in seconds:   378.98

 ********************                              MCMC BAYESIAN ANALYSIS                            ********************
 #OBJT:**************                       AVERAGE VALUE OF LIKELIHOOD FUNCTION                     ********************
 #OBJV:********************************************    27086.061       **************************************************
 #OBJS:********************************************        0.000 (STD) **************************************************

 ********************                              MCMC BAYESIAN ANALYSIS                            ********************
 ********************                             FINAL PARAMETER ESTIMATE                           ********************

 THETA - VECTOR OF FIXED EFFECTS PARAMETERS   *********
         TH 1      TH 2      TH 3      TH 4      TH 5
        -7.43E-03  3.69E+00 -5.00E+00 -9.02E-01 -1.21E+00

 OMEGA - COV MATRIX FOR RANDOM EFFECTS - ETAS  ********
         ETA1      ETA2      ETA3
 ETA1
+        9.85E-03
 ETA2
+        2.24E-02  1.59E-01
 ETA3
+       -5.06E-04 -4.78E-02  4.38E-02

 SIGMA - COV MATRIX FOR RANDOM EFFECTS - EPSILONS  ****
         EPS1
 EPS1
+        1.58E+01

 OMEGA - CORR MATRIX FOR RANDOM EFFECTS - ETAS  *******
         ETA1      ETA2      ETA3
 ETA1
+        9.93E-02
 ETA2
+        5.67E-01  3.98E-01
 ETA3
+       -2.43E-02 -5.73E-01  2.09E-01

 SIGMA - CORR MATRIX FOR RANDOM EFFECTS - EPSILONS  ***
         EPS1
 EPS1
+        3.97E+00
 #TBLN:      2
 #METH: NUTS Bayesian Analysis
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
 #TERM:
 BURN-IN WAS NOT TESTED FOR CONVERGENCE
 STATISTICAL PORTION WAS COMPLETED

 ETABAR IS THE ARITHMETIC MEAN OF THE ETA-ESTIMATES,
 AND THE P-VALUE IS GIVEN FOR THE NULL HYPOTHESIS THAT THE TRUE MEAN IS 0.

 ETABAR:        -3.7047E-04 -1.3486E-03 -1.8483E-04
 SE:             2.9344E-03  1.3636E-02  5.6303E-03
 N:                     900         900         900

 P VAL.:         8.9953E-01  9.2122E-01  9.7381E-01

 ETASHRINKSD(%)  1.3563E+01  3.5232E+00  1.6470E+01
 ETASHRINKVR(%)  2.5286E+01  6.9223E+00  3.0228E+01
 EBVSHRINKSD(%)  1.3625E+01  3.7424E+00  1.6921E+01
 EBVSHRINKVR(%)  2.5394E+01  7.3448E+00  3.0979E+01
 EPSSHRINKSD(%)  9.0585E+00
 EPSSHRINKVR(%)  1.7296E+01


 TOTAL DATA POINTS NORMALLY DISTRIBUTED (N):         9000
 N*LOG(2PI) CONSTANT TO OBJECTIVE FUNCTION:    16540.8935976841
 OBJECTIVE FUNCTION VALUE WITHOUT CONSTANT:    27026.4984961368
 OBJECTIVE FUNCTION VALUE WITH CONSTANT:       43567.3920938209
 REPORTED OBJECTIVE FUNCTION DOES NOT CONTAIN CONSTANT

 TOTAL EFFECTIVE ETAS (NIND*NETA):                          2700
 NIND*NETA*LOG(2PI) CONSTANT TO OBJECTIVE FUNCTION:    4962.26807930523
 OBJECTIVE FUNCTION VALUE WITHOUT CONSTANT:    27026.4984961368
 OBJECTIVE FUNCTION VALUE WITH CONSTANT:       31988.7665754420
 REPORTED OBJECTIVE FUNCTION DOES NOT CONTAIN CONSTANT

 PRIOR CONSTANT TO OBJECTIVE FUNCTION:   -10.0300439664667
 OBJECTIVE FUNCTION VALUE WITHOUT CONSTANT:    27026.4984961368
 OBJECTIVE FUNCTION VALUE WITH CONSTANT:       27016.4684521703
 REPORTED OBJECTIVE FUNCTION DOES NOT CONTAIN CONSTANT


 #TERE:
 Elapsed estimation  time in seconds:  1761.95
 Elapsed covariance  time in seconds:     0.00

 ********************                              NUTS BAYESIAN ANALYSIS                            ********************
 #OBJT:**************                       AVERAGE VALUE OF LIKELIHOOD FUNCTION                     ********************
 #OBJV:********************************************    27026.498       **************************************************
 #OBJS:********************************************      312.833 (STD) **************************************************

 ********************                              NUTS BAYESIAN ANALYSIS                            ********************
 ********************                             FINAL PARAMETER ESTIMATE                           ********************

 THETA - VECTOR OF FIXED EFFECTS PARAMETERS   *********
         TH 1      TH 2      TH 3      TH 4      TH 5
        -2.43E-03  3.68E+00 -5.03E+00 -9.86E-01 -1.13E+00

 OMEGA - COV MATRIX FOR RANDOM EFFECTS - ETAS  ********
         ETA1      ETA2      ETA3
 ETA1
+        1.04E-02
 ETA2
+        2.64E-02  1.80E-01
 ETA3
+       -7.55E-05 -4.50E-02  4.09E-02

 SIGMA - COV MATRIX FOR RANDOM EFFECTS - EPSILONS  ****
         EPS1
 EPS1
+        1.58E+01

 OMEGA - CORR MATRIX FOR RANDOM EFFECTS - ETAS  *******
         ETA1      ETA2      ETA3
 ETA1
+        1.02E-01
 ETA2
+        6.11E-01  4.24E-01
 ETA3
+       -4.64E-03 -5.29E-01  2.02E-01

 SIGMA - CORR MATRIX FOR RANDOM EFFECTS - EPSILONS  ***
         EPS1
 EPS1
+        3.98E+00

 ********************                              NUTS BAYESIAN ANALYSIS                            ********************
 ********************                STANDARD ERROR OF ESTIMATE (From Sample Variance)               ********************

 THETA - VECTOR OF FIXED EFFECTS PARAMETERS   *********
         TH 1      TH 2      TH 3      TH 4      TH 5
         4.02E-03  2.72E-02  4.18E-02  1.47E-01  1.57E-01

 OMEGA - COV MATRIX FOR RANDOM EFFECTS - ETAS  ********
         ETA1      ETA2      ETA3
 ETA1
+        6.75E-04
 ETA2
+        2.51E-03  1.23E-02
 ETA3
+        1.44E-03  4.79E-03  5.54E-03

 SIGMA - COV MATRIX FOR RANDOM EFFECTS - EPSILONS  ****
         EPS1
 EPS1
+        2.80E-01

 OMEGA - CORR MATRIX FOR RANDOM EFFECTS - ETAS  *******
         ETA1      ETA2      ETA3
 ETA1
+        3.31E-03
 ETA2
+        4.08E-02  1.44E-02
 ETA3
+        7.02E-02  7.28E-02  1.38E-02

 SIGMA - CORR MATRIX FOR RANDOM EFFECTS - EPSILONS  ***
         EPS1
 EPS1
+        3.52E-02

 ********************                              NUTS BAYESIAN ANALYSIS                            ********************
 ********************               COVARIANCE MATRIX OF ESTIMATE (From Sample Variance)             ********************

            TH 1      TH 2      TH 3      TH 4      TH 5      OM11      OM12      OM13      OM22      OM23      OM33      SG11
 TH 1
+        1.62E-05
 TH 2
+        2.51E-05  7.38E-04
 TH 3
+        2.40E-05  4.79E-04  1.75E-03
 TH 4
+        4.81E-05 -2.59E-03 -2.15E-03  2.17E-02
 TH 5
+       -7.65E-06 -2.60E-03 -2.56E-03  1.07E-02  2.48E-02
 OM11
+       -3.72E-07 -9.30E-07 -5.89E-06  2.23E-06  4.26E-06  4.56E-07
 OM12
+       -4.86E-07  4.94E-06 -3.37E-05 -3.44E-05 -4.12E-05  9.58E-07  6.30E-06
 OM13
+        3.78E-07 -1.73E-06 -5.26E-06 -9.01E-07 -5.38E-07  7.94E-08  9.72E-07  2.09E-06
 OM22
+       -5.98E-06  1.17E-05 -1.79E-04 -1.43E-04 -8.47E-05  1.89E-06  1.80E-05  4.56E-07  1.51E-04
 OM23
+       -1.37E-06 -3.45E-07 -1.53E-05 -3.54E-05  3.87E-05 -1.42E-07  9.32E-07  3.03E-06  1.09E-06  2.29E-05
 OM33
+        4.21E-07  6.49E-06  2.46E-05 -3.04E-05  2.28E-05  2.85E-08  8.34E-07  1.19E-06 -8.51E-06  4.13E-06  3.07E-05
 SG11
+        5.13E-05 -3.87E-04 -1.94E-04  1.61E-03 -1.21E-03 -2.43E-05 -2.54E-05 -3.26E-05 -6.29E-05 -2.44E-05 -7.07E-05  7.86E-02

 ********************                              NUTS BAYESIAN ANALYSIS                            ********************
 ********************              CORRELATION MATRIX OF ESTIMATE (From Sample Variance)             ********************

            TH 1      TH 2      TH 3      TH 4      TH 5      OM11      OM12      OM13      OM22      OM23      OM33      SG11
 TH 1
+        4.02E-03
 TH 2
+        2.30E-01  2.72E-02
 TH 3
+        1.42E-01  4.22E-01  4.18E-02
 TH 4
+        8.13E-02 -6.49E-01 -3.49E-01  1.47E-01
 TH 5
+       -1.21E-02 -6.07E-01 -3.88E-01  4.63E-01  1.57E-01
 OM11
+       -1.37E-01 -5.07E-02 -2.09E-01  2.25E-02  4.01E-02  6.75E-04
 OM12
+       -4.81E-02  7.24E-02 -3.21E-01 -9.31E-02 -1.04E-01  5.65E-01  2.51E-03
 OM13
+        6.51E-02 -4.42E-02 -8.71E-02 -4.24E-03 -2.37E-03  8.14E-02  2.68E-01  1.44E-03
 OM22
+       -1.21E-01  3.52E-02 -3.48E-01 -7.91E-02 -4.38E-02  2.28E-01  5.83E-01  2.57E-02  1.23E-02
 OM23
+       -7.12E-02 -2.65E-03 -7.62E-02 -5.02E-02  5.13E-02 -4.38E-02  7.75E-02  4.38E-01  1.84E-02  4.79E-03
 OM33
+        1.89E-02  4.31E-02  1.06E-01 -3.72E-02  2.61E-02  7.61E-03  5.99E-02  1.49E-01 -1.25E-01  1.55E-01  5.54E-03
 SG11
+        4.55E-02 -5.08E-02 -1.65E-02  3.90E-02 -2.75E-02 -1.28E-01 -3.61E-02 -8.07E-02 -1.83E-02 -1.82E-02 -4.55E-02  2.80E-01
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 Elapsed postprocess time in seconds:     0.00
 Elapsed finaloutput time in seconds:     0.00
 #CPUT: Total CPU Time in Seconds,     2055.142
