$PROB RUN# Example 1 (from samp5l)
$INPUT ID TIME  DV=CONC AMT=DOSE RATE EVID MDV CMT SID CID
$DATA superid2.csv

$SUBROUTINES ADVAN1 TRANS2

$PK
MU_5=THETA(1)
MU_6=THETA(2)
CL=DEXP(MU_5+ETA(5)+ETA(1)+ETA(3))
V=DEXP(MU_6+ETA(6)+ETA(2)+ETA(4))
S1=V

$ERROR
Y = F + F*EPS(1)

; Initial values of THETA
$THETA 5.0 5
$OMEGA BLOCK(2)
0.03
0.00001 0.03

;$OMEGA 0.03 0.03
$OMEGA BLOCK(2)
0.1
0.00001 0.1

$OMEGA BLOCK(2)
0.3
0.00001 0.3

$SIGMA
0.1

$LEVEL
SID=(3[1],4[2])
CID=(5[3],6[4])

$EST METHOD=ITS INTERACTION PRINT=1 NSIG=2 NITER=500 SIGL=6 FNLETA=0 NOABORT MCETA=2 CTYPE=3
     LEVCENTER=0
$COV MATRIX=R UNCONDITIONAL
$TABLE  ID TIME CONC DOSE RATE EVID MDV CMT SID CID CL V ETA1 ETA2 ETA3 ETA4 ETA5 ETA6
NOAPPEND ONEHEADER FILE=superid2_1.tab  NOPRINT
$TABLE  ID SID CID CL V ETA1 ETA2 ETA3 ETA4 ETA5 ETA6 NOAPPEND ONEHEADER FILE=superid2_1.dat FIRSTONLY NOPRINT FORMAT=,1PE15.8
