Thu 12/12/2019
05:46 PM
$PROB RUN# Example 1 (from samp5l)
$INPUT ID TIME  DV=CONC AMT=DOSE RATE EVID MDV CMT SID CID
$DATA superid2.csv

$SUBROUTINES ADVAN1 TRANS2

$PK
MU_5=THETA(1)
MU_6=THETA(2)
CL=DEXP(MU_5+ETA(5)+ETA(3)+ETA(1))
V=DEXP(MU_6+ETA(6)+ETA(4)+ETA(2))
S1=V

$ERROR
Y = F + F*EPS(1)

; Initial values of THETA
$THETA 5.0 5.0
;$OMEGA 0.02 0.02 0.0 FIXED 0.0 FIXED 0.0 FIXED 0.0 FIXED
$OMEGA BLOCK(2)
0.1
0.00001 0.1

$OMEGA BLOCK(2)
0.3
0.00001 0.3

$OMEGA BLOCK(2)
1.0
0.00001 1.0

$SIGMA
0.1

$LEVEL
SID=(3[1],4[2])
CID=(5[3],6[4])

$EST METHOD=ITS INTERACTION PRINT=1 NSIG=3 NITER=12 SIGL=6 FNLETA=0 MCETA=3 NOABORT
     LEVCENTER=0
$EST METHOD=1 INTERACTION PRINT=1 MAXEVAL=9999 NSIG=2 FNLETA=0 NOHABORT  SIGL=10 MCETA=10 SLOW
$COV MATRIX=R UNCONDITIONAL
$TABLE  ID TIME CONC DOSE RATE EVID MDV CMT SID CID ETA1 ETA2 ETA3 ETA4 ETA5 ETA6
NOAPPEND ONEHEADER FILE=superid2_4.tab  NOPRINT

NM-TRAN MESSAGES
 WARNINGS AND ERRORS (IF ANY) FOR PROBLEM    1
 (WARNING  126) ONLY THE LAST FNLETA LISTED IN THE SERIES OF $EST RECORDS FOR
 THIS PROBLEM WILL BE USED
 (WARNING  2) NM-TRAN INFERS THAT THE DATA ARE POPULATION.
 (MU_WARNING 12) MU_005: SHOULD NOT BE ASSOCIATED WITH ETA(001)
 (MU_WARNING 12) MU_005: SHOULD NOT BE ASSOCIATED WITH ETA(003)
 (MU_WARNING 11) MU_005: SHOULD NOT BE ASSOCIATED WITH MORE THAN ONE ETA.
 (MU_WARNING 22) MU_005: HAS ALREADY BEEN MU_ ASSOCIATED, CANNOT BE USED AGAIN.
 (MU_WARNING 12) MU_006: SHOULD NOT BE ASSOCIATED WITH ETA(002)
 (MU_WARNING 12) MU_006: SHOULD NOT BE ASSOCIATED WITH ETA(004)
 (MU_WARNING 11) MU_006: SHOULD NOT BE ASSOCIATED WITH MORE THAN ONE ETA.
 (MU_WARNING 22) MU_006: HAS ALREADY BEEN MU_ ASSOCIATED, CANNOT BE USED AGAIN.

1NONLINEAR MIXED EFFECTS MODEL PROGRAM (NONMEM) VERSION 7.5.0 Beta version 3
 ORIGINALLY DEVELOPED BY STUART BEAL, LEWIS SHEINER, AND ALISON BOECKMANN
 CURRENT DEVELOPERS ARE ROBERT BAUER, ICON DEVELOPMENT SOLUTIONS,
 AND ALISON BOECKMANN. IMPLEMENTATION, EFFICIENCY, AND STANDARDIZATION
 PERFORMED BY NOUS INFOSYSTEMS.
 PROBLEM NO.:         1
 RUN# Example 1 (from samp5l)
 TOT. NO. OF OBS RECS:    17500
 TOT. NO. OF INDIVIDUALS:     2500
 ONE COMPARTMENT MODEL (ADVAN1)
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 #TBLN:      1
 #METH: Iterative Two Stage
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
 #TERM:
 OPTIMIZATION WAS NOT TESTED FOR CONVERGENCE

 ETABAR IS THE ARITHMETIC MEAN OF THE ETA-ESTIMATES,
 AND THE P-VALUE IS GIVEN FOR THE NULL HYPOTHESIS THAT THE TRUE MEAN IS 0.

 ETABAR:        -4.4097E-04 -3.7267E-04  2.4758E-18 -1.3511E-17 -2.8633E-05 -1.4818E-05
 SE:             1.6251E-03  1.6972E-03  9.8784E-03  1.0698E-02  6.1634E-02  5.5496E-02
 N:                    2500        2500         250         250          25          25

 P VAL.:         7.8613E-01  8.2620E-01  1.0000E+00  1.0000E+00  9.9963E-01  9.9979E-01

 ETASHRINKSD(%)  1.1937E+01  1.1857E+01  4.0864E-05  3.7107E-05  3.6573E-05  2.9959E-05
 ETASHRINKVR(%)  2.2450E+01  2.2308E+01  8.1728E-05  7.4214E-05  7.3146E-05  5.9918E-05
 EBVSHRINKSD(%)  1.1934E+01  1.1855E+01  0.0000E+00  0.0000E+00  0.0000E+00  0.0000E+00
 EBVSHRINKVR(%)  2.2444E+01  2.2304E+01  0.0000E+00  0.0000E+00  0.0000E+00  0.0000E+00
 RELATIVEINF(%)  7.7290E+01  7.7429E+01  0.0000E+00  0.0000E+00  0.0000E+00  0.0000E+00
 EPSSHRINKSD(%)  1.1413E+01
 EPSSHRINKVR(%)  2.1523E+01


 TOTAL DATA POINTS NORMALLY DISTRIBUTED (N):        17500
 N*LOG(2PI) CONSTANT TO OBJECTIVE FUNCTION:    32162.8486621635
 OBJECTIVE FUNCTION VALUE WITHOUT CONSTANT:   -42419.9620686161
 OBJECTIVE FUNCTION VALUE WITH CONSTANT:      -10257.1134064525
 REPORTED OBJECTIVE FUNCTION DOES NOT CONTAIN CONSTANT

 TOTAL EFFECTIVE ETAS (NIND*NETA):                          5548


 #TERE:
 Elapsed estimation  time in seconds:    86.77
 Elapsed covariance  time in seconds:     1.71

 ********************                               ITERATIVE TWO STAGE                              ********************
 #OBJT:**************                        FINAL VALUE OF OBJECTIVE FUNCTION                       ********************
 #OBJV:********************************************   -42419.962       **************************************************

 ********************                               ITERATIVE TWO STAGE                              ********************
 ********************                             FINAL PARAMETER ESTIMATE                           ********************

 THETA - VECTOR OF FIXED EFFECTS PARAMETERS   *********
         TH 1      TH 2
         2.00E+00  3.63E+00

 OMEGA - COV MATRIX FOR RANDOM EFFECTS - ETAS  ********
         ETA1      ETA2      ETA3      ETA4      ETA5      ETA6
 ETA1
+        8.51E-03
 ETA2
+       -3.36E-05  9.27E-03
 ETA3
+        0.00E+00  0.00E+00  2.44E-02
 ETA4
+        0.00E+00  0.00E+00  1.56E-03  2.86E-02
 ETA5
+        0.00E+00  0.00E+00  0.00E+00  0.00E+00  9.89E-02
 ETA6
+        0.00E+00  0.00E+00  0.00E+00  0.00E+00 -1.69E-02  8.02E-02

 SIGMA - COV MATRIX FOR RANDOM EFFECTS - EPSILONS  ****
         EPS1
 EPS1
+        9.99E-03

 OMEGA - CORR MATRIX FOR RANDOM EFFECTS - ETAS  *******
         ETA1      ETA2      ETA3      ETA4      ETA5      ETA6
 ETA1
+        9.23E-02
 ETA2
+       -3.79E-03  9.63E-02
 ETA3
+        0.00E+00  0.00E+00  1.56E-01
 ETA4
+        0.00E+00  0.00E+00  5.91E-02  1.69E-01
 ETA5
+        0.00E+00  0.00E+00  0.00E+00  0.00E+00  3.15E-01
 ETA6
+        0.00E+00  0.00E+00  0.00E+00  0.00E+00 -1.90E-01  2.83E-01

 SIGMA - CORR MATRIX FOR RANDOM EFFECTS - EPSILONS  ***
         EPS1
 EPS1
+        1.00E-01

 ********************                               ITERATIVE TWO STAGE                              ********************
 ********************                          STANDARD ERROR OF ESTIMATE (S)                        ********************

 THETA - VECTOR OF FIXED EFFECTS PARAMETERS   *********
         TH 1      TH 2
         6.88E-02  6.41E-02

 OMEGA - COV MATRIX FOR RANDOM EFFECTS - ETAS  ********
         ETA1      ETA2      ETA3      ETA4      ETA5      ETA6
 ETA1
+        3.05E-04
 ETA2
+        2.28E-04  3.42E-04
 ETA3
+        0.00E+00  0.00E+00  2.08E-03
 ETA4
+        0.00E+00  0.00E+00  1.66E-03  2.45E-03
 ETA5
+        0.00E+00  0.00E+00  0.00E+00  0.00E+00  3.31E-02
 ETA6
+        0.00E+00  0.00E+00  0.00E+00  0.00E+00  2.54E-02  2.85E-02

 SIGMA - COV MATRIX FOR RANDOM EFFECTS - EPSILONS  ****
         EPS1
 EPS1
+        1.28E-04

 OMEGA - CORR MATRIX FOR RANDOM EFFECTS - ETAS  *******
         ETA1      ETA2      ETA3      ETA4      ETA5      ETA6
 ETA1
+        1.65E-03
 ETA2
+        2.57E-02  1.78E-03
 ETA3
+       ......... .........  6.66E-03
 ETA4
+       ......... .........  6.30E-02  7.23E-03
 ETA5
+       ......... ......... ......... .........  5.26E-02
 ETA6
+       ......... ......... ......... .........  2.58E-01  5.04E-02

 SIGMA - CORR MATRIX FOR RANDOM EFFECTS - EPSILONS  ***
         EPS1
 EPS1
+        6.42E-04
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 #TBLN:      2
 #METH: First Order Conditional Estimation with Interaction
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
 #TERM:
0MINIMIZATION SUCCESSFUL
 NO. OF FUNCTION EVALUATIONS USED:      488
 NO. OF SIG. DIGITS IN FINAL EST.:  2.2

 ETABAR IS THE ARITHMETIC MEAN OF THE ETA-ESTIMATES,
 AND THE P-VALUE IS GIVEN FOR THE NULL HYPOTHESIS THAT THE TRUE MEAN IS 0.

 ETABAR:        -3.5864E-04 -4.3025E-04 -2.4869E-17 -1.5049E-17  3.1718E-03 -2.4806E-03
 SE:             1.6245E-03  1.6971E-03  9.8873E-03  1.0705E-02  6.1685E-02  5.5528E-02
 N:                    2500        2500         250         250          25          25

 P VAL.:         8.2527E-01  7.9987E-01  1.0000E+00  1.0000E+00  9.5899E-01  9.6437E-01

 ETASHRINKSD(%)  1.1983E+01  1.1918E+01  8.5337E-02  9.5763E-02  1.7173E+00  1.6403E+00
 ETASHRINKVR(%)  2.2531E+01  2.2416E+01  1.7060E-01  1.9143E-01  3.4051E+00  3.2537E+00
 EBVSHRINKSD(%)  1.1942E+01  1.1848E+01  3.9140E-01  3.6103E-01  9.3227E-03  1.2465E-02
 EBVSHRINKVR(%)  2.2458E+01  2.2293E+01  7.8126E-01  7.2075E-01  1.8645E-02  2.4929E-02
 RELATIVEINF(%)  7.7265E+01  7.7429E+01  9.9225E+01  9.9285E+01  9.9980E+01  9.9973E+01
 EPSSHRINKSD(%)  1.1452E+01
 EPSSHRINKVR(%)  2.1593E+01


 TOTAL DATA POINTS NORMALLY DISTRIBUTED (N):        17500
 N*LOG(2PI) CONSTANT TO OBJECTIVE FUNCTION:    32162.8486621635
 OBJECTIVE FUNCTION VALUE WITHOUT CONSTANT:   -42423.5161510150
 OBJECTIVE FUNCTION VALUE WITH CONSTANT:      -10260.6674888515
 REPORTED OBJECTIVE FUNCTION DOES NOT CONTAIN CONSTANT

 TOTAL EFFECTIVE ETAS (NIND*NETA):                          5550


 #TERE:
 Elapsed estimation  time in seconds:  1618.65
 Elapsed covariance  time in seconds:   285.76
 SKIPPING EXECUTION OF SLOW FNLMOD/FNLETA BY USER REQUEST
 Elapsed postprocess time in seconds:     0.05

 ********************               FIRST ORDER CONDITIONAL ESTIMATION WITH INTERACTION              ********************
 #OBJT:**************                       MINIMUM VALUE OF OBJECTIVE FUNCTION                      ********************
 #OBJV:********************************************   -42423.516       **************************************************

 ********************               FIRST ORDER CONDITIONAL ESTIMATION WITH INTERACTION              ********************
 ********************                             FINAL PARAMETER ESTIMATE                           ********************

 THETA - VECTOR OF FIXED EFFECTS PARAMETERS   *********
         TH 1      TH 2
         2.00E+00  3.63E+00

 OMEGA - COV MATRIX FOR RANDOM EFFECTS - ETAS  ********
         ETA1      ETA2      ETA3      ETA4      ETA5      ETA6
 ETA1
+        8.52E-03
 ETA2
+       -4.93E-05  9.28E-03
 ETA3
+        0.00E+00  0.00E+00  2.45E-02
 ETA4
+        0.00E+00  0.00E+00  1.64E-03  2.87E-02
 ETA5
+        0.00E+00  0.00E+00  0.00E+00  0.00E+00  1.03E-01
 ETA6
+        0.00E+00  0.00E+00  0.00E+00  0.00E+00 -1.65E-02  8.30E-02

 SIGMA - COV MATRIX FOR RANDOM EFFECTS - EPSILONS  ****
         EPS1
 EPS1
+        1.00E-02

 OMEGA - CORR MATRIX FOR RANDOM EFFECTS - ETAS  *******
         ETA1      ETA2      ETA3      ETA4      ETA5      ETA6
 ETA1
+        9.23E-02
 ETA2
+       -5.55E-03  9.63E-02
 ETA3
+        0.00E+00  0.00E+00  1.56E-01
 ETA4
+        0.00E+00  0.00E+00  6.18E-02  1.69E-01
 ETA5
+        0.00E+00  0.00E+00  0.00E+00  0.00E+00  3.20E-01
 ETA6
+        0.00E+00  0.00E+00  0.00E+00  0.00E+00 -1.79E-01  2.88E-01

 SIGMA - CORR MATRIX FOR RANDOM EFFECTS - EPSILONS  ***
         EPS1
 EPS1
+        1.00E-01

 ********************               FIRST ORDER CONDITIONAL ESTIMATION WITH INTERACTION              ********************
 ********************                            STANDARD ERROR OF ESTIMATE                          ********************

 THETA - VECTOR OF FIXED EFFECTS PARAMETERS   *********
         TH 1      TH 2
         5.40E-02  5.00E-02

 OMEGA - COV MATRIX FOR RANDOM EFFECTS - ETAS  ********
         ETA1      ETA2      ETA3      ETA4      ETA5      ETA6
 ETA1
+        3.08E-04
 ETA2
+        2.30E-04  3.41E-04
 ETA3
+       ......... .........  2.20E-03
 ETA4
+       ......... .........  1.69E-03  2.59E-03
 ETA5
+       ......... ......... ......... .........  3.08E-02
 ETA6
+       ......... ......... ......... .........  1.97E-02  2.47E-02

 SIGMA - COV MATRIX FOR RANDOM EFFECTS - EPSILONS  ****
         EPS1
 EPS1
+        1.26E-04

 OMEGA - CORR MATRIX FOR RANDOM EFFECTS - ETAS  *******
         ETA1      ETA2      ETA3      ETA4      ETA5      ETA6
 ETA1
+        1.67E-03
 ETA2
+        2.59E-02  1.77E-03
 ETA3
+       ......... .........  7.04E-03
 ETA4
+       ......... .........  6.35E-02  7.63E-03
 ETA5
+       ......... ......... ......... .........  4.81E-02
 ETA6
+       ......... ......... ......... .........  2.05E-01  4.29E-02

 SIGMA - CORR MATRIX FOR RANDOM EFFECTS - EPSILONS  ***
         EPS1
 EPS1
+        6.32E-04
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 Elapsed finaloutput time in seconds:     2.06
 #CPUT: Total CPU Time in Seconds,     1972.024
