Thu 12/12/2019
06:19 PM
$PROB RUN# Example 1 (from samp5l)
$INPUT ID TIME  DV=CONC AMT=DOSE RATE EVID MDV CMT SID CID
$DATA superid2.csv

$SUBROUTINES ADVAN1 TRANS2

$PK
MU_5=THETA(1)
MU_6=THETA(2)
CL=DEXP(MU_5+ETA(5)+ETA(3)+ETA(1))
V=DEXP(MU_6+ETA(6)+ETA(4)+ETA(2))
S1=V

$ERROR
Y = F + F*EPS(1)

; Initial values of THETA
$THETA 5.0 5.0
$OMEGA BLOCK(2)
0.03
0.00001 0.03

;$OMEGA 0.03 0.03
$OMEGA BLOCK(2)
0.1
0.00001 0.1

$OMEGA BLOCK(2)
0.3
0.00001 0.3

$SIGMA
0.1

$LEVEL
SID=(3[1],4[2])
CID=(5[3],6[4])

$PRIOR NWPRI NTHETA=2 NETA=6 NTHP=0 NETP=6
$OMEGA BLOCK(2)
0.01 FIX
0.0 0.01

;$OMEGA 0.03 0.03
$OMEGA BLOCK(2)
0.03 FIX
0.0 0.03

$OMEGA BLOCK(2)
0.1 FIX
0.0 0.1

$THETA (2 FIX) (2 FIX) (2 FIX)

$EST METHOD=ITS INTERACTION PRINT=1 NSIG=3 NITER=12 SIGL=5 FNLETA=0 NOABORT SIGLO=8 MCETA=10 NOPRIOR=1
     LEVCENTER=0
;$EST METHOD=IMP INTERACTION PRINT=1 NSIG=3 NITER=500 CTYPE=3 ISAMPLE=300 MCETA=3 FNLETA=0 NOABORT SIGL=5 SIGLO=8
;$EST METHOD=1 INTERACTION PRINT=1 MAXEVAL=9999 NSIG=3 FNLETA=0 SIGL=10
$EST METHOD=BAYES INTERACTION PRINT=10 NSIG=3 NBURN=1000 NITER=1000 CTYPE=3 FNLETA=0 NOABORT NOPRIOR=0
$COV MATRIX=R UNCONDITIONAL
$TABLE  ID TIME CONC DOSE RATE EVID MDV CMT SID CID CL V ETA1 ETA2 ETA3 ETA4 ETA5 ETA6
NOAPPEND ONEHEADER FILE=superid2_5.tab  NOPRINT

NM-TRAN MESSAGES
 WARNINGS AND ERRORS (IF ANY) FOR PROBLEM    1
 (WARNING  126) ONLY THE LAST FNLETA LISTED IN THE SERIES OF $EST RECORDS FOR
 THIS PROBLEM WILL BE USED
 (WARNING  2) NM-TRAN INFERS THAT THE DATA ARE POPULATION.
 (MU_WARNING 12) MU_005: SHOULD NOT BE ASSOCIATED WITH ETA(001)
 (MU_WARNING 12) MU_005: SHOULD NOT BE ASSOCIATED WITH ETA(003)
 (MU_WARNING 11) MU_005: SHOULD NOT BE ASSOCIATED WITH MORE THAN ONE ETA.
 (MU_WARNING 22) MU_005: HAS ALREADY BEEN MU_ ASSOCIATED, CANNOT BE USED AGAIN.
 (MU_WARNING 12) MU_006: SHOULD NOT BE ASSOCIATED WITH ETA(002)
 (MU_WARNING 12) MU_006: SHOULD NOT BE ASSOCIATED WITH ETA(004)
 (MU_WARNING 11) MU_006: SHOULD NOT BE ASSOCIATED WITH MORE THAN ONE ETA.
 (MU_WARNING 22) MU_006: HAS ALREADY BEEN MU_ ASSOCIATED, CANNOT BE USED AGAIN.

1NONLINEAR MIXED EFFECTS MODEL PROGRAM (NONMEM) VERSION 7.5.0 Beta version 3
 ORIGINALLY DEVELOPED BY STUART BEAL, LEWIS SHEINER, AND ALISON BOECKMANN
 CURRENT DEVELOPERS ARE ROBERT BAUER, ICON DEVELOPMENT SOLUTIONS,
 AND ALISON BOECKMANN. IMPLEMENTATION, EFFICIENCY, AND STANDARDIZATION
 PERFORMED BY NOUS INFOSYSTEMS.
 PROBLEM NO.:         1
 RUN# Example 1 (from samp5l)
 TOT. NO. OF OBS RECS:    17500
 TOT. NO. OF INDIVIDUALS:     2500
 ONE COMPARTMENT MODEL (ADVAN1)
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 #TBLN:      1
 #METH: Iterative Two Stage (No Prior)
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
 #TERM:
 OPTIMIZATION WAS NOT TESTED FOR CONVERGENCE

 ETABAR IS THE ARITHMETIC MEAN OF THE ETA-ESTIMATES,
 AND THE P-VALUE IS GIVEN FOR THE NULL HYPOTHESIS THAT THE TRUE MEAN IS 0.

 ETABAR:        -4.3915E-04 -3.7237E-04 -4.1156E-17 -1.0408E-17 -9.0633E-05 -4.6842E-05
 SE:             1.6259E-03  1.6982E-03  9.8791E-03  1.0699E-02  6.1638E-02  5.5498E-02
 N:                    2500        2500         250         250          25          25

 P VAL.:         7.8709E-01  8.2644E-01  1.0000E+00  1.0000E+00  9.9883E-01  9.9933E-01

 ETASHRINKSD(%)  1.1916E+01  1.1832E+01  4.9877E-05  4.5629E-05  4.7489E-05  3.8301E-05
 ETASHRINKVR(%)  2.2412E+01  2.2264E+01  9.9753E-05  9.1258E-05  9.4978E-05  7.6602E-05
 EBVSHRINKSD(%)  1.1912E+01  1.1829E+01  0.0000E+00  0.0000E+00  0.0000E+00  0.0000E+00
 EBVSHRINKVR(%)  2.2405E+01  2.2259E+01  0.0000E+00  0.0000E+00  0.0000E+00  0.0000E+00
 RELATIVEINF(%)  7.7331E+01  7.7477E+01  0.0000E+00  0.0000E+00  0.0000E+00  0.0000E+00
 EPSSHRINKSD(%)  1.1332E+01
 EPSSHRINKVR(%)  2.1380E+01


 TOTAL DATA POINTS NORMALLY DISTRIBUTED (N):        17500
 N*LOG(2PI) CONSTANT TO OBJECTIVE FUNCTION:    32162.8486621635
 OBJECTIVE FUNCTION VALUE WITHOUT CONSTANT:   -42419.9154415730
 OBJECTIVE FUNCTION VALUE WITH CONSTANT:      -10257.0667794095
 REPORTED OBJECTIVE FUNCTION DOES NOT CONTAIN CONSTANT

 TOTAL EFFECTIVE ETAS (NIND*NETA):                          5548


 #TERE:
 Elapsed estimation  time in seconds:   109.52
 Elapsed covariance  time in seconds:     2.49

 ********************                          ITERATIVE TWO STAGE (NO PRIOR)                        ********************
 #OBJT:**************                        FINAL VALUE OF OBJECTIVE FUNCTION                       ********************
 #OBJV:********************************************   -42419.915       **************************************************

 ********************                          ITERATIVE TWO STAGE (NO PRIOR)                        ********************
 ********************                             FINAL PARAMETER ESTIMATE                           ********************

 THETA - VECTOR OF FIXED EFFECTS PARAMETERS   *********
         TH 1      TH 2
         2.00E+00  3.63E+00

 OMEGA - COV MATRIX FOR RANDOM EFFECTS - ETAS  ********
         ETA1      ETA2      ETA3      ETA4      ETA5      ETA6
 ETA1
+        8.52E-03
 ETA2
+       -3.22E-05  9.27E-03
 ETA3
+        0.00E+00  0.00E+00  2.44E-02
 ETA4
+        0.00E+00  0.00E+00  1.56E-03  2.86E-02
 ETA5
+        0.00E+00  0.00E+00  0.00E+00  0.00E+00  9.89E-02
 ETA6
+        0.00E+00  0.00E+00  0.00E+00  0.00E+00 -1.69E-02  8.02E-02

 SIGMA - COV MATRIX FOR RANDOM EFFECTS - EPSILONS  ****
         EPS1
 EPS1
+        9.97E-03

 OMEGA - CORR MATRIX FOR RANDOM EFFECTS - ETAS  *******
         ETA1      ETA2      ETA3      ETA4      ETA5      ETA6
 ETA1
+        9.23E-02
 ETA2
+       -3.63E-03  9.63E-02
 ETA3
+        0.00E+00  0.00E+00  1.56E-01
 ETA4
+        0.00E+00  0.00E+00  5.91E-02  1.69E-01
 ETA5
+        0.00E+00  0.00E+00  0.00E+00  0.00E+00  3.15E-01
 ETA6
+        0.00E+00  0.00E+00  0.00E+00  0.00E+00 -1.90E-01  2.83E-01

 SIGMA - CORR MATRIX FOR RANDOM EFFECTS - EPSILONS  ***
         EPS1
 EPS1
+        9.98E-02

 ********************                          ITERATIVE TWO STAGE (NO PRIOR)                        ********************
 ********************                          STANDARD ERROR OF ESTIMATE (S)                        ********************

 THETA - VECTOR OF FIXED EFFECTS PARAMETERS   *********
         TH 1      TH 2
         6.88E-02  6.41E-02

 OMEGA - COV MATRIX FOR RANDOM EFFECTS - ETAS  ********
         ETA1      ETA2      ETA3      ETA4      ETA5      ETA6
 ETA1
+        3.05E-04
 ETA2
+        2.28E-04  3.42E-04
 ETA3
+        0.00E+00  0.00E+00  2.08E-03
 ETA4
+        0.00E+00  0.00E+00  1.66E-03  2.45E-03
 ETA5
+        0.00E+00  0.00E+00  0.00E+00  0.00E+00  3.31E-02
 ETA6
+        0.00E+00  0.00E+00  0.00E+00  0.00E+00  2.54E-02  2.85E-02

 SIGMA - COV MATRIX FOR RANDOM EFFECTS - EPSILONS  ****
         EPS1
 EPS1
+        1.28E-04

 OMEGA - CORR MATRIX FOR RANDOM EFFECTS - ETAS  *******
         ETA1      ETA2      ETA3      ETA4      ETA5      ETA6
 ETA1
+        1.65E-03
 ETA2
+        2.56E-02  1.78E-03
 ETA3
+       ......... .........  6.66E-03
 ETA4
+       ......... .........  6.30E-02  7.23E-03
 ETA5
+       ......... ......... ......... .........  5.27E-02
 ETA6
+       ......... ......... ......... .........  2.58E-01  5.04E-02

 SIGMA - CORR MATRIX FOR RANDOM EFFECTS - EPSILONS  ***
         EPS1
 EPS1
+        6.42E-04
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 #TBLN:      2
 #METH: MCMC Bayesian Analysis
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
 #TERM:
 BURN-IN WAS COMPLETED
 STATISTICAL PORTION WAS COMPLETED

 ETABAR IS THE ARITHMETIC MEAN OF THE ETA-ESTIMATES,
 AND THE P-VALUE IS GIVEN FOR THE NULL HYPOTHESIS THAT THE TRUE MEAN IS 0.

 ETABAR:         1.3143E-03 -2.6105E-04  6.2950E-18  8.2823E-18  1.4770E-03  1.7965E-05
 SE:             1.6278E-03  1.7066E-03  9.9855E-03  1.0727E-02  6.2430E-02  5.5668E-02
 N:                    2500        2500         250         250          25          25

 P VAL.:         4.1945E-01  8.7842E-01  1.0000E+00  1.0000E+00  9.8112E-01  9.9974E-01

 ETASHRINKSD(%)  1.2945E+01  1.2718E+01  1.2854E+00  1.0779E+00  5.7601E+00  7.5513E+00
 ETASHRINKVR(%)  2.4215E+01  2.3819E+01  2.5543E+00  2.1442E+00  1.1188E+01  1.4532E+01
 EBVSHRINKSD(%)  1.2881E+01  1.2569E+01  5.4099E-01  4.2202E-01  1.7222E-02  1.6327E-02
 EBVSHRINKVR(%)  2.4102E+01  2.3557E+01  1.0791E+00  8.4225E-01  3.4440E-02  3.2652E-02
 RELATIVEINF(%)  7.5608E+01  7.6153E+01  9.8907E+01  9.9147E+01  9.9963E+01  9.9965E+01
 EPSSHRINKSD(%)  1.1929E+01
 EPSSHRINKVR(%)  2.2436E+01


 TOTAL DATA POINTS NORMALLY DISTRIBUTED (N):        17500
 N*LOG(2PI) CONSTANT TO OBJECTIVE FUNCTION:    32162.8486621635
 OBJECTIVE FUNCTION VALUE WITHOUT CONSTANT:   -76172.9916010688
 OBJECTIVE FUNCTION VALUE WITH CONSTANT:      -44010.1429389052
 REPORTED OBJECTIVE FUNCTION DOES NOT CONTAIN CONSTANT

 TOTAL EFFECTIVE ETAS (NIND*NETA):                          5548
 NIND*NETA*LOG(2PI) CONSTANT TO OBJECTIVE FUNCTION:    10196.5419644385
 OBJECTIVE FUNCTION VALUE WITHOUT CONSTANT:   -76172.9916010688
 OBJECTIVE FUNCTION VALUE WITH CONSTANT:      -65976.4496366303
 REPORTED OBJECTIVE FUNCTION DOES NOT CONTAIN CONSTANT

 PRIOR CONSTANT TO OBJECTIVE FUNCTION:    48.5256320203051
 OBJECTIVE FUNCTION VALUE WITHOUT CONSTANT:   -76172.9916010688
 OBJECTIVE FUNCTION VALUE WITH CONSTANT:      -76124.4659690485
 REPORTED OBJECTIVE FUNCTION DOES NOT CONTAIN CONSTANT


 #TERE:
 Elapsed estimation  time in seconds:  1985.62
 Elapsed covariance  time in seconds:     0.00

 ********************                              MCMC BAYESIAN ANALYSIS                            ********************
 #OBJT:**************                       AVERAGE VALUE OF LIKELIHOOD FUNCTION                     ********************
 #OBJV:********************************************   -76172.992       **************************************************
 #OBJS:********************************************      114.655 (STD) **************************************************

 ********************                              MCMC BAYESIAN ANALYSIS                            ********************
 ********************                             FINAL PARAMETER ESTIMATE                           ********************

 THETA - VECTOR OF FIXED EFFECTS PARAMETERS   *********
         TH 1      TH 2
         1.99E+00  3.63E+00

 OMEGA - COV MATRIX FOR RANDOM EFFECTS - ETAS  ********
         ETA1      ETA2      ETA3      ETA4      ETA5      ETA6
 ETA1
+        8.74E-03
 ETA2
+       -4.21E-05  9.56E-03
 ETA3
+        0.00E+00  0.00E+00  2.56E-02
 ETA4
+        0.00E+00  0.00E+00  1.24E-03  2.94E-02
 ETA5
+        0.00E+00  0.00E+00  0.00E+00  0.00E+00  1.14E-01
 ETA6
+        0.00E+00  0.00E+00  0.00E+00  0.00E+00 -2.06E-02  9.44E-02

 SIGMA - COV MATRIX FOR RANDOM EFFECTS - EPSILONS  ****
         EPS1
 EPS1
+        1.00E-02

 OMEGA - CORR MATRIX FOR RANDOM EFFECTS - ETAS  *******
         ETA1      ETA2      ETA3      ETA4      ETA5      ETA6
 ETA1
+        9.35E-02
 ETA2
+       -4.68E-03  9.77E-02
 ETA3
+        0.00E+00  0.00E+00  1.60E-01
 ETA4
+        0.00E+00  0.00E+00  4.49E-02  1.71E-01
 ETA5
+        0.00E+00  0.00E+00  0.00E+00  0.00E+00  3.34E-01
 ETA6
+        0.00E+00  0.00E+00  0.00E+00  0.00E+00 -1.92E-01  3.04E-01

 SIGMA - CORR MATRIX FOR RANDOM EFFECTS - EPSILONS  ***
         EPS1
 EPS1
+        1.00E-01

 ********************                              MCMC BAYESIAN ANALYSIS                            ********************
 ********************                STANDARD ERROR OF ESTIMATE (From Sample Variance)               ********************

 THETA - VECTOR OF FIXED EFFECTS PARAMETERS   *********
         TH 1      TH 2
         6.89E-02  5.96E-02

 OMEGA - COV MATRIX FOR RANDOM EFFECTS - ETAS  ********
         ETA1      ETA2      ETA3      ETA4      ETA5      ETA6
 ETA1
+        3.09E-04
 ETA2
+        2.31E-04  3.52E-04
 ETA3
+        0.00E+00  0.00E+00  2.35E-03
 ETA4
+        0.00E+00  0.00E+00  1.77E-03  2.66E-03
 ETA5
+        0.00E+00  0.00E+00  0.00E+00  0.00E+00  3.46E-02
 ETA6
+        0.00E+00  0.00E+00  0.00E+00  0.00E+00  2.21E-02  2.88E-02

 SIGMA - COV MATRIX FOR RANDOM EFFECTS - EPSILONS  ****
         EPS1
 EPS1
+        1.37E-04

 OMEGA - CORR MATRIX FOR RANDOM EFFECTS - ETAS  *******
         ETA1      ETA2      ETA3      ETA4      ETA5      ETA6
 ETA1
+        1.65E-03
 ETA2
+        2.53E-02  1.80E-03
 ETA3
+        0.00E+00  0.00E+00  7.32E-03
 ETA4
+        0.00E+00  0.00E+00  6.43E-02  7.71E-03
 ETA5
+        0.00E+00  0.00E+00  0.00E+00  0.00E+00  4.90E-02
 ETA6
+        0.00E+00  0.00E+00  0.00E+00  0.00E+00  1.86E-01  4.40E-02

 SIGMA - CORR MATRIX FOR RANDOM EFFECTS - EPSILONS  ***
         EPS1
 EPS1
+        6.86E-04
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 Elapsed postprocess time in seconds:     0.05
 Elapsed finaloutput time in seconds:     1.33
 #CPUT: Total CPU Time in Seconds,     2082.988
