Thu 12/12/2019
06:55 PM
$PROB RUN# Example 1 (from samp5l)
$INPUT ID TIME  DV=CONC AMT=DOSE RATE EVID MDV CMT SID CID
$DATA superid2.csv

$SUBROUTINES ADVAN1 TRANS2

$PK
MU_5=THETA(1)
MU_6=THETA(2)
CL=DEXP(MU_5+ETA(5)+ETA(3)+ETA(1))
V=DEXP(MU_6+ETA(6)+ETA(4)+ETA(2))
S1=V

$ERROR
Y = F + F*EPS(1)

; Initial values of THETA
$THETA 5.0 5.0
;$OMEGA 0.02 0.02 0.0 FIXED 0.0 FIXED 0.0 FIXED 0.0 FIXED
$OMEGA BLOCK(2)
0.1
0.00001 0.1

$OMEGA BLOCK(2)
0.3
0.00001 0.3

$OMEGA BLOCK(2)
1.0
0.00001 1.0

$SIGMA
0.1

$LEVEL
SID=(3[1],4[2])
CID=(5[3],6[4])

;$EST METHOD=ITS INTERACTION PRINT=1 NSIG=3 NITER=12 SIGL=6 FNLETA=0
$EST METHOD=SAEM INTERACTION PRINT=1 NSIG=3 NBURN=30 NITER=100 CTYPE=3 CINTERVAL=50 SIGL=6
     levcenter=0
$EST METHOD=IMP INTERACTION PRINT=1 NSIG=3 NITER=10 CTYPE=3 ISAMPLE=300 SIGL=6 EONLY=1 MAPITER=0
$COV MATRIX=R UNCONDITIONAL
$TABLE  ID TIME CONC DOSE RATE EVID MDV CMT SID CID ETA1 ETA2 ETA3 ETA4 ETA5 ETA6
NOAPPEND ONEHEADER FILE=superid2_6.tab  NOPRINT

NM-TRAN MESSAGES
 WARNINGS AND ERRORS (IF ANY) FOR PROBLEM    1
 (WARNING  2) NM-TRAN INFERS THAT THE DATA ARE POPULATION.
 (MU_WARNING 12) MU_005: SHOULD NOT BE ASSOCIATED WITH ETA(001)
 (MU_WARNING 12) MU_005: SHOULD NOT BE ASSOCIATED WITH ETA(003)
 (MU_WARNING 11) MU_005: SHOULD NOT BE ASSOCIATED WITH MORE THAN ONE ETA.
 (MU_WARNING 22) MU_005: HAS ALREADY BEEN MU_ ASSOCIATED, CANNOT BE USED AGAIN.
 (MU_WARNING 12) MU_006: SHOULD NOT BE ASSOCIATED WITH ETA(002)
 (MU_WARNING 12) MU_006: SHOULD NOT BE ASSOCIATED WITH ETA(004)
 (MU_WARNING 11) MU_006: SHOULD NOT BE ASSOCIATED WITH MORE THAN ONE ETA.
 (MU_WARNING 22) MU_006: HAS ALREADY BEEN MU_ ASSOCIATED, CANNOT BE USED AGAIN.

1NONLINEAR MIXED EFFECTS MODEL PROGRAM (NONMEM) VERSION 7.5.0 Beta version 3
 ORIGINALLY DEVELOPED BY STUART BEAL, LEWIS SHEINER, AND ALISON BOECKMANN
 CURRENT DEVELOPERS ARE ROBERT BAUER, ICON DEVELOPMENT SOLUTIONS,
 AND ALISON BOECKMANN. IMPLEMENTATION, EFFICIENCY, AND STANDARDIZATION
 PERFORMED BY NOUS INFOSYSTEMS.
 PROBLEM NO.:         1
 RUN# Example 1 (from samp5l)
 TOT. NO. OF OBS RECS:    17500
 TOT. NO. OF INDIVIDUALS:     2500
 ONE COMPARTMENT MODEL (ADVAN1)
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 #TBLN:      1
 #METH: Stochastic Approximation Expectation-Maximization
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
 #TERM:
 STOCHASTIC PORTION WAS NOT TESTED FOR CONVERGENCE
 REDUCED STOCHASTIC PORTION WAS COMPLETED

 ETABAR IS THE ARITHMETIC MEAN OF THE ETA-ESTIMATES,
 AND THE P-VALUE IS GIVEN FOR THE NULL HYPOTHESIS THAT THE TRUE MEAN IS 0.

 ETABAR:         1.9366E-03  5.1347E-04  1.2712E-17  1.2038E-17  5.5158E-06  1.6309E-05
 SE:             1.6229E-03  1.6985E-03  9.9605E-03  1.0729E-02  6.2284E-02  5.5727E-02
 N:                    2500        2500         250         250          25          25

 P VAL.:         2.3275E-01  7.6242E-01  1.0000E+00  1.0000E+00  9.9993E-01  9.9977E-01

 ETASHRINKSD(%)  1.2271E+01  1.2048E+01  1.0000E-10  3.4349E-03  3.2768E-04  1.0000E-10
 ETASHRINKVR(%)  2.3036E+01  2.2644E+01  1.0000E-10  6.8696E-03  6.5536E-04  1.0000E-10
 EBVSHRINKSD(%)  1.2253E+01  1.2039E+01  0.0000E+00  0.0000E+00  0.0000E+00  0.0000E+00
 EBVSHRINKVR(%)  2.3004E+01  2.2629E+01  0.0000E+00  0.0000E+00  0.0000E+00  0.0000E+00
 RELATIVEINF(%)  7.6721E+01  7.7095E+01  0.0000E+00  0.0000E+00  0.0000E+00  0.0000E+00
 EPSSHRINKSD(%)  1.1745E+01
 EPSSHRINKVR(%)  2.2111E+01


 TOTAL DATA POINTS NORMALLY DISTRIBUTED (N):        17500
 N*LOG(2PI) CONSTANT TO OBJECTIVE FUNCTION:    32162.8486621635
 OBJECTIVE FUNCTION VALUE WITHOUT CONSTANT:   -77874.4994413118
 OBJECTIVE FUNCTION VALUE WITH CONSTANT:      -45711.6507791483
 REPORTED OBJECTIVE FUNCTION DOES NOT CONTAIN CONSTANT

 TOTAL EFFECTIVE ETAS (NIND*NETA):                          5548
 NIND*NETA*LOG(2PI) CONSTANT TO OBJECTIVE FUNCTION:    10196.5419644385
 OBJECTIVE FUNCTION VALUE WITHOUT CONSTANT:   -77874.4994413118
 OBJECTIVE FUNCTION VALUE WITH CONSTANT:      -67677.9574768733
 REPORTED OBJECTIVE FUNCTION DOES NOT CONTAIN CONSTANT


 #TERE:
 Elapsed estimation  time in seconds:   371.40
 Elapsed covariance  time in seconds:     0.52

 ********************                STOCHASTIC APPROXIMATION EXPECTATION-MAXIMIZATION               ********************
 #OBJT:**************                        FINAL VALUE OF LIKELIHOOD FUNCTION                      ********************
 #OBJV:********************************************   -77874.499       **************************************************

 ********************                STOCHASTIC APPROXIMATION EXPECTATION-MAXIMIZATION               ********************
 ********************                             FINAL PARAMETER ESTIMATE                           ********************

 THETA - VECTOR OF FIXED EFFECTS PARAMETERS   *********
         TH 1      TH 2
         1.99E+00  3.63E+00

 OMEGA - COV MATRIX FOR RANDOM EFFECTS - ETAS  ********
         ETA1      ETA2      ETA3      ETA4      ETA5      ETA6
 ETA1
+        8.56E-03
 ETA2
+       -5.49E-05  9.32E-03
 ETA3
+        0.00E+00  0.00E+00  2.48E-02
 ETA4
+        0.00E+00  0.00E+00  1.13E-03  2.88E-02
 ETA5
+        0.00E+00  0.00E+00  0.00E+00  0.00E+00  1.01E-01
 ETA6
+        0.00E+00  0.00E+00  0.00E+00  0.00E+00 -1.81E-02  8.09E-02

 SIGMA - COV MATRIX FOR RANDOM EFFECTS - EPSILONS  ****
         EPS1
 EPS1
+        1.00E-02

 OMEGA - CORR MATRIX FOR RANDOM EFFECTS - ETAS  *******
         ETA1      ETA2      ETA3      ETA4      ETA5      ETA6
 ETA1
+        9.25E-02
 ETA2
+       -6.14E-03  9.66E-02
 ETA3
+        0.00E+00  0.00E+00  1.57E-01
 ETA4
+        0.00E+00  0.00E+00  4.22E-02  1.70E-01
 ETA5
+        0.00E+00  0.00E+00  0.00E+00  0.00E+00  3.18E-01
 ETA6
+        0.00E+00  0.00E+00  0.00E+00  0.00E+00 -2.00E-01  2.84E-01

 SIGMA - CORR MATRIX FOR RANDOM EFFECTS - EPSILONS  ***
         EPS1
 EPS1
+        1.00E-01

 ********************                STOCHASTIC APPROXIMATION EXPECTATION-MAXIMIZATION               ********************
 ********************                          STANDARD ERROR OF ESTIMATE (S)                        ********************

 THETA - VECTOR OF FIXED EFFECTS PARAMETERS   *********
         TH 1      TH 2
         6.94E-02  6.42E-02

 OMEGA - COV MATRIX FOR RANDOM EFFECTS - ETAS  ********
         ETA1      ETA2      ETA3      ETA4      ETA5      ETA6
 ETA1
+        3.08E-04
 ETA2
+        2.31E-04  3.46E-04
 ETA3
+        0.00E+00  0.00E+00  2.13E-03
 ETA4
+        0.00E+00  0.00E+00  1.68E-03  2.46E-03
 ETA5
+        0.00E+00  0.00E+00  0.00E+00  0.00E+00  3.40E-02
 ETA6
+        0.00E+00  0.00E+00  0.00E+00  0.00E+00  2.58E-02  2.88E-02

 SIGMA - COV MATRIX FOR RANDOM EFFECTS - EPSILONS  ****
         EPS1
 EPS1
+        1.28E-04

 OMEGA - CORR MATRIX FOR RANDOM EFFECTS - ETAS  *******
         ETA1      ETA2      ETA3      ETA4      ETA5      ETA6
 ETA1
+        1.66E-03
 ETA2
+        2.59E-02  1.79E-03
 ETA3
+       ......... .........  6.76E-03
 ETA4
+       ......... .........  6.30E-02  7.25E-03
 ETA5
+       ......... ......... ......... .........  5.35E-02
 ETA6
+       ......... ......... ......... .........  2.56E-01  5.06E-02

 SIGMA - CORR MATRIX FOR RANDOM EFFECTS - EPSILONS  ***
         EPS1
 EPS1
+        6.41E-04
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 #TBLN:      2
 #METH: Objective Function Evaluation by Importance Sampling
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
 #TERM:
 EXPECTATION ONLY PROCESS WAS NOT TESTED FOR CONVERGENCE

 ETABAR IS THE ARITHMETIC MEAN OF THE ETA-ESTIMATES,
 AND THE P-VALUE IS GIVEN FOR THE NULL HYPOTHESIS THAT THE TRUE MEAN IS 0.

 ETABAR:         1.2990E-03 -2.4796E-04  6.5392E-18 -5.7176E-18  5.2220E-04  5.7388E-04
 SE:             1.6221E-03  1.6988E-03  9.9749E-03  1.0718E-02  6.2388E-02  5.5598E-02
 N:                    2500        2500         250         250          25          25

 P VAL.:         4.2327E-01  8.8395E-01  1.0000E+00  1.0000E+00  9.9332E-01  9.9176E-01

 ETASHRINKSD(%)  1.2312E+01  1.2034E+01  1.0000E-10  1.0536E-01  1.0000E-10  2.3193E-01
 ETASHRINKVR(%)  2.3108E+01  2.2620E+01  1.0000E-10  2.1061E-01  1.0000E-10  4.6332E-01
 EBVSHRINKSD(%)  1.2170E+01  1.1919E+01  0.0000E+00  0.0000E+00  0.0000E+00  0.0000E+00
 EBVSHRINKVR(%)  2.2859E+01  2.2418E+01  0.0000E+00  0.0000E+00  0.0000E+00  0.0000E+00
 RELATIVEINF(%)  7.6878E+01  7.7318E+01  0.0000E+00  0.0000E+00  0.0000E+00  0.0000E+00
 EPSSHRINKSD(%)  1.1815E+01
 EPSSHRINKVR(%)  2.2235E+01


 TOTAL DATA POINTS NORMALLY DISTRIBUTED (N):        17500
 N*LOG(2PI) CONSTANT TO OBJECTIVE FUNCTION:    32162.8486621635
 OBJECTIVE FUNCTION VALUE WITHOUT CONSTANT:   -42437.9469488681
 OBJECTIVE FUNCTION VALUE WITH CONSTANT:      -10275.0982867045
 REPORTED OBJECTIVE FUNCTION DOES NOT CONTAIN CONSTANT

 TOTAL EFFECTIVE ETAS (NIND*NETA):                          5548


 #TERE:
 Elapsed estimation  time in seconds:   254.85
 Elapsed covariance  time in seconds:    27.12

 ********************               OBJECTIVE FUNCTION EVALUATION BY IMPORTANCE SAMPLING             ********************
 #OBJT:**************                        FINAL VALUE OF OBJECTIVE FUNCTION                       ********************
 #OBJV:********************************************   -42437.947       **************************************************

 ********************               OBJECTIVE FUNCTION EVALUATION BY IMPORTANCE SAMPLING             ********************
 ********************                             FINAL PARAMETER ESTIMATE                           ********************

 THETA - VECTOR OF FIXED EFFECTS PARAMETERS   *********
         TH 1      TH 2
         1.99E+00  3.63E+00

 OMEGA - COV MATRIX FOR RANDOM EFFECTS - ETAS  ********
         ETA1      ETA2      ETA3      ETA4      ETA5      ETA6
 ETA1
+        8.56E-03
 ETA2
+       -5.49E-05  9.32E-03
 ETA3
+        0.00E+00  0.00E+00  2.48E-02
 ETA4
+        0.00E+00  0.00E+00  1.13E-03  2.88E-02
 ETA5
+        0.00E+00  0.00E+00  0.00E+00  0.00E+00  1.01E-01
 ETA6
+        0.00E+00  0.00E+00  0.00E+00  0.00E+00 -1.81E-02  8.09E-02

 SIGMA - COV MATRIX FOR RANDOM EFFECTS - EPSILONS  ****
         EPS1
 EPS1
+        1.00E-02

 OMEGA - CORR MATRIX FOR RANDOM EFFECTS - ETAS  *******
         ETA1      ETA2      ETA3      ETA4      ETA5      ETA6
 ETA1
+        9.25E-02
 ETA2
+       -6.14E-03  9.66E-02
 ETA3
+        0.00E+00  0.00E+00  1.57E-01
 ETA4
+        0.00E+00  0.00E+00  4.22E-02  1.70E-01
 ETA5
+        0.00E+00  0.00E+00  0.00E+00  0.00E+00  3.18E-01
 ETA6
+        0.00E+00  0.00E+00  0.00E+00  0.00E+00 -2.00E-01  2.84E-01

 SIGMA - CORR MATRIX FOR RANDOM EFFECTS - EPSILONS  ***
         EPS1
 EPS1
+        1.00E-01

 ********************               OBJECTIVE FUNCTION EVALUATION BY IMPORTANCE SAMPLING             ********************
 ********************                          STANDARD ERROR OF ESTIMATE (R)                        ********************

 THETA - VECTOR OF FIXED EFFECTS PARAMETERS   *********
         TH 1      TH 2
         6.90E-02  6.36E-02

 OMEGA - COV MATRIX FOR RANDOM EFFECTS - ETAS  ********
         ETA1      ETA2      ETA3      ETA4      ETA5      ETA6
 ETA1
+        3.12E-04
 ETA2
+        2.34E-04  3.45E-04
 ETA3
+        0.00E+00  0.00E+00  2.12E-03
 ETA4
+        0.00E+00  0.00E+00  1.68E-03  2.46E-03
 ETA5
+        0.00E+00  0.00E+00  0.00E+00  0.00E+00  3.22E-02
 ETA6
+        0.00E+00  0.00E+00  0.00E+00  0.00E+00  2.46E-02  2.74E-02

 SIGMA - COV MATRIX FOR RANDOM EFFECTS - EPSILONS  ****
         EPS1
 EPS1
+        1.27E-04

 OMEGA - CORR MATRIX FOR RANDOM EFFECTS - ETAS  *******
         ETA1      ETA2      ETA3      ETA4      ETA5      ETA6
 ETA1
+        1.69E-03
 ETA2
+        2.62E-02  1.78E-03
 ETA3
+       ......... .........  6.72E-03
 ETA4
+       ......... .........  6.29E-02  7.26E-03
 ETA5
+       ......... ......... ......... .........  5.07E-02
 ETA6
+       ......... ......... ......... .........  2.46E-01  4.82E-02

 SIGMA - CORR MATRIX FOR RANDOM EFFECTS - EPSILONS  ***
         EPS1
 EPS1
+        6.33E-04
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 Elapsed postprocess time in seconds:     0.87
 Elapsed finaloutput time in seconds:     1.19
 #CPUT: Total CPU Time in Seconds,      639.339
