$PROB RUN#
$INPUT C ID TIME DV AMT RATE EVID MDV CMT ROWNUM SID
$DATA superid3.csv IGNORE=C

$SUBROUTINES ADVAN2 TRANS2

$PK
MU_1=THETA(1)
MU_2=THETA(2)
MU_3=THETA(3)
KA=DEXP(MU_1+ETA(1)+ETA(4))
CL=DEXP(MU_2+ETA(2)+ETA(5))
V=DEXP(MU_3+ETA(3)+ETA(6))
S2=V

$ERROR
IPRE=F
Y = IPRE + IPRE*EPS(1)

; Initial values of THETA
$THETA 0.2 -4 -2
;INITIAL values of OMEGA
$OMEGA BLOCK(3)
0.1
0.001 0.1
0.001 0.001 0.1

$OMEGA BLOCK(3)
0.3
0.001 0.3
0.001 0.001 0.3

;Initial value of SIGMA
$SIGMA
0.1     ;[P]

$PRIOR NWPRI
$OMEGAP BLOCK(3)
0.01
0.001 0.01
0.001 0.001 0.01

$OMEGAP BLOCK(3)
0.03
0.001 0.03
0.001 0.001 0.03

$OMEGAPD (3 FIXED)X2

$LEVEL
SID=(4[1],5[2],6[3])

$EST METHOD=ITS AUTO=1 PRINT=1 SIGL=8 FNLETA=0 NOPRIOR=1 MCETA=10
     LEVCENTER=1
$EST METHOD=IMP AUTO=1 PRINT=1 NOPRIOR=1
$EST METHOD=BAYES AUTO=1 PRINT=25 NITER=500 NOPRIOR=0 MCETA=0
$EST METHOD=1 PRINT=5 NSIG=3 SIGL=10 FNLETA=0 SLOW NONINFETA=1 NOPRIOR=1 MCETA=10 NOHABORT
$COV MATRIX=R UNCONDITIONAL
