Tue 12/17/2019
12:43 AM
$PROB RUN#
$INPUT C ID TIME DV AMT RATE EVID MDV CMT ROWNUM SID
$DATA superid3.csv IGNORE=C

$SUBROUTINES ADVAN2 TRANS2

$PK
MU_1=THETA(1)
MU_2=THETA(2)
MU_3=THETA(3)
KA=DEXP(MU_1+ETA(1)+ETA(4))
CL=DEXP(MU_2+ETA(2)+ETA(5))
V=DEXP(MU_3+ETA(3)+ETA(6))
S2=V

$ERROR
IPRE=F
Y = IPRE + IPRE*EPS(1)

; Initial values of THETA
$THETA 0.2 -4 -2
;INITIAL values of OMEGA
$OMEGA BLOCK(3)
0.1
0.001 0.1
0.001 0.001 0.1

$OMEGA BLOCK(3)
0.3
0.001 0.3
0.001 0.001 0.3

;Initial value of SIGMA
$SIGMA
0.1     ;[P]

$PRIOR NWPRI
$OMEGAP BLOCK(3)
0.01
0.001 0.01
0.001 0.001 0.01

$OMEGAP BLOCK(3)
0.03
0.001 0.03
0.001 0.001 0.03

$OMEGAPD (3 FIXED)X2

$LEVEL
SID=(4[1],5[2],6[3])

$EST METHOD=ITS AUTO=1 PRINT=1 SIGL=8 FNLETA=0 NOPRIOR=1 MCETA=10
     LEVCENTER=1
$EST METHOD=IMP AUTO=1 PRINT=1 NOPRIOR=1
$EST METHOD=BAYES AUTO=1 PRINT=25 NITER=500 NOPRIOR=0 MCETA=0
$EST METHOD=1 PRINT=5 NSIG=3 SIGL=10 FNLETA=0 SLOW NONINFETA=1 NOPRIOR=1 MCETA=10 NOHABORT
$COV MATRIX=R UNCONDITIONAL

NM-TRAN MESSAGES
 WARNINGS AND ERRORS (IF ANY) FOR PROBLEM    1
 (WARNING  126) ONLY THE LAST FNLETA LISTED IN THE SERIES OF $EST RECORDS FOR
 THIS PROBLEM WILL BE USED
 (WARNING  2) NM-TRAN INFERS THAT THE DATA ARE POPULATION.
 (WARNING  121) INTERACTION IS IMPLIED WITH EM/BAYES ESTIMATION METHODS
 (MU_WARNING 12) MU_001: SHOULD NOT BE ASSOCIATED WITH ETA(004)
 (MU_WARNING 11) MU_001: SHOULD NOT BE ASSOCIATED WITH MORE THAN ONE ETA.
 (MU_WARNING 12) MU_002: SHOULD NOT BE ASSOCIATED WITH ETA(005)
 (MU_WARNING 11) MU_002: SHOULD NOT BE ASSOCIATED WITH MORE THAN ONE ETA.
 (MU_WARNING 12) MU_003: SHOULD NOT BE ASSOCIATED WITH ETA(006)
 (MU_WARNING 11) MU_003: SHOULD NOT BE ASSOCIATED WITH MORE THAN ONE ETA.

1NONLINEAR MIXED EFFECTS MODEL PROGRAM (NONMEM) VERSION 7.5.0 Beta version 3
 ORIGINALLY DEVELOPED BY STUART BEAL, LEWIS SHEINER, AND ALISON BOECKMANN
 CURRENT DEVELOPERS ARE ROBERT BAUER, ICON DEVELOPMENT SOLUTIONS,
 AND ALISON BOECKMANN. IMPLEMENTATION, EFFICIENCY, AND STANDARDIZATION
 PERFORMED BY NOUS INFOSYSTEMS.
 PROBLEM NO.:         1
 RUN#
 TOT. NO. OF OBS RECS:     8000
 TOT. NO. OF INDIVIDUALS:      800
 ONE COMPARTMENT MODEL WITH FIRST-ORDER ABSORPTION (ADVAN2)
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 #TBLN:      1
 #METH: Iterative Two Stage (No Prior)
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
 #TERM:
 OPTIMIZATION WAS COMPLETED

 ETABAR IS THE ARITHMETIC MEAN OF THE ETA-ESTIMATES,
 AND THE P-VALUE IS GIVEN FOR THE NULL HYPOTHESIS THAT THE TRUE MEAN IS 0.

 ETABAR:         6.8210E-08 -5.2477E-07 -5.0360E-07 -3.2037E-16 -1.2820E-16  4.4340E-17
 SE:             2.2545E-03  3.3949E-03  3.3592E-03  4.2798E-02  3.9229E-02  5.5272E-02
 N:                     800         800         800          16          16          16

 P VAL.:         9.9998E-01  9.9988E-01  9.9988E-01  1.0000E+00  1.0000E+00  1.0000E+00

 ETASHRINKSD(%)  3.5864E+01  2.0426E+00  2.6910E+00  8.2643E-06  5.1467E-06  5.3177E-06
 ETASHRINKVR(%)  5.8866E+01  4.0436E+00  5.3096E+00  1.6529E-05  1.0293E-05  1.0635E-05
 EBVSHRINKSD(%)  3.5864E+01  2.0426E+00  2.6910E+00  0.0000E+00  0.0000E+00  0.0000E+00
 EBVSHRINKVR(%)  5.8866E+01  4.0436E+00  5.3096E+00  0.0000E+00  0.0000E+00  0.0000E+00
 RELATIVEINF(%)  4.1109E+01  9.5950E+01  9.4940E+01  0.0000E+00  0.0000E+00  0.0000E+00
 EPSSHRINKSD(%)  1.2308E+01
 EPSSHRINKVR(%)  2.3101E+01


 TOTAL DATA POINTS NORMALLY DISTRIBUTED (N):         8000
 N*LOG(2PI) CONSTANT TO OBJECTIVE FUNCTION:    14703.0165312748
 OBJECTIVE FUNCTION VALUE WITHOUT CONSTANT:   -17077.3031574773
 OBJECTIVE FUNCTION VALUE WITH CONSTANT:      -2374.28662620259
 REPORTED OBJECTIVE FUNCTION DOES NOT CONTAIN CONSTANT

 TOTAL EFFECTIVE ETAS (NIND*NETA):                          2397


 #TERE:
 Elapsed estimation  time in seconds:    71.34
 Elapsed covariance  time in seconds:     0.15

 ********************                          ITERATIVE TWO STAGE (NO PRIOR)                        ********************
 #OBJT:**************                        FINAL VALUE OF OBJECTIVE FUNCTION                       ********************
 #OBJV:********************************************   -17077.303       **************************************************

 ********************                          ITERATIVE TWO STAGE (NO PRIOR)                        ********************
 ********************                             FINAL PARAMETER ESTIMATE                           ********************

 THETA - VECTOR OF FIXED EFFECTS PARAMETERS   *********
         TH 1      TH 2      TH 3
         1.79E-01 -5.31E+00 -3.08E+00

 OMEGA - COV MATRIX FOR RANDOM EFFECTS - ETAS  ********
         ETA1      ETA2      ETA3      ETA4      ETA5      ETA6
 ETA1
+        1.01E-02
 ETA2
+        1.49E-04  9.80E-03
 ETA3
+        5.39E-04  6.58E-04  9.73E-03
 ETA4
+        0.00E+00  0.00E+00  0.00E+00  3.13E-02
 ETA5
+        0.00E+00  0.00E+00  0.00E+00 -5.61E-03  2.63E-02
 ETA6
+        0.00E+00  0.00E+00  0.00E+00  2.73E-02 -6.28E-03  5.21E-02

 SIGMA - COV MATRIX FOR RANDOM EFFECTS - EPSILONS  ****
         EPS1
 EPS1
+        3.00E-03

 OMEGA - CORR MATRIX FOR RANDOM EFFECTS - ETAS  *******
         ETA1      ETA2      ETA3      ETA4      ETA5      ETA6
 ETA1
+        1.00E-01
 ETA2
+        1.50E-02  9.90E-02
 ETA3
+        5.44E-02  6.74E-02  9.86E-02
 ETA4
+        0.00E+00  0.00E+00  0.00E+00  1.77E-01
 ETA5
+        0.00E+00  0.00E+00  0.00E+00 -1.96E-01  1.62E-01
 ETA6
+        0.00E+00  0.00E+00  0.00E+00  6.76E-01 -1.70E-01  2.28E-01

 SIGMA - CORR MATRIX FOR RANDOM EFFECTS - EPSILONS  ***
         EPS1
 EPS1
+        5.48E-02

 ********************                          ITERATIVE TWO STAGE (NO PRIOR)                        ********************
 ********************                          STANDARD ERROR OF ESTIMATE (S)                        ********************

 THETA - VECTOR OF FIXED EFFECTS PARAMETERS   *********
         TH 1      TH 2      TH 3
         5.72E-03  3.67E-03  3.64E-03

 OMEGA - COV MATRIX FOR RANDOM EFFECTS - ETAS  ********
         ETA1      ETA2      ETA3      ETA4      ETA5      ETA6
 ETA1
+        9.16E-04
 ETA2
+        5.44E-04  5.23E-04
 ETA3
+        6.90E-04  3.85E-04  5.27E-04
 ETA4
+        0.00E+00  0.00E+00  0.00E+00  1.16E-02
 ETA5
+        0.00E+00  0.00E+00  0.00E+00  1.01E-02  1.53E-02
 ETA6
+        0.00E+00  0.00E+00  0.00E+00  1.64E-02  1.20E-02  2.89E-02

 SIGMA - COV MATRIX FOR RANDOM EFFECTS - EPSILONS  ****
         EPS1
 EPS1
+        5.56E-05

 OMEGA - CORR MATRIX FOR RANDOM EFFECTS - ETAS  *******
         ETA1      ETA2      ETA3      ETA4      ETA5      ETA6
 ETA1
+        4.56E-03
 ETA2
+        5.46E-02  2.64E-03
 ETA3
+        6.92E-02  3.89E-02  2.67E-03
 ETA4
+       ......... ......... .........  3.28E-02
 ETA5
+       ......... ......... .........  3.24E-01  4.72E-02
 ETA6
+       ......... ......... .........  1.79E-01  2.80E-01  6.33E-02

 SIGMA - CORR MATRIX FOR RANDOM EFFECTS - EPSILONS  ***
         EPS1
 EPS1
+        5.08E-04
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 #TBLN:      2
 #METH: Importance Sampling (No Prior)
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
 #TERM:
 OPTIMIZATION WAS COMPLETED

 ETABAR IS THE ARITHMETIC MEAN OF THE ETA-ESTIMATES,
 AND THE P-VALUE IS GIVEN FOR THE NULL HYPOTHESIS THAT THE TRUE MEAN IS 0.

 ETABAR:         2.1863E-04  2.9119E-05  3.1749E-05 -3.4400E-17 -1.3364E-16 -3.5527E-17
 SE:             2.2628E-03  3.3962E-03  3.3559E-03  4.2804E-02  3.9242E-02  5.5277E-02
 N:                     800         800         800          16          16          16

 P VAL.:         9.2303E-01  9.9316E-01  9.9245E-01  1.0000E+00  1.0000E+00  1.0000E+00

 ETASHRINKSD(%)  3.5872E+01  1.9948E+00  2.8199E+00  1.2693E-01  1.1999E-03  1.0000E-10
 ETASHRINKVR(%)  5.8876E+01  3.9498E+00  5.5602E+00  2.5369E-01  2.3998E-03  1.0000E-10
 EBVSHRINKSD(%)  3.5659E+01  2.0396E+00  2.6855E+00  0.0000E+00  0.0000E+00  0.0000E+00
 EBVSHRINKVR(%)  5.8602E+01  4.0377E+00  5.2988E+00  0.0000E+00  0.0000E+00  0.0000E+00
 RELATIVEINF(%)  4.1372E+01  9.5954E+01  9.4946E+01  0.0000E+00  0.0000E+00  0.0000E+00
 EPSSHRINKSD(%)  1.2387E+01
 EPSSHRINKVR(%)  2.3240E+01


 TOTAL DATA POINTS NORMALLY DISTRIBUTED (N):         8000
 N*LOG(2PI) CONSTANT TO OBJECTIVE FUNCTION:    14703.0165312748
 OBJECTIVE FUNCTION VALUE WITHOUT CONSTANT:   -17081.2540098845
 OBJECTIVE FUNCTION VALUE WITH CONSTANT:      -2378.23747860969
 REPORTED OBJECTIVE FUNCTION DOES NOT CONTAIN CONSTANT

 TOTAL EFFECTIVE ETAS (NIND*NETA):                          2397


 #TERE:
 Elapsed estimation  time in seconds:   141.11
 Elapsed covariance  time in seconds:    12.32

 ********************                          IMPORTANCE SAMPLING (NO PRIOR)                        ********************
 #OBJT:**************                        FINAL VALUE OF OBJECTIVE FUNCTION                       ********************
 #OBJV:********************************************   -17081.254       **************************************************

 ********************                          IMPORTANCE SAMPLING (NO PRIOR)                        ********************
 ********************                             FINAL PARAMETER ESTIMATE                           ********************

 THETA - VECTOR OF FIXED EFFECTS PARAMETERS   *********
         TH 1      TH 2      TH 3
         1.81E-01 -5.31E+00 -3.08E+00

 OMEGA - COV MATRIX FOR RANDOM EFFECTS - ETAS  ********
         ETA1      ETA2      ETA3      ETA4      ETA5      ETA6
 ETA1
+        1.02E-02
 ETA2
+        1.48E-04  9.80E-03
 ETA3
+        5.38E-04  6.53E-04  9.73E-03
 ETA4
+        0.00E+00  0.00E+00  0.00E+00  3.13E-02
 ETA5
+        0.00E+00  0.00E+00  0.00E+00 -5.64E-03  2.63E-02
 ETA6
+        0.00E+00  0.00E+00  0.00E+00  2.73E-02 -6.32E-03  5.21E-02

 SIGMA - COV MATRIX FOR RANDOM EFFECTS - EPSILONS  ****
         EPS1
 EPS1
+        3.00E-03

 OMEGA - CORR MATRIX FOR RANDOM EFFECTS - ETAS  *******
         ETA1      ETA2      ETA3      ETA4      ETA5      ETA6
 ETA1
+        1.01E-01
 ETA2
+        1.48E-02  9.90E-02
 ETA3
+        5.41E-02  6.69E-02  9.87E-02
 ETA4
+        0.00E+00  0.00E+00  0.00E+00  1.77E-01
 ETA5
+        0.00E+00  0.00E+00  0.00E+00 -1.96E-01  1.62E-01
 ETA6
+        0.00E+00  0.00E+00  0.00E+00  6.75E-01 -1.71E-01  2.28E-01

 SIGMA - CORR MATRIX FOR RANDOM EFFECTS - EPSILONS  ***
         EPS1
 EPS1
+        5.48E-02

 ********************                          IMPORTANCE SAMPLING (NO PRIOR)                        ********************
 ********************                          STANDARD ERROR OF ESTIMATE (R)                        ********************

 THETA - VECTOR OF FIXED EFFECTS PARAMETERS   *********
         TH 1      TH 2      TH 3
         5.55E-03  3.58E-03  3.59E-03

 OMEGA - COV MATRIX FOR RANDOM EFFECTS - ETAS  ********
         ETA1      ETA2      ETA3      ETA4      ETA5      ETA6
 ETA1
+        8.55E-04
 ETA2
+        5.29E-04  5.06E-04
 ETA3
+        5.92E-04  3.63E-04  5.10E-04
 ETA4
+        0.00E+00  0.00E+00  0.00E+00  1.08E-02
 ETA5
+        0.00E+00  0.00E+00  0.00E+00  9.43E-03  1.37E-02
 ETA6
+        0.00E+00  0.00E+00  0.00E+00  1.51E-02  1.11E-02  2.62E-02

 SIGMA - COV MATRIX FOR RANDOM EFFECTS - EPSILONS  ****
         EPS1
 EPS1
+        5.50E-05

 OMEGA - CORR MATRIX FOR RANDOM EFFECTS - ETAS  *******
         ETA1      ETA2      ETA3      ETA4      ETA5      ETA6
 ETA1
+        4.24E-03
 ETA2
+        5.29E-02  2.55E-03
 ETA3
+        5.90E-02  3.67E-02  2.58E-03
 ETA4
+       ......... ......... .........  3.05E-02
 ETA5
+       ......... ......... .........  3.04E-01  4.23E-02
 ETA6
+       ......... ......... .........  1.69E-01  2.63E-01  5.75E-02

 SIGMA - CORR MATRIX FOR RANDOM EFFECTS - EPSILONS  ***
         EPS1
 EPS1
+        5.02E-04
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 #TBLN:      3
 #METH: MCMC Bayesian Analysis
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
 #TERM:
 BURN-IN WAS COMPLETED
 STATISTICAL PORTION WAS COMPLETED

 ETABAR IS THE ARITHMETIC MEAN OF THE ETA-ESTIMATES,
 AND THE P-VALUE IS GIVEN FOR THE NULL HYPOTHESIS THAT THE TRUE MEAN IS 0.

 ETABAR:        -1.3509E-04 -2.0136E-04  9.8776E-05  2.6271E-16  3.5076E-17 -1.7458E-16
 SE:             2.2559E-03  3.3975E-03  3.3587E-03  4.2892E-02  3.9274E-02  5.5236E-02
 N:                     800         800         800          16          16          16

 P VAL.:         9.5225E-01  9.5274E-01  9.7654E-01  1.0000E+00  1.0000E+00  1.0000E+00

 ETASHRINKSD(%)  3.6099E+01  2.3573E+00  2.9646E+00  1.0934E+01  1.1857E+01  7.6012E+00
 ETASHRINKVR(%)  5.9166E+01  4.6591E+00  5.8414E+00  2.0673E+01  2.2309E+01  1.4625E+01
 EBVSHRINKSD(%)  3.5096E+01  2.0222E+00  2.6739E+00  1.0807E-01  1.2133E-02  8.8168E-03
 EBVSHRINKVR(%)  5.7875E+01  4.0036E+00  5.2762E+00  2.1602E-01  2.4265E-02  1.7633E-02
 RELATIVEINF(%)  4.2107E+01  9.6015E+01  9.4987E+01  9.9692E+01  9.9969E+01  1.0000E+02
 EPSSHRINKSD(%)  1.2327E+01
 EPSSHRINKVR(%)  2.3134E+01


 TOTAL DATA POINTS NORMALLY DISTRIBUTED (N):         8000
 N*LOG(2PI) CONSTANT TO OBJECTIVE FUNCTION:    14703.0165312748
 OBJECTIVE FUNCTION VALUE WITHOUT CONSTANT:   -35295.4037369886
 OBJECTIVE FUNCTION VALUE WITH CONSTANT:      -20592.3872057138
 REPORTED OBJECTIVE FUNCTION DOES NOT CONTAIN CONSTANT

 TOTAL EFFECTIVE ETAS (NIND*NETA):                          2397
 NIND*NETA*LOG(2PI) CONSTANT TO OBJECTIVE FUNCTION:    4405.39132818319
 OBJECTIVE FUNCTION VALUE WITHOUT CONSTANT:   -35295.4037369886
 OBJECTIVE FUNCTION VALUE WITH CONSTANT:      -30890.0124088054
 REPORTED OBJECTIVE FUNCTION DOES NOT CONTAIN CONSTANT

 PRIOR CONSTANT TO OBJECTIVE FUNCTION:    74.4768831102865
 OBJECTIVE FUNCTION VALUE WITHOUT CONSTANT:   -35295.4037369886
 OBJECTIVE FUNCTION VALUE WITH CONSTANT:      -35220.9268538783
 REPORTED OBJECTIVE FUNCTION DOES NOT CONTAIN CONSTANT


 #TERE:
 Elapsed estimation  time in seconds:   576.50
 Elapsed covariance  time in seconds:     0.00

 ********************                              MCMC BAYESIAN ANALYSIS                            ********************
 #OBJT:**************                       AVERAGE VALUE OF LIKELIHOOD FUNCTION                     ********************
 #OBJV:********************************************   -35295.404       **************************************************
 #OBJS:********************************************       89.172 (STD) **************************************************

 ********************                              MCMC BAYESIAN ANALYSIS                            ********************
 ********************                             FINAL PARAMETER ESTIMATE                           ********************

 THETA - VECTOR OF FIXED EFFECTS PARAMETERS   *********
         TH 1      TH 2      TH 3
         1.80E-01 -5.31E+00 -3.08E+00

 OMEGA - COV MATRIX FOR RANDOM EFFECTS - ETAS  ********
         ETA1      ETA2      ETA3      ETA4      ETA5      ETA6
 ETA1
+        1.02E-02
 ETA2
+        1.76E-04  9.88E-03
 ETA3
+        5.64E-04  6.59E-04  9.78E-03
 ETA4
+        0.00E+00  0.00E+00  0.00E+00  3.96E-02
 ETA5
+        0.00E+00  0.00E+00  0.00E+00 -5.59E-03  3.39E-02
 ETA6
+        0.00E+00  0.00E+00  0.00E+00  2.91E-02 -6.73E-03  6.10E-02

 SIGMA - COV MATRIX FOR RANDOM EFFECTS - EPSILONS  ****
         EPS1
 EPS1
+        3.00E-03

 OMEGA - CORR MATRIX FOR RANDOM EFFECTS - ETAS  *******
         ETA1      ETA2      ETA3      ETA4      ETA5      ETA6
 ETA1
+        1.01E-01
 ETA2
+        1.75E-02  9.94E-02
 ETA3
+        5.62E-02  6.70E-02  9.89E-02
 ETA4
+        0.00E+00  0.00E+00  0.00E+00  1.96E-01
 ETA5
+        0.00E+00  0.00E+00  0.00E+00 -1.54E-01  1.81E-01
 ETA6
+        0.00E+00  0.00E+00  0.00E+00  5.84E-01 -1.51E-01  2.43E-01

 SIGMA - CORR MATRIX FOR RANDOM EFFECTS - EPSILONS  ***
         EPS1
 EPS1
+        5.47E-02

 ********************                              MCMC BAYESIAN ANALYSIS                            ********************
 ********************                STANDARD ERROR OF ESTIMATE (From Sample Variance)               ********************

 THETA - VECTOR OF FIXED EFFECTS PARAMETERS   *********
         TH 1      TH 2      TH 3
         5.64E-03  3.67E-03  3.64E-03

 OMEGA - COV MATRIX FOR RANDOM EFFECTS - ETAS  ********
         ETA1      ETA2      ETA3      ETA4      ETA5      ETA6
 ETA1
+        8.32E-04
 ETA2
+        4.91E-04  5.40E-04
 ETA3
+        5.87E-04  3.61E-04  5.31E-04
 ETA4
+        0.00E+00  0.00E+00  0.00E+00  1.42E-02
 ETA5
+        0.00E+00  0.00E+00  0.00E+00  9.50E-03  1.25E-02
 ETA6
+        0.00E+00  0.00E+00  0.00E+00  1.45E-02  1.15E-02  2.28E-02

 SIGMA - COV MATRIX FOR RANDOM EFFECTS - EPSILONS  ****
         EPS1
 EPS1
+        5.44E-05

 OMEGA - CORR MATRIX FOR RANDOM EFFECTS - ETAS  *******
         ETA1      ETA2      ETA3      ETA4      ETA5      ETA6
 ETA1
+        4.11E-03
 ETA2
+        4.86E-02  2.71E-03
 ETA3
+        5.83E-02  3.64E-02  2.68E-03
 ETA4
+        0.00E+00  0.00E+00  0.00E+00  3.33E-02
 ETA5
+        0.00E+00  0.00E+00  0.00E+00  2.28E-01  3.24E-02
 ETA6
+        0.00E+00  0.00E+00  0.00E+00  1.58E-01  2.25E-01  4.29E-02

 SIGMA - CORR MATRIX FOR RANDOM EFFECTS - EPSILONS  ***
         EPS1
 EPS1
+        4.97E-04
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 #TBLN:      4
 #METH: First Order Conditional Estimation with Interaction (No Prior)
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
 #TERM:
0MINIMIZATION SUCCESSFUL
 NO. OF FUNCTION EVALUATIONS USED:      475
 NO. OF SIG. DIGITS IN FINAL EST.:  3.1

 ETABAR IS THE ARITHMETIC MEAN OF THE ETA-ESTIMATES,
 AND THE P-VALUE IS GIVEN FOR THE NULL HYPOTHESIS THAT THE TRUE MEAN IS 0.

 ETABAR:        -3.3310E-04 -9.7709E-05 -8.9215E-05  3.3681E-16 -2.3752E-16 -2.0997E-16
 SE:             2.2705E-03  3.3954E-03  3.3597E-03  4.2888E-02  3.9227E-02  5.5279E-02
 N:                     800         800         800          16          16          16

 P VAL.:         8.8337E-01  9.7704E-01  9.7882E-01  1.0000E+00  1.0000E+00  1.0000E+00

 ETASHRINKSD(%)  3.6623E+01  2.1010E+00  2.7483E+00  7.2282E-01  1.0000E-10  1.0000E-10
 ETASHRINKVR(%)  5.9833E+01  4.1579E+00  5.4211E+00  1.4404E+00  1.0000E-10  1.0000E-10
 EBVSHRINKSD(%)  3.5634E+01  2.0438E+00  2.6933E+00  5.7536E-02  1.5878E-02  1.0415E-02
 EBVSHRINKVR(%)  5.8570E+01  4.0459E+00  5.3141E+00  1.1504E-01  3.1753E-02  2.0828E-02
 RELATIVEINF(%)  4.1413E+01  9.5982E+01  9.4973E+01  9.9790E+01  9.9964E+01  9.9970E+01
 EPSSHRINKSD(%)  1.2337E+01
 EPSSHRINKVR(%)  2.3153E+01


 TOTAL DATA POINTS NORMALLY DISTRIBUTED (N):         8000
 N*LOG(2PI) CONSTANT TO OBJECTIVE FUNCTION:    14703.0165312748
 OBJECTIVE FUNCTION VALUE WITHOUT CONSTANT:   -17083.8178326007
 OBJECTIVE FUNCTION VALUE WITH CONSTANT:      -2380.80130132590
 REPORTED OBJECTIVE FUNCTION DOES NOT CONTAIN CONSTANT

 TOTAL EFFECTIVE ETAS (NIND*NETA):                          2400


 #TERE:
 Elapsed estimation  time in seconds:   423.35
 Elapsed covariance  time in seconds:   122.99
 Elapsed postprocess time in seconds:     0.00

 ********************          FIRST ORDER CONDITIONAL ESTIMATION WITH INTERACTION (NO PRIOR)        ********************
 #OBJT:**************                       MINIMUM VALUE OF OBJECTIVE FUNCTION                      ********************
 #OBJV:********************************************   -17083.818       **************************************************

 ********************          FIRST ORDER CONDITIONAL ESTIMATION WITH INTERACTION (NO PRIOR)        ********************
 ********************                             FINAL PARAMETER ESTIMATE                           ********************

 THETA - VECTOR OF FIXED EFFECTS PARAMETERS   *********
         TH 1      TH 2      TH 3
         1.80E-01 -5.31E+00 -3.08E+00

 OMEGA - COV MATRIX FOR RANDOM EFFECTS - ETAS  ********
         ETA1      ETA2      ETA3      ETA4      ETA5      ETA6
 ETA1
+        1.05E-02
 ETA2
+        1.91E-04  9.82E-03
 ETA3
+        5.93E-04  6.71E-04  9.74E-03
 ETA4
+        0.00E+00  0.00E+00  0.00E+00  3.19E-02
 ETA5
+        0.00E+00  0.00E+00  0.00E+00 -4.38E-03  2.50E-02
 ETA6
+        0.00E+00  0.00E+00  0.00E+00  2.75E-02 -5.15E-03  4.97E-02

 SIGMA - COV MATRIX FOR RANDOM EFFECTS - EPSILONS  ****
         EPS1
 EPS1
+        3.00E-03

 OMEGA - CORR MATRIX FOR RANDOM EFFECTS - ETAS  *******
         ETA1      ETA2      ETA3      ETA4      ETA5      ETA6
 ETA1
+        1.02E-01
 ETA2
+        1.88E-02  9.91E-02
 ETA3
+        5.87E-02  6.86E-02  9.87E-02
 ETA4
+        0.00E+00  0.00E+00  0.00E+00  1.78E-01
 ETA5
+        0.00E+00  0.00E+00  0.00E+00 -1.55E-01  1.58E-01
 ETA6
+        0.00E+00  0.00E+00  0.00E+00  6.90E-01 -1.46E-01  2.23E-01

 SIGMA - CORR MATRIX FOR RANDOM EFFECTS - EPSILONS  ***
         EPS1
 EPS1
+        5.48E-02

 ********************          FIRST ORDER CONDITIONAL ESTIMATION WITH INTERACTION (NO PRIOR)        ********************
 ********************                            STANDARD ERROR OF ESTIMATE                          ********************

 THETA - VECTOR OF FIXED EFFECTS PARAMETERS   *********
         TH 1      TH 2      TH 3
         5.63E-03  3.58E-03  3.60E-03

 OMEGA - COV MATRIX FOR RANDOM EFFECTS - ETAS  ********
         ETA1      ETA2      ETA3      ETA4      ETA5      ETA6
 ETA1
+        9.20E-04
 ETA2
+        5.54E-04  5.19E-04
 ETA3
+        6.17E-04  3.71E-04  5.21E-04
 ETA4
+       ......... ......... .........  1.20E-02
 ETA5
+       ......... ......... .........  7.57E-03  8.97E-03
 ETA6
+       ......... ......... .........  1.27E-02  9.11E-03  1.79E-02

 SIGMA - COV MATRIX FOR RANDOM EFFECTS - EPSILONS  ****
         EPS1
 EPS1
+        5.47E-05

 OMEGA - CORR MATRIX FOR RANDOM EFFECTS - ETAS  *******
         ETA1      ETA2      ETA3      ETA4      ETA5      ETA6
 ETA1
+        4.49E-03
 ETA2
+        5.45E-02  2.62E-03
 ETA3
+        6.04E-02  3.74E-02  2.64E-03
 ETA4
+       ......... ......... .........  3.38E-02
 ETA5
+       ......... ......... .........  2.62E-01  2.83E-02
 ETA6
+       ......... ......... .........  1.38E-01  2.52E-01  4.02E-02

 SIGMA - CORR MATRIX FOR RANDOM EFFECTS - EPSILONS  ***
         EPS1
 EPS1
+        5.00E-04
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 Elapsed finaloutput time in seconds:     0.07
 #CPUT: Total CPU Time in Seconds,     1339.752
