Sat 11/16/2019
08:35 PM
$SIZES LVR=160
$PROB RUN#
$ABBR DERIV2=NO
$INPUT C OCC TIME DV AMT RATE EVID MDV CMT ROWNUM ID
$DATA superid3_occ.csv IGNORE=C

$SUBROUTINES ADVAN2 TRANS2
$ABBR REPLACE ETA(OCC_KA)=ETA(,4 TO 151 BY 3)
$ABBR REPLACE ETA(OCC_CL)=ETA(,5 TO 152 BY 3)
$ABBR REPLACE ETA(OCC_V)=ETA(,6 TO 153 BY 3)

$PK
MU_1=THETA(1)
MU_2=THETA(2)
MU_3=THETA(3)

KA=DEXP(MU_1+ETA(1)+ETA(OCC_KA))
CL=DEXP(MU_2+ETA(2)+ETA(OCC_CL))
V=DEXP(MU_3+ETA(3)+ETA(OCC_V))
S2=V

$ERROR
IPRE=F
Y = IPRE + IPRE*EPS(1)

; Initial values of THETA
$THETA  1.79067E-01 -5.31302E+00 -3.08220E+00
;INITIAL values of OMEGA

$OMEGA BLOCK(3)
 3.14841E-02
-5.55179E-03  2.64664E-02
 2.73335E-02 -6.08426E-03  5.23413E-02

$OMEGA BLOCK(3)
 1.00860E-02
 1.48793E-04  9.80457E-03
 5.38548E-04  6.57755E-04  9.72772E-03

$OMEGA BLOCK(3) SAME(49)

;Initial value of SIGMA
$SIGMA
 2.99892E-03      ;[P]

$EST METHOD=ITS INTERACTION PRINT=1 NSIG=2 NITER=0 SIGL=8 FNLETA=0 NOABORT CTYPE=3 MCETA=0
;$EST METHOD=IMP INTERACTION PRINT=1 NSIG=2 NITER=500 SIGL=8 FNLETA=0 NOABORT CTYPE=3 MCETA=0 ISAMPLE=300 MAPITER=0
;$EST METHOD=SAEM INTERACTION PRINT=10 NSIG=2 NITER=100 SIGL=8 FNLETA=0 NOABORT CTYPE=3 MCETA=0 ISAMPLE=2 CONSTRAIN=0
;$EST METHOD=IMP EONLY=1 INTERACTION PRINT=1 NSIG=2 NITER=5 SIGL=8 FNLETA=0 NOABORT CTYPE=3 MCETA=0 ISAMPLE=300 MAPITER=0
;$EST METHOD=BAYES INTERACTION PRINT=10 NSIG=2 NBURN=1000 NITER=500 SIGL=8 FNLETA=0 NOABORT CTYPE=3
;$EST METHOD=1 INTERACTION PRINT=5 NSIG=2 NBURN=1000 NITER=500 SIGL=10 FNLETA=0 NOHABORT SLOW NONINFETA=1 MCETA=20
$COV MATRIX=R UNCONDITIONAL SIGL=10

NM-TRAN MESSAGES
 WARNINGS AND ERRORS (IF ANY) FOR PROBLEM    1
 (WARNING  2) NM-TRAN INFERS THAT THE DATA ARE POPULATION.
 (WARNING  3) THERE MAY BE AN ERROR IN THE ABBREVIATED CODE. THE FOLLOWING
 ONE OR MORE RANDOM VARIABLES ARE DEFINED WITH "IF" STATEMENTS THAT DO NOT
 PROVIDE DEFINITIONS FOR BOTH THE "THEN" AND "ELSE" CASES. IF ALL
 CONDITIONS FAIL, THE VALUES OF THESE VARIABLES WILL BE ZERO.
   ETA(OCC_KA) ETA(OCC_CL) ETA(OCC_V)
 (MU_WARNING 13) MU_001: DOES NOT HAVE ADDITIVE ASSOCIATION WITH ETA(001)
 (MU_WARNING 13) MU_002: DOES NOT HAVE ADDITIVE ASSOCIATION WITH ETA(002)
 (MU_WARNING 13) MU_003: DOES NOT HAVE ADDITIVE ASSOCIATION WITH ETA(003)

1NONLINEAR MIXED EFFECTS MODEL PROGRAM (NONMEM) VERSION 7.4.3
 ORIGINALLY DEVELOPED BY STUART BEAL, LEWIS SHEINER, AND ALISON BOECKMANN
 CURRENT DEVELOPERS ARE ROBERT BAUER, ICON DEVELOPMENT SOLUTIONS,
 AND ALISON BOECKMANN. IMPLEMENTATION, EFFICIENCY, AND STANDARDIZATION
 PERFORMED BY NOUS INFOSYSTEMS.
 PROBLEM NO.:         1
 RUN#
 TOT. NO. OF OBS RECS:     8000
 TOT. NO. OF INDIVIDUALS:       16
 ONE COMPARTMENT MODEL WITH FIRST-ORDER ABSORPTION (ADVAN2)
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 #TBLN:      1
 #METH: Iterative Two Stage
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
 #TERM:
 OPTIMIZATION WAS NOT TESTED FOR CONVERGENCE

 ETABAR IS THE ARITHMETIC MEAN OF THE ETA-ESTIMATES,
 AND THE P-VALUE IS GIVEN FOR THE NULL HYPOTHESIS THAT THE TRUE MEAN IS 0.

 ETABAR:         4.2882E-05 -5.3357E-05 -6.0816E-05 -8.0983E-03 -1.0764E-02 -2.2187E-02  1.8915E-03  2.0841E-02  3.0257E-02  3.1869E-02
                -3.1657E-02  1.9194E-02  1.4186E-03 -7.9232E-03  2.7661E-02 -6.1115E-03  5.2782E-02 -8.8634E-03  7.4102E-04  9.1028E-03
                 1.1656E-02 -3.7766E-03 -7.4971E-03 -8.2158E-03  1.9034E-03  2.2228E-02  3.0183E-02 -1.4364E-02 -2.4347E-03 -2.0686E-03
                -1.1194E-03  9.8586E-03 -2.2587E-02  1.7029E-02  2.2112E-02 -1.3725E-02 -6.2045E-04  8.4406E-03 -1.3147E-02 -2.1230E-02
                 1.9260E-02  5.9419E-03  8.2838E-04 -2.8259E-02  2.1137E-02 -1.7270E-02  2.3934E-03  3.2411E-02 -2.1512E-03 -3.9099E-03
                -3.8586E-02 -4.0434E-03 -1.9556E-02 -7.6949E-03 -1.8935E-03 -1.4895E-02 -3.1548E-02  3.4459E-03  5.2727E-02 -2.3757E-02
                -3.6015E-04  1.6798E-02 -1.0142E-02 -8.9842E-03  3.4068E-02 -4.9297E-02 -1.6018E-03 -3.2318E-02 -2.2529E-02  1.1885E-02
                -1.1274E-02 -2.6613E-02  2.8181E-04  1.7149E-02  1.5454E-03  7.4412E-03 -3.4850E-02  3.2774E-02  7.8265E-04  1.7936E-03
                 1.3960E-02  9.0930E-03 -1.9746E-02 -1.1268E-02  1.5742E-03  1.8506E-02  2.4936E-02  1.1845E-02  7.0362E-03  2.0308E-02
                 8.1476E-04 -4.3683E-03  1.5848E-02  8.4533E-03 -4.3757E-03 -3.8624E-03 -7.7960E-05 -1.9319E-02  2.6469E-03  1.8763E-02
                 1.2164E-02  1.1815E-02 -1.1665E-03  8.1371E-03 -2.3088E-02  3.8024E-02 -1.7615E-02  3.0266E-03  9.6824E-04  3.4265E-03
                 1.7016E-02 -2.7680E-02 -7.0862E-03 -2.2136E-02 -3.7523E-04 -2.6344E-02 -1.3173E-03 -3.3524E-02  5.6438E-04  3.6212E-02
                -2.1887E-03 -1.3750E-02 -3.7198E-02 -1.6676E-02  2.5387E-02  2.7593E-04  4.1413E-04 -2.3788E-02  1.2605E-02 -8.4893E-03
                 1.8499E-02 -1.8486E-02  1.9090E-03  2.6007E-03  3.4424E-02  1.5448E-02 -6.7518E-03 -5.3274E-03  2.4144E-03 -5.5292E-03
                 4.5399E-02 -1.7607E-02 -7.9825E-03  3.2520E-02 -9.1236E-04 -1.2953E-02 -1.3982E-02  1.1667E-02 -1.3020E-02 -3.5701E-02
                -5.4703E-04  2.0703E-03 -1.0459E-02
 SE:             4.4100E-02  3.9371E-02  5.5603E-02  1.3429E-02  2.0190E-02  2.6922E-02  1.3545E-03  1.7255E-02  2.5045E-02  2.3208E-02
                 3.2088E-02  2.3427E-02  1.4244E-03  2.7735E-02  2.5345E-02  1.8784E-02  2.0018E-02  1.4326E-02  1.5580E-03  2.4764E-02
                 2.7526E-02  2.1299E-02  2.2064E-02  2.2795E-02  1.0441E-03  2.4287E-02  1.8430E-02  1.6609E-02  2.8621E-02  2.5958E-02
                 1.5406E-03  2.1613E-02  2.7662E-02  2.1343E-02  1.8448E-02  2.3282E-02  1.5349E-03  2.0136E-02  2.6461E-02  2.3138E-02
                 2.8346E-02  2.5750E-02  1.8792E-03  2.1570E-02  3.3467E-02  1.5777E-02  2.5097E-02  2.0600E-02  9.8156E-04  1.5439E-02
                 1.8931E-02  2.2294E-02  2.8850E-02  2.2303E-02  1.0686E-03  2.0102E-02  1.8895E-02  1.9996E-02  2.0829E-02  1.8877E-02
                 1.2705E-03  1.8922E-02  2.1939E-02  2.3609E-02  2.3661E-02  1.6661E-02  1.0919E-03  2.9073E-02  2.1378E-02  2.4621E-02
                 2.3641E-02  1.7333E-02  1.7457E-03  2.5141E-02  2.9709E-02  2.2636E-02  1.9111E-02  2.1930E-02  1.6088E-03  1.3023E-02
                 3.0003E-02  2.1371E-02  2.5970E-02  2.0637E-02  1.4068E-03  2.4356E-02  2.6397E-02  1.8786E-02  3.1306E-02  2.6585E-02
                 1.1626E-03  3.1682E-02  2.1451E-02  2.1795E-02  2.7715E-02  1.4287E-02  1.1734E-03  2.4700E-02  2.1212E-02  2.2015E-02
                 2.1869E-02  2.0614E-02  1.4926E-03  1.6861E-02  2.7196E-02  3.0329E-02  2.4376E-02  1.3054E-02  1.6269E-03  1.8433E-02
                 2.9385E-02  2.4319E-02  1.8742E-02  2.3027E-02  1.2883E-03  2.5426E-02  2.4026E-02  1.5965E-02  2.6733E-02  3.0850E-02
                 8.2472E-04  2.3040E-02  1.6625E-02  2.4188E-02  2.4827E-02  1.4326E-02  1.3184E-03  1.8611E-02  2.3840E-02  2.5932E-02
                 1.8732E-02  1.8037E-02  1.4393E-03  2.7176E-02  2.3702E-02  2.2912E-02  2.1717E-02  2.3738E-02  1.4166E-03  2.8951E-02
                 2.3439E-02  2.7376E-02  2.7435E-02  2.0986E-02  1.0376E-03  1.7176E-02  1.7360E-02  1.9527E-02  2.0077E-02  2.1380E-02
                 1.1783E-03  1.7219E-02  2.2305E-02
 N:                      16          16          16          16          16          16          16          16          16          16
                         16          16          16          16          16          16          16          16          16          16
                         16          16          16          16          16          16          16          16          16          16
                         16          16          16          16          16          16          16          16          16          16
                         16          16          16          16          16          16          16          16          16          16
                         16          16          16          16          16          16          16          16          16          16
                         16          16          16          16          16          16          16          16          16          16
                         16          16          16          16          16          16          16          16          16          16
                         16          16          16          16          16          16          16          16          16          16
                         16          16          16          16          16          16          16          16          16          16
                         16          16          16          16          16          16          16          16          16          16
                         16          16          16          16          16          16          16          16          16          16
                         16          16          16          16          16          16          16          16          16          16
                         16          16          16          16          16          16          16          16          16          16
                         16          16          16          16          16          16          16          16          16          16
                         16          16          16

 P VAL.:         9.9922E-01  9.9892E-01  9.9913E-01  5.4647E-01  5.9392E-01  4.0987E-01  1.6258E-01  2.2710E-01  2.2701E-01  1.6970E-01
                 3.2385E-01  4.1262E-01  3.1929E-01  7.7512E-01  2.7512E-01  7.4492E-01  8.3707E-03  5.3611E-01  6.3433E-01  7.1319E-01
                 6.7197E-01  8.5926E-01  7.3401E-01  7.1853E-01  6.8299E-02  3.6007E-01  1.0148E-01  3.8714E-01  9.3221E-01  9.3648E-01
                 4.6749E-01  6.4829E-01  4.1419E-01  4.2493E-01  2.3068E-01  5.5550E-01  6.8605E-01  6.7509E-01  6.1928E-01  3.5886E-01
                 4.9684E-01  8.1750E-01  6.5934E-01  1.9017E-01  5.2766E-01  2.7366E-01  9.2402E-01  1.1564E-01  2.8408E-02  8.0008E-01
                 4.1528E-02  8.5608E-01  4.9787E-01  7.3008E-01  7.6401E-02  4.5872E-01  9.4983E-02  8.6318E-01  1.1362E-02  2.0819E-01
                 7.7682E-01  3.7467E-01  6.4390E-01  7.0355E-01  1.4992E-01  3.0884E-03  1.4238E-01  2.6630E-01  2.9196E-01  6.2929E-01
                 6.3345E-01  1.2470E-01  8.7176E-01  4.9517E-01  9.5851E-01  7.4236E-01  6.8211E-02  1.3505E-01  6.2662E-01  8.9045E-01
                 6.4172E-01  6.7049E-01  4.4705E-01  5.8508E-01  2.6317E-01  4.4738E-01  3.4484E-01  5.2833E-01  8.2217E-01  4.4492E-01
                 4.8342E-01  8.9033E-01  4.6001E-01  6.9812E-01  8.7455E-01  7.8690E-01  9.4703E-01  4.3413E-01  9.0070E-01  3.9406E-01
                 5.7805E-01  5.6655E-01  4.3447E-01  6.2938E-01  3.9591E-01  2.0994E-01  4.6990E-01  8.1665E-01  5.5174E-01  8.5253E-01
                 5.6254E-01  2.5505E-01  7.0536E-01  3.3640E-01  7.7086E-01  3.0016E-01  9.5627E-01  3.5740E-02  9.8316E-01  2.4047E-01
                 7.9572E-03  5.5064E-01  2.5258E-02  4.9056E-01  3.0651E-01  9.8463E-01  7.5344E-01  2.0119E-01  5.9699E-01  7.4340E-01
                 3.2339E-01  3.0542E-01  1.8473E-01  9.2376E-01  1.4640E-01  5.0017E-01  7.5588E-01  8.2243E-01  8.8328E-02  8.4854E-01
                 5.2755E-02  5.2013E-01  7.7108E-01  1.2123E-01  3.7924E-01  4.5075E-01  4.2056E-01  5.5021E-01  5.1665E-01  9.4956E-02
                 6.4246E-01  9.0430E-01  6.3915E-01

 ETASHRINKSD(%)  1.0000E-10  2.2302E-02  1.0000E-10  4.4761E+01  1.5766E+01  1.0000E-10  9.4428E+01  2.8011E+01  1.0000E-10  4.5312E+00
                 1.0000E-10  1.8722E+00  9.4141E+01  1.0000E-10  1.0000E-10  2.2729E+01  1.6482E+01  3.9995E+01  9.3591E+01  1.0000E-10
                 1.0000E-10  1.2388E+01  7.9475E+00  4.5213E+00  9.5705E+01  1.0000E-10  2.2804E+01  3.1679E+01  1.0000E-10  1.0000E-10
                 9.3663E+01  9.8283E+00  1.0000E-10  1.2206E+01  2.3032E+01  2.4818E+00  9.3686E+01  1.5989E+01  1.0000E-10  4.8225E+00
                 1.0000E-10  1.0000E-10  9.2270E+01  1.0007E+01  1.0000E-10  3.5103E+01  1.0000E-10  1.3713E+01  9.5962E+01  3.5585E+01
                 2.0705E+01  8.2914E+00  1.0000E-10  6.5808E+00  9.5604E+01  1.6132E+01  2.0857E+01  1.7744E+01  1.3097E+01  2.0933E+01
                 9.4774E+01  2.1054E+01  8.1057E+00  2.8816E+00  1.2814E+00  3.0214E+01  9.5508E+01  1.0000E-10  1.0456E+01  1.0000E-10
                 1.3649E+00  2.7397E+01  9.2819E+01  1.0000E-10  1.0000E-10  6.8843E+00  2.0267E+01  8.1458E+00  9.3382E+01  4.5668E+01
                 1.0000E-10  1.2088E+01  1.0000E-10  1.3558E+01  9.4213E+01  1.0000E-10  1.0000E-10  2.2725E+01  1.0000E-10  1.0000E-10
                 9.5218E+01  1.0000E-10  1.0152E+01  1.0346E+01  1.0000E-10  4.0156E+01  9.5173E+01  1.0000E-10  1.1150E+01  9.4392E+00
                 8.7610E+00  1.3655E+01  9.3860E+01  2.9653E+01  1.0000E-10  1.0000E-10  1.0000E-10  4.5323E+01  9.3308E+01  2.3094E+01
                 1.0000E-10  1.0000E-10  2.1805E+01  3.5493E+00  9.4700E+01  1.0000E-10  1.0000E-10  3.4328E+01  1.0000E-10  1.0000E-10
                 9.6608E+01  3.8755E+00  3.0364E+01  4.9997E-01  1.0000E-10  3.9993E+01  9.4577E+01  2.2352E+01  1.4468E-01  1.0000E-10
                 2.1845E+01  2.4449E+01  9.4080E+01  1.0000E-10  7.2132E-01  5.7514E+00  9.3914E+00  5.7118E-01  9.4173E+01  1.0000E-10
                 1.8251E+00  1.0000E-10  1.0000E-10  1.2100E+01  9.5732E+01  2.8340E+01  2.7286E+01  1.9674E+01  1.6235E+01  1.0447E+01
                 9.5153E+01  2.8158E+01  6.5733E+00
 ETASHRINKVR(%)  1.0000E-10  4.4598E-02  1.0000E-10  6.9487E+01  2.9046E+01  1.0000E-10  9.9690E+01  4.8176E+01  1.0000E-10  8.8571E+00
                 1.0000E-10  3.7094E+00  9.9657E+01  1.0000E-10  1.0000E-10  4.0293E+01  3.0248E+01  6.3994E+01  9.9589E+01  1.0000E-10
                 1.0000E-10  2.3241E+01  1.5263E+01  8.8382E+00  9.9816E+01  1.0000E-10  4.0407E+01  5.3322E+01  1.0000E-10  1.0000E-10
                 9.9598E+01  1.8691E+01  1.0000E-10  2.2922E+01  4.0759E+01  4.9020E+00  9.9601E+01  2.9422E+01  1.0000E-10  9.4124E+00
                 1.0000E-10  1.0000E-10  9.9402E+01  1.9013E+01  1.0000E-10  5.7883E+01  1.0000E-10  2.5546E+01  9.9837E+01  5.8506E+01
                 3.7122E+01  1.5895E+01  1.0000E-10  1.2729E+01  9.9807E+01  2.9661E+01  3.7363E+01  3.2339E+01  2.4478E+01  3.7485E+01
                 9.9727E+01  3.7675E+01  1.5554E+01  5.6802E+00  2.5463E+00  5.1299E+01  9.9798E+01  1.0000E-10  1.9819E+01  1.0000E-10
                 2.7112E+00  4.7289E+01  9.9484E+01  1.0000E-10  1.0000E-10  1.3295E+01  3.6427E+01  1.5628E+01  9.9562E+01  7.0480E+01
                 1.0000E-10  2.2716E+01  1.0000E-10  2.5278E+01  9.9665E+01  1.0000E-10  1.0000E-10  4.0285E+01  1.0000E-10  1.0000E-10
                 9.9771E+01  1.0000E-10  1.9273E+01  1.9621E+01  1.0000E-10  6.4187E+01  9.9767E+01  1.0000E-10  2.1057E+01  1.7987E+01
                 1.6754E+01  2.5445E+01  9.9623E+01  5.0513E+01  1.0000E-10  1.0000E-10  1.0000E-10  7.0104E+01  9.9552E+01  4.0855E+01
                 1.0000E-10  1.0000E-10  3.8855E+01  6.9727E+00  9.9719E+01  1.0000E-10  1.0000E-10  5.6872E+01  1.0000E-10  1.0000E-10
                 9.9885E+01  7.6009E+00  5.1508E+01  9.9744E-01  1.0000E-10  6.3991E+01  9.9706E+01  3.9708E+01  2.8914E-01  1.0000E-10
                 3.8918E+01  4.2920E+01  9.9649E+01  1.0000E-10  1.4374E+00  1.1172E+01  1.7901E+01  1.1391E+00  9.9660E+01  1.0000E-10
                 3.6168E+00  1.0000E-10  1.0000E-10  2.2736E+01  9.9818E+01  4.8649E+01  4.7127E+01  3.5477E+01  2.9835E+01  1.9802E+01
                 9.9765E+01  4.8387E+01  1.2715E+01
 EBVSHRINKSD(%)  7.6216E-01  3.8513E-01  1.9628E-01  1.1215E+01  3.4875E+00  4.3539E+00  9.4646E+01  2.5652E+00  2.9905E+00  1.1419E+01
                 3.4630E+00  4.3636E+00  9.4646E+01  2.5601E+00  2.9909E+00  1.1145E+01  3.4960E+00  4.3254E+00  9.4646E+01  2.5670E+00
                 2.9904E+00  1.1248E+01  3.4860E+00  4.3563E+00  9.4646E+01  2.5676E+00  2.9907E+00  1.1241E+01  3.4973E+00  4.3667E+00
                 9.4646E+01  2.5741E+00  2.9898E+00  1.1244E+01  3.4779E+00  4.3158E+00  9.4646E+01  2.5741E+00  2.9900E+00  1.1119E+01
                 3.4638E+00  4.3342E+00  9.4646E+01  2.5545E+00  2.9910E+00  1.1249E+01  3.4848E+00  4.3814E+00  9.4646E+01  2.5744E+00
                 2.9897E+00  1.1257E+01  3.4776E+00  4.3584E+00  9.4646E+01  2.5716E+00  2.9900E+00  1.1156E+01  3.4950E+00  4.3133E+00
                 9.4646E+01  2.5733E+00  2.9898E+00  1.1068E+01  3.4788E+00  4.2939E+00  9.4646E+01  2.5658E+00  2.9906E+00  1.1235E+01
                 3.4687E+00  4.3290E+00  9.4646E+01  2.5713E+00  2.9901E+00  1.1389E+01  3.4809E+00  4.3943E+00  9.4646E+01  2.5661E+00
                 2.9906E+00  1.1238E+01  3.4606E+00  4.3375E+00  9.4646E+01  2.5668E+00  2.9907E+00  1.1280E+01  3.4639E+00  4.3446E+00
                 9.4646E+01  2.5676E+00  2.9909E+00  1.1250E+01  3.4606E+00  4.3333E+00  9.4646E+01  2.5643E+00  2.9908E+00  1.1301E+01
                 3.4742E+00  4.3397E+00  9.4646E+01  2.5736E+00  2.9899E+00  1.1381E+01  3.4616E+00  4.3344E+00  9.4646E+01  2.5645E+00
                 2.9908E+00  1.1168E+01  3.4935E+00  4.3571E+00  9.4646E+01  2.5624E+00  2.9907E+00  1.1206E+01  3.4771E+00  4.3855E+00
                 9.4646E+01  2.5771E+00  2.9902E+00  1.1137E+01  3.4722E+00  4.3247E+00  9.4646E+01  2.5585E+00  2.9909E+00  1.1188E+01
                 3.4906E+00  4.3402E+00  9.4646E+01  2.5593E+00  2.9908E+00  1.1264E+01  3.4663E+00  4.3418E+00  9.4646E+01  2.5613E+00
                 2.9915E+00  1.1277E+01  3.4786E+00  4.3839E+00  9.4646E+01  2.5681E+00  2.9904E+00  1.1241E+01  3.4764E+00  4.3337E+00
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
 #TERE:
 Elapsed estimation  time in seconds:   566.82
 Elapsed covariance  time in seconds:     5.80

 ********************                               ITERATIVE TWO STAGE                              ********************
 #OBJT:**************                        FINAL VALUE OF OBJECTIVE FUNCTION                       ********************
 #OBJV:********************************************   -18263.772       **************************************************

 ********************                               ITERATIVE TWO STAGE                              ********************
 ********************                             FINAL PARAMETER ESTIMATE                           ********************

 THETA - VECTOR OF FIXED EFFECTS PARAMETERS   *********
         TH  1     TH  2     TH  3
         1.79E-01 -5.31E+00 -3.08E+00

 OMEGA - COV MATRIX FOR RANDOM EFFECTS - ETAS  ********
         ETA1      ETA2      ETA3      ETA4      ETA5      ETA6      ETA7      ETA8      ETA9      ET10      ET11      ET12
          ET13      ET14      ET15      ET16      ET17      ET18      ET19      ET20      ET21      ET22      ET23      ET24
         ET25      ET26      ET27      ET28      ET29      ET30      ET31      ET32      ET33      ET34      ET35      ET36
          ET37      ET38      ET39      ET40      ET41      ET42      ET43      ET44      ET45      ET46      ET47      ET48
         ET49      ET50      ET51      ET52      ET53      ET54      ET55      ET56      ET57      ET58      ET59      ET60
          ET61      ET62      ET63      ET64      ET65      ET66      ET67      ET68      ET69      ET70      ET71      ET72
         ET73      ET74      ET75      ET76      ET77      ET78      ET79      ET80      ET81      ET82      ET83      ET84
          ET85      ET86      ET87      ET88      ET89      ET90      ET91      ET92      ET93      ET94      ET95      ET96
         ET97      ET98      ET99      ET100     ET101     ET102     ET103     ET104     ET105     ET106     ET107     ET108
          ET109     ET110     ET111     ET112     ET113     ET114     ET115     ET116     ET117     ET118     ET119     ET120
         ET121     ET122     ET123     ET124     ET125     ET126     ET127     ET128     ET129     ET130     ET131     ET132
          ET133     ET134     ET135     ET136     ET137     ET138     ET139     ET140     ET141     ET142     ET143     ET144
         ET145     ET146     ET147     ET148     ET149     ET150     ET151     ET152     ET153
 ETA1
+        3.15E-02
 ETA2
+       -5.55E-03  2.65E-02
 ETA3
+        2.73E-02 -6.08E-03  5.23E-02
 ETA4
+        0.00E+00  0.00E+00  0.00E+00  1.01E-02
 ETA5
+        0.00E+00  0.00E+00  0.00E+00  1.49E-04  9.80E-03
 ETA6
+        0.00E+00  0.00E+00  0.00E+00  5.39E-04  6.58E-04  9.73E-03
 ETA7
+        0.00E+00  0.00E+00  0.00E+00  0.00E+00  0.00E+00  0.00E+00  1.01E-02
 ETA8
+        0.00E+00  0.00E+00  0.00E+00  0.00E+00  0.00E+00  0.00E+00  1.49E-04  9.80E-03
 ETA9
+        0.00E+00  0.00E+00  0.00E+00  0.00E+00  0.00E+00  0.00E+00  5.39E-04  6.58E-04  9.73E-03
 ET10
+        0.00E+00  0.00E+00  0.00E+00  0.00E+00  0.00E+00  0.00E+00  0.00E+00  0.00E+00  0.00E+00  1.01E-02
 ET11
+        0.00E+00  0.00E+00  0.00E+00  0.00E+00  0.00E+00  0.00E+00  0.00E+00  0.00E+00  0.00E+00  1.49E-04  9.80E-03
         ETA1      ETA2      ETA3      ETA4      ETA5      ETA6      ETA7      ETA8      ETA9      ET10      ET11      ET12
          ET13      ET14      ET15      ET16      ET17      ET18      ET19      ET20      ET21      ET22      ET23      ET24
         ET25      ET26      ET27      ET28      ET29      ET30      ET31      ET32      ET33      ET34      ET35      ET36
          ET37      ET38      ET39      ET40      ET41      ET42      ET43      ET44      ET45      ET46      ET47      ET48
         ET49      ET50      ET51      ET52      ET53      ET54      ET55      ET56      ET57      ET58      ET59      ET60
          ET61      ET62      ET63      ET64      ET65      ET66      ET67      ET68      ET69      ET70      ET71      ET72
         ET73      ET74      ET75      ET76      ET77      ET78      ET79      ET80      ET81      ET82      ET83      ET84
          ET85      ET86      ET87      ET88      ET89      ET90      ET91      ET92      ET93      ET94      ET95      ET96
         ET97      ET98      ET99      ET100     ET101     ET102     ET103     ET104     ET105     ET106     ET107     ET108
          ET109     ET110     ET111     ET112     ET113     ET114     ET115     ET116     ET117     ET118     ET119     ET120
         ET121     ET122     ET123     ET124     ET125     ET126     ET127     ET128     ET129     ET130     ET131     ET132
          ET133     ET134     ET135     ET136     ET137     ET138     ET139     ET140     ET141     ET142     ET143     ET144
         ET145     ET146     ET147     ET148     ET149     ET150     ET151     ET152     ET153
 ET12
+        0.00E+00  0.00E+00  0.00E+00  0.00E+00  0.00E+00  0.00E+00  0.00E+00  0.00E+00  0.00E+00  5.39E-04  6.58E-04  9.73E-03
 ET13
          1.01E-02
 ET14
          1.49E-04  9.80E-03
 ET15
          5.39E-04  6.58E-04  9.73E-03
 ET16
          0.00E+00  0.00E+00  0.00E+00  1.01E-02
 ET17
          0.00E+00  0.00E+00  0.00E+00  1.49E-04  9.80E-03
 ET18
          0.00E+00  0.00E+00  0.00E+00  5.39E-04  6.58E-04  9.73E-03
 ET19
          0.00E+00  0.00E+00  0.00E+00  0.00E+00  0.00E+00  0.00E+00  1.01E-02
 ET20
          0.00E+00  0.00E+00  0.00E+00  0.00E+00  0.00E+00  0.00E+00  1.49E-04  9.80E-03
 ET21
          0.00E+00  0.00E+00  0.00E+00  0.00E+00  0.00E+00  0.00E+00  5.39E-04  6.58E-04  9.73E-03
 ET22
          0.00E+00  0.00E+00  0.00E+00  0.00E+00  0.00E+00  0.00E+00  0.00E+00  0.00E+00  0.00E+00  1.01E-02
 ET23
          0.00E+00  0.00E+00  0.00E+00  0.00E+00  0.00E+00  0.00E+00  0.00E+00  0.00E+00  0.00E+00  1.49E-04  9.80E-03
 ET24
          0.00E+00  0.00E+00  0.00E+00  0.00E+00  0.00E+00  0.00E+00  0.00E+00  0.00E+00  0.00E+00  5.39E-04  6.58E-04  9.73E-03
         ETA1      ETA2      ETA3      ETA4      ETA5      ETA6      ETA7      ETA8      ETA9      ET10      ET11      ET12
          ET13      ET14      ET15      ET16      ET17      ET18      ET19      ET20      ET21      ET22      ET23      ET24
         ET25      ET26      ET27      ET28      ET29      ET30      ET31      ET32      ET33      ET34      ET35      ET36
          ET37      ET38      ET39      ET40      ET41      ET42      ET43      ET44      ET45      ET46      ET47      ET48
         ET49      ET50      ET51      ET52      ET53      ET54      ET55      ET56      ET57      ET58      ET59      ET60
          ET61      ET62      ET63      ET64      ET65      ET66      ET67      ET68      ET69      ET70      ET71      ET72
         ET73      ET74      ET75      ET76      ET77      ET78      ET79      ET80      ET81      ET82      ET83      ET84
          ET85      ET86      ET87      ET88      ET89      ET90      ET91      ET92      ET93      ET94      ET95      ET96
         ET97      ET98      ET99      ET100     ET101     ET102     ET103     ET104     ET105     ET106     ET107     ET108
          ET109     ET110     ET111     ET112     ET113     ET114     ET115     ET116     ET117     ET118     ET119     ET120
         ET121     ET122     ET123     ET124     ET125     ET126     ET127     ET128     ET129     ET130     ET131     ET132
          ET133     ET134     ET135     ET136     ET137     ET138     ET139     ET140     ET141     ET142     ET143     ET144
         ET145     ET146     ET147     ET148     ET149     ET150     ET151     ET152     ET153
 ET25
         1.01E-02
 ET26
         1.49E-04  9.80E-03
 ET27
         5.39E-04  6.58E-04  9.73E-03
 ET28
         0.00E+00  0.00E+00  0.00E+00  1.01E-02
 ET29
         0.00E+00  0.00E+00  0.00E+00  1.49E-04  9.80E-03
 ET30
         0.00E+00  0.00E+00  0.00E+00  5.39E-04  6.58E-04  9.73E-03
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
 SIGMA - COV MATRIX FOR RANDOM EFFECTS - EPSILONS  ****
         EPS1
 EPS1
+        3.00E-03

 OMEGA - CORR MATRIX FOR RANDOM EFFECTS - ETAS  *******
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
 SIGMA - CORR MATRIX FOR RANDOM EFFECTS - EPSILONS  ***
         EPS1
 EPS1
+        5.48E-02

 ********************                               ITERATIVE TWO STAGE                              ********************
 ********************                          STANDARD ERROR OF ESTIMATE (S)                        ********************

 THETA - VECTOR OF FIXED EFFECTS PARAMETERS   *********
         TH  1     TH  2     TH  3
         4.50E-02  4.20E-02  6.00E-02

 OMEGA - COV MATRIX FOR RANDOM EFFECTS - ETAS  ********
         ETA1      ETA2      ETA3      ETA4      ETA5      ETA6      ETA7      ETA8      ETA9      ET10      ET11      ET12
          ET13      ET14      ET15      ET16      ET17      ET18      ET19      ET20      ET21      ET22      ET23      ET24
         ET25      ET26      ET27      ET28      ET29      ET30      ET31      ET32      ET33      ET34      ET35      ET36
          ET37      ET38      ET39      ET40      ET41      ET42      ET43      ET44      ET45      ET46      ET47      ET48
         ET49      ET50      ET51      ET52      ET53      ET54      ET55      ET56      ET57      ET58      ET59      ET60
          ET61      ET62      ET63      ET64      ET65      ET66      ET67      ET68      ET69      ET70      ET71      ET72
         ET73      ET74      ET75      ET76      ET77      ET78      ET79      ET80      ET81      ET82      ET83      ET84
          ET85      ET86      ET87      ET88      ET89      ET90      ET91      ET92      ET93      ET94      ET95      ET96
         ET97      ET98      ET99      ET100     ET101     ET102     ET103     ET104     ET105     ET106     ET107     ET108
          ET109     ET110     ET111     ET112     ET113     ET114     ET115     ET116     ET117     ET118     ET119     ET120
         ET121     ET122     ET123     ET124     ET125     ET126     ET127     ET128     ET129     ET130     ET131     ET132
          ET133     ET134     ET135     ET136     ET137     ET138     ET139     ET140     ET141     ET142     ET143     ET144
         ET145     ET146     ET147     ET148     ET149     ET150     ET151     ET152     ET153
 ETA1
+        7.32E-03
 ETA2
+        5.71E-03  1.23E-02
 ETA3
+        5.65E-03  6.15E-03  1.13E-02
 ETA4
+        0.00E+00  0.00E+00  0.00E+00  8.64E-04
 ETA5
+        0.00E+00  0.00E+00  0.00E+00  5.10E-04  4.81E-04
 ETA6
+        0.00E+00  0.00E+00  0.00E+00  6.21E-04  3.51E-04  4.85E-04
 ETA7
+        0.00E+00  0.00E+00  0.00E+00  0.00E+00  0.00E+00  0.00E+00  8.64E-04
 ETA8
+        0.00E+00  0.00E+00  0.00E+00  0.00E+00  0.00E+00  0.00E+00  5.10E-04  4.81E-04
 ETA9
+        0.00E+00  0.00E+00  0.00E+00  0.00E+00  0.00E+00  0.00E+00  6.21E-04  3.51E-04  4.85E-04
 ET10
+        0.00E+00  0.00E+00  0.00E+00  0.00E+00  0.00E+00  0.00E+00  0.00E+00  0.00E+00  0.00E+00  8.64E-04
 ET11
+        0.00E+00  0.00E+00  0.00E+00  0.00E+00  0.00E+00  0.00E+00  0.00E+00  0.00E+00  0.00E+00  5.10E-04  4.81E-04
         ETA1      ETA2      ETA3      ETA4      ETA5      ETA6      ETA7      ETA8      ETA9      ET10      ET11      ET12
          ET13      ET14      ET15      ET16      ET17      ET18      ET19      ET20      ET21      ET22      ET23      ET24
         ET25      ET26      ET27      ET28      ET29      ET30      ET31      ET32      ET33      ET34      ET35      ET36
          ET37      ET38      ET39      ET40      ET41      ET42      ET43      ET44      ET45      ET46      ET47      ET48
         ET49      ET50      ET51      ET52      ET53      ET54      ET55      ET56      ET57      ET58      ET59      ET60
          ET61      ET62      ET63      ET64      ET65      ET66      ET67      ET68      ET69      ET70      ET71      ET72
         ET73      ET74      ET75      ET76      ET77      ET78      ET79      ET80      ET81      ET82      ET83      ET84
          ET85      ET86      ET87      ET88      ET89      ET90      ET91      ET92      ET93      ET94      ET95      ET96
         ET97      ET98      ET99      ET100     ET101     ET102     ET103     ET104     ET105     ET106     ET107     ET108
          ET109     ET110     ET111     ET112     ET113     ET114     ET115     ET116     ET117     ET118     ET119     ET120
         ET121     ET122     ET123     ET124     ET125     ET126     ET127     ET128     ET129     ET130     ET131     ET132
          ET133     ET134     ET135     ET136     ET137     ET138     ET139     ET140     ET141     ET142     ET143     ET144
         ET145     ET146     ET147     ET148     ET149     ET150     ET151     ET152     ET153
 ET12
+        0.00E+00  0.00E+00  0.00E+00  0.00E+00  0.00E+00  0.00E+00  0.00E+00  0.00E+00  0.00E+00  6.21E-04  3.51E-04  4.85E-04
 ET13
          8.64E-04
 ET14
          5.10E-04  4.81E-04
 ET15
          6.21E-04  3.51E-04  4.85E-04
 ET16
          0.00E+00  0.00E+00  0.00E+00  8.64E-04
 ET17
          0.00E+00  0.00E+00  0.00E+00  5.10E-04  4.81E-04
 ET18
          0.00E+00  0.00E+00  0.00E+00  6.21E-04  3.51E-04  4.85E-04
 ET19
          0.00E+00  0.00E+00  0.00E+00  0.00E+00  0.00E+00  0.00E+00  8.64E-04
 ET20
          0.00E+00  0.00E+00  0.00E+00  0.00E+00  0.00E+00  0.00E+00  5.10E-04  4.81E-04
 ET21
          0.00E+00  0.00E+00  0.00E+00  0.00E+00  0.00E+00  0.00E+00  6.21E-04  3.51E-04  4.85E-04
 ET22
          0.00E+00  0.00E+00  0.00E+00  0.00E+00  0.00E+00  0.00E+00  0.00E+00  0.00E+00  0.00E+00  8.64E-04
 ET23
          0.00E+00  0.00E+00  0.00E+00  0.00E+00  0.00E+00  0.00E+00  0.00E+00  0.00E+00  0.00E+00  5.10E-04  4.81E-04
 ET24
          0.00E+00  0.00E+00  0.00E+00  0.00E+00  0.00E+00  0.00E+00  0.00E+00  0.00E+00  0.00E+00  6.21E-04  3.51E-04  4.85E-04
         ETA1      ETA2      ETA3      ETA4      ETA5      ETA6      ETA7      ETA8      ETA9      ET10      ET11      ET12
          ET13      ET14      ET15      ET16      ET17      ET18      ET19      ET20      ET21      ET22      ET23      ET24
         ET25      ET26      ET27      ET28      ET29      ET30      ET31      ET32      ET33      ET34      ET35      ET36
          ET37      ET38      ET39      ET40      ET41      ET42      ET43      ET44      ET45      ET46      ET47      ET48
         ET49      ET50      ET51      ET52      ET53      ET54      ET55      ET56      ET57      ET58      ET59      ET60
          ET61      ET62      ET63      ET64      ET65      ET66      ET67      ET68      ET69      ET70      ET71      ET72
         ET73      ET74      ET75      ET76      ET77      ET78      ET79      ET80      ET81      ET82      ET83      ET84
          ET85      ET86      ET87      ET88      ET89      ET90      ET91      ET92      ET93      ET94      ET95      ET96
         ET97      ET98      ET99      ET100     ET101     ET102     ET103     ET104     ET105     ET106     ET107     ET108
          ET109     ET110     ET111     ET112     ET113     ET114     ET115     ET116     ET117     ET118     ET119     ET120
         ET121     ET122     ET123     ET124     ET125     ET126     ET127     ET128     ET129     ET130     ET131     ET132
          ET133     ET134     ET135     ET136     ET137     ET138     ET139     ET140     ET141     ET142     ET143     ET144
         ET145     ET146     ET147     ET148     ET149     ET150     ET151     ET152     ET153
 ET25
         8.64E-04
 ET26
         5.10E-04  4.81E-04
 ET27
         6.21E-04  3.51E-04  4.85E-04
 ET28
         0.00E+00  0.00E+00  0.00E+00  8.64E-04
 ET29
         0.00E+00  0.00E+00  0.00E+00  5.10E-04  4.81E-04
 ET30
         0.00E+00  0.00E+00  0.00E+00  6.21E-04  3.51E-04  4.85E-04
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
 SIGMA - COV MATRIX FOR RANDOM EFFECTS - EPSILONS  ****
         EPS1
 EPS1
+        4.91E-05

 OMEGA - CORR MATRIX FOR RANDOM EFFECTS - ETAS  *******
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
 SIGMA - CORR MATRIX FOR RANDOM EFFECTS - EPSILONS  ***
         EPS1
 EPS1
+        4.48E-04
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 Elapsed postprocess time in seconds:     0.00
 Elapsed finaloutput time in seconds:     0.00
 #CPUT: Total CPU Time in Seconds,      572.290
