Sun 01/07/2018
07:10 PM
$PROB RUN# Example 1 (from samp5l)
$INPUT C SET ID JID TIME  DV=CONC AMT=DOSE RATE EVID MDV CMT SID
$DATA tdist_sim.csv IGNORE=C

$SUBROUTINES ADVAN3 TRANS4

$PK
MU_1=THETA(1)
MU_2=THETA(2)
MU_3=THETA(3)
MU_4=THETA(4)
NU=4.0
CHISQ=SQRT( (ETA(5)*ETA(5)+ETA(6)*ETA(6)+ETA(7)*ETA(7)+ETA(8)*ETA(8))/NU )
CL=EXP(MU_1+ETA(1)/CHISQ)
V1=EXP(MU_2+ETA(2)/CHISQ)
Q= EXP(MU_3+ETA(3)/CHISQ)
V2=EXP(MU_4+ETA(4)/CHISQ)
S1=V1

$ERROR
Y = F + F*EPS(1)

; Initial values of THETA
$THETA 1.68338E+00  1.58811E+00  8.12694E-01  2.37435E+00
;INITIAL values of OMEGA
$OMEGA BLOCK(4)
0.03
0.01  0.03
-0.01 0.01  0.03
0.01 -0.01  0.01 0.03

$OMEGA (1.0 FIXED) (1.0 FIXED) (1.0 FIXED) (1.0 FIXED)

$SIGMA
0.01

$SIMULATION (567811 NORMAL) (2933012 UNIFORM) ONLYSIMULATION SUBPROBLEMS=1
$TABLE  ID TIME CONC DOSE RATE EVID MDV CMT ETA1 ETA2 ETA3 ETA4 CL V1 Q V2
NOAPPEND ONEHEADER FILE=tdist11.csv  NOPRINT

NM-TRAN MESSAGES
 WARNINGS AND ERRORS (IF ANY) FOR PROBLEM    1
 (WARNING  2) NM-TRAN INFERS THAT THE DATA ARE POPULATION.
 (MU_WARNING 24) ABBREVIATED CODE IS TOO COMPLEX. UNABLE TO CHECK USE OF MU_ VARIABLES.

1NONLINEAR MIXED EFFECTS MODEL PROGRAM (NONMEM) VERSION 7.4.2
 ORIGINALLY DEVELOPED BY STUART BEAL, LEWIS SHEINER, AND ALISON BOECKMANN
 CURRENT DEVELOPERS ARE ROBERT BAUER, ICON DEVELOPMENT SOLUTIONS,
 AND ALISON BOECKMANN. IMPLEMENTATION, EFFICIENCY, AND STANDARDIZATION
 PERFORMED BY NOUS INFOSYSTEMS.
 PROBLEM NO.:         1
 RUN# Example 1 (from samp5l)
 TOT. NO. OF OBS RECS:      500
 TOT. NO. OF INDIVIDUALS:      100
 TWO COMPARTMENT MODEL (ADVAN3)
 PROBLEM NO.:           1      SUBPROBLEM NO.:           1
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 SIMULATION STEP PERFORMED
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 Elapsed simulation  time in seconds:     0.02
 Elapsed finaloutput time in seconds:     0.03
 #CPUT: Total CPU Time in Seconds,        0.109
