Sun 01/07/2018
07:11 PM
$PROB RUN# Example 1 (from samp5l)
$INPUT ID TIME  DV=CONC AMT=DOSE RATE EVID MDV CMT
$DATA tdist11.csv IGNORE=C

$SUBROUTINES ADVAN3 TRANS4

$PK
MU_1=THETA(1)
MU_2=THETA(2)
MU_3=THETA(3)
MU_4=THETA(4)
NU=4.0
CLA=ETA(1)/SQRT(OMEGA(1,1))
V1A=ETA(2)/SQRT(OMEGA(2,2))
QQA=ETA(3)/SQRT(OMEGA(3,3))
V2A=ETA(4)/SQRT(OMEGA(4,4))
;CLA=ETA(1)/0.173
;V1A=ETA(2)/0.173
;QQA=ETA(3)/0.173
;V2A=ETA(4)/0.173
CLB=ETA(5)
V1B=ETA(6)
QQB=ETA(7)
V2B=ETA(8)
CLR=(CLA*CLA+CLB*CLB)/NU
V1R=(V1A*V1A+V1B*V1B)/NU
QQR=(QQA*QQA+QQB*QQB)/NU
V2R=(V2A*V2A+V2B*V2B)/NU
DEL=1.0E-08
IF (CLR.GT.40.0) CLR=40.0
IF (V1R.GT.40.0) V1R=40.0
IF (QQR.GT.40.0) QQR=40.0
IF (V2R.GT.40.0) V2R=40.0
CLRQ=1.0
V1RQ=1.0
QQRQ=1.0
V2RQ=1.0
IF(CLR.GT.DEL) CLRQ=SQRT((EXP(CLR)-1.0)/CLR)
IF(V1R.GT.DEL) V1RQ=SQRT((EXP(V1R)-1.0)/V1R)
IF(QQR.GT.DEL) QQRQ=SQRT((EXP(QQR)-1.0)/QQR)
IF(V2R.GT.DEL) V2RQ=SQRT((EXP(V2R)-1.0)/V2R)
CL=EXP(MU_1+ETA(1)*CLRQ)
V1=EXP(MU_2+ETA(2)*V1RQ)
Q= EXP(MU_3+ETA(3)*QQRQ)
V2=EXP(MU_4+ETA(4)*V2RQ)
S1=V1

$ERROR
Y = F + F*EPS(1)

;$THETA 1.68338E+00  1.58811E+00  8.12694E-01  2.37435E+00
$THETA 2 2 2 2
$OMEGA BLOCK(4)
0.1
0.01 0.1
0.01 0.01 0.1
0.01 0.01 0.01 0.1

$OMEGA (1.0 FIXED) (1.0 FIXED) (1.0 FIXED) (1.0 FIXED)

$SIGMA
0.1

$EST METHOD=ITS INTERACTION MAXEVAL=9999 PRINT=5 NOHABORT SIGL=9 CTYPE=3 NITER=200 NONINFETA=1 MCETA=10
$EST METHOD=IMP INTERACTION MAXEVAL=9999 PRINT=1 NOHABORT ISAMPLE=3000 NITER=200 SIGL=9 DF=2 RANMETHOD=3S1P
     CTYPE=3 MCETA=10
$EST METHOD=1 INTERACTION MAXEVAL=9999 PRINT=1 NOHABORT NSIG=3 SIGL=9 NONINFETA=1 SLOW MCETA=10
$COV MATRIX=R UNCONDITIONAL

NM-TRAN MESSAGES
 WARNINGS AND ERRORS (IF ANY) FOR PROBLEM    1
 (WARNING  2) NM-TRAN INFERS THAT THE DATA ARE POPULATION.
 (WARNING  78) OMEGA IS USED ON THE RIGHT. WITH A SUBSEQUENT RUN, IF AN
 INITIAL ESTIMATE OF A DIAGONAL BLOCK OF OMEGA IS TO BE COMPUTED BY
 NONMEM, THAT BLOCK WILL BE SET TO AN IDENTITY MATRIX DURING THAT
 COMPUTATION. THIS COULD LEAD TO AN ARITHMETIC EXCEPTION.*
 (MU_WARNING 24) ABBREVIATED CODE IS TOO COMPLEX. UNABLE TO CHECK USE OF MU_ VARIABLES.
 * THE MAXIMUM NUMBER OF WARNINGS OF ONE OR MORE TYPES WAS REACHED.
 IT IS POSSIBLE THAT SOME WARNING MESSAGES WERE SUPPRESSED.

1NONLINEAR MIXED EFFECTS MODEL PROGRAM (NONMEM) VERSION 7.4.2
 ORIGINALLY DEVELOPED BY STUART BEAL, LEWIS SHEINER, AND ALISON BOECKMANN
 CURRENT DEVELOPERS ARE ROBERT BAUER, ICON DEVELOPMENT SOLUTIONS,
 AND ALISON BOECKMANN. IMPLEMENTATION, EFFICIENCY, AND STANDARDIZATION
 PERFORMED BY NOUS INFOSYSTEMS.
 PROBLEM NO.:         1
 RUN# Example 1 (from samp5l)
 TOT. NO. OF OBS RECS:      500
 TOT. NO. OF INDIVIDUALS:      100
 TWO COMPARTMENT MODEL (ADVAN3)
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 #TBLN:      1
 #METH: Iterative Two Stage
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
 #TERM:
 OPTIMIZATION WAS NOT COMPLETED

 ETABAR IS THE ARITHMETIC MEAN OF THE ETA-ESTIMATES,
 AND THE P-VALUE IS GIVEN FOR THE NULL HYPOTHESIS THAT THE TRUE MEAN IS 0.

 ETABAR:        -3.4947E-07  1.7209E-06 -2.4235E-06 -1.4454E-06 -1.468E-295 -4.135E-308  2.9412E-02  4.853E-287
 SE:             1.7756E-02  2.0731E-02  1.6754E-02  1.8097E-02  0.0000E+00  0.0000E+00  2.9264E-02  0.0000E+00
 N:                     100         100         100         100         100         100         100         100

 P VAL.:         9.9998E-01  9.9993E-01  9.9988E-01  9.9994E-01  0.0000E+00  0.0000E+00  3.1488E-01  0.0000E+00

 ETASHRINKSD(%)  2.5460E+00  3.4045E+00  1.5611E+01  9.2443E+00  1.0000E+02  1.0000E+02  7.0588E+01  1.0000E+02
 ETASHRINKVR(%)  5.0271E+00  6.6931E+00  2.8785E+01  1.7634E+01  1.0000E+02  1.0000E+02  9.1349E+01  1.0000E+02
 EBVSHRINKSD(%)  2.5456E+00  3.4027E+00  1.5609E+01  9.2431E+00  1.0000E+02  1.0000E+02  9.1211E+01  1.0000E+02
 EBVSHRINKVR(%)  5.0265E+00  6.6897E+00  2.8781E+01  1.7632E+01  1.0000E+02  1.0000E+02  9.9227E+01  1.0000E+02
 EPSSHRINKSD(%)  3.3028E+01
 EPSSHRINKVR(%)  5.5147E+01


 TOTAL DATA POINTS NORMALLY DISTRIBUTED (N):          500
 N*LOG(2PI) CONSTANT TO OBJECTIVE FUNCTION:    918.938533204673
 OBJECTIVE FUNCTION VALUE WITHOUT CONSTANT:   -1851.58764910068
 OBJECTIVE FUNCTION VALUE WITH CONSTANT:      -932.649115896008
 REPORTED OBJECTIVE FUNCTION DOES NOT CONTAIN CONSTANT

 TOTAL EFFECTIVE ETAS (NIND*NETA):                           800


 #TERE:
 Elapsed estimation  time in seconds:    22.73
 Elapsed covariance  time in seconds:     0.03

 ********************                               ITERATIVE TWO STAGE                              ********************
 #OBJT:**************                        FINAL VALUE OF OBJECTIVE FUNCTION                       ********************
 #OBJV:********************************************    -1851.588       **************************************************

 ********************                               ITERATIVE TWO STAGE                              ********************
 ********************                             FINAL PARAMETER ESTIMATE                           ********************

 THETA - VECTOR OF FIXED EFFECTS PARAMETERS   *********
         TH 1      TH 2      TH 3      TH 4
         1.67E+00  1.56E+00  7.92E-01  2.36E+00

 OMEGA - COV MATRIX FOR RANDOM EFFECTS - ETAS  ********
         ETA1      ETA2      ETA3      ETA4      ETA5      ETA6      ETA7      ETA8
 ETA1
+        3.35E-02
 ETA2
+        1.76E-02  4.65E-02
 ETA3
+        4.34E-03  1.70E-02  3.98E-02
 ETA4
+        1.71E-02 -1.02E-02  2.13E-02  4.02E-02
 ETA5
+        0.00E+00  0.00E+00  0.00E+00  0.00E+00  1.00E+00
 ETA6
+        0.00E+00  0.00E+00  0.00E+00  0.00E+00  0.00E+00  1.00E+00
 ETA7
+        0.00E+00  0.00E+00  0.00E+00  0.00E+00  0.00E+00  0.00E+00  1.00E+00
 ETA8
+        0.00E+00  0.00E+00  0.00E+00  0.00E+00  0.00E+00  0.00E+00  0.00E+00  1.00E+00

 SIGMA - COV MATRIX FOR RANDOM EFFECTS - EPSILONS  ****
         EPS1
 EPS1
+        9.71E-03

 OMEGA - CORR MATRIX FOR RANDOM EFFECTS - ETAS  *******
         ETA1      ETA2      ETA3      ETA4      ETA5      ETA6      ETA7      ETA8
 ETA1
+        1.83E-01
 ETA2
+        4.44E-01  2.16E-01
 ETA3
+        1.19E-01  3.96E-01  2.00E-01
 ETA4
+        4.66E-01 -2.37E-01  5.33E-01  2.00E-01
 ETA5
+        0.00E+00  0.00E+00  0.00E+00  0.00E+00  1.00E+00
 ETA6
+        0.00E+00  0.00E+00  0.00E+00  0.00E+00  0.00E+00  1.00E+00
 ETA7
+        0.00E+00  0.00E+00  0.00E+00  0.00E+00  0.00E+00  0.00E+00  1.00E+00
 ETA8
+        0.00E+00  0.00E+00  0.00E+00  0.00E+00  0.00E+00  0.00E+00  0.00E+00  1.00E+00

 SIGMA - CORR MATRIX FOR RANDOM EFFECTS - EPSILONS  ***
         EPS1
 EPS1
+        9.85E-02

 ********************                               ITERATIVE TWO STAGE                              ********************
 ********************                          STANDARD ERROR OF ESTIMATE (S)                        ********************

 THETA - VECTOR OF FIXED EFFECTS PARAMETERS   *********
         TH 1      TH 2      TH 3      TH 4
         2.17E-02  2.73E-02  2.65E-02  2.41E-02

 OMEGA - COV MATRIX FOR RANDOM EFFECTS - ETAS  ********
         ETA1      ETA2      ETA3      ETA4      ETA5      ETA6      ETA7      ETA8
 ETA1
+        6.06E-03
 ETA2
+        5.22E-03  9.42E-03
 ETA3
+        4.89E-03  5.44E-03  1.14E-02
 ETA4
+        6.42E-03  5.35E-03  9.58E-03  1.03E-02
 ETA5
+        0.00E+00  0.00E+00  0.00E+00  0.00E+00  0.00E+00
 ETA6
+        0.00E+00  0.00E+00  0.00E+00  0.00E+00  0.00E+00  0.00E+00
 ETA7
+        0.00E+00  0.00E+00  0.00E+00  0.00E+00  0.00E+00  0.00E+00  0.00E+00
 ETA8
+        0.00E+00  0.00E+00  0.00E+00  0.00E+00  0.00E+00  0.00E+00  0.00E+00  0.00E+00

 SIGMA - COV MATRIX FOR RANDOM EFFECTS - EPSILONS  ****
         EPS1
 EPS1
+        1.30E-03

 OMEGA - CORR MATRIX FOR RANDOM EFFECTS - ETAS  *******
         ETA1      ETA2      ETA3      ETA4      ETA5      ETA6      ETA7      ETA8
 ETA1
+        1.66E-02
 ETA2
+        9.54E-02  2.18E-02
 ETA3
+        1.29E-01  1.13E-01  2.85E-02
 ETA4
+        1.15E-01  1.16E-01  1.23E-01  2.58E-02
 ETA5
+       ......... ......... ......... ......... .........
 ETA6
+       ......... ......... ......... ......... ......... .........
 ETA7
+       ......... ......... ......... ......... ......... ......... .........
 ETA8
+       ......... ......... ......... ......... ......... ......... ......... .........

 SIGMA - CORR MATRIX FOR RANDOM EFFECTS - EPSILONS  ***
         EPS1
 EPS1
+        6.60E-03
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 #TBLN:      2
 #METH: Importance Sampling
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
 #TERM:
 OPTIMIZATION WAS COMPLETED

 ETABAR IS THE ARITHMETIC MEAN OF THE ETA-ESTIMATES,
 AND THE P-VALUE IS GIVEN FOR THE NULL HYPOTHESIS THAT THE TRUE MEAN IS 0.

 ETABAR:         9.7981E-05  8.4533E-04 -8.4750E-04 -1.2240E-03  1.9209E-02  6.0793E-03 -3.0316E-02  2.4679E-03
 SE:             1.5645E-02  1.8412E-02  1.2229E-02  1.3711E-02  1.1870E-02  5.5049E-03  3.2982E-02  6.3210E-03
 N:                     100         100         100         100         100         100         100         100

 P VAL.:         9.9500E-01  9.6338E-01  9.4475E-01  9.2887E-01  1.0562E-01  2.6944E-01  3.5801E-01  6.9622E-01

 ETASHRINKSD(%)  3.5088E+00  3.6109E+00  2.1184E+01  1.2143E+01  8.8070E+01  9.4467E+01  6.6852E+01  9.3647E+01
 ETASHRINKVR(%)  6.8945E+00  7.0915E+00  3.7881E+01  2.2812E+01  9.8577E+01  9.9694E+01  8.9012E+01  9.9596E+01
 EBVSHRINKSD(%)  3.0290E+00  3.8771E+00  1.8764E+01  1.1402E+01  9.4532E+01  8.6921E+01  8.1141E+01  8.0083E+01
 EBVSHRINKVR(%)  5.9662E+00  7.6040E+00  3.4008E+01  2.1504E+01  9.9701E+01  9.8289E+01  9.6444E+01  9.6033E+01
 EPSSHRINKSD(%)  7.2371E+00
 EPSSHRINKVR(%)  1.3950E+01


 TOTAL DATA POINTS NORMALLY DISTRIBUTED (N):          500
 N*LOG(2PI) CONSTANT TO OBJECTIVE FUNCTION:    918.938533204673
 OBJECTIVE FUNCTION VALUE WITHOUT CONSTANT:   -1873.39319173536
 OBJECTIVE FUNCTION VALUE WITH CONSTANT:      -954.454658530684
 REPORTED OBJECTIVE FUNCTION DOES NOT CONTAIN CONSTANT

 TOTAL EFFECTIVE ETAS (NIND*NETA):                           800


 #TERE:
 Elapsed estimation  time in seconds:    98.94

 Number of Negative Eigenvalues in Matrix=           1
 Most negative value=  -105428677.349901
 Most positive value=   1275992.33533123
 Forcing positive definiteness
 Root mean square deviation of matrix from original=    1.99980166428970

 Elapsed covariance  time in seconds:     7.16

 ********************                               IMPORTANCE SAMPLING                              ********************
 #OBJT:**************                        FINAL VALUE OF OBJECTIVE FUNCTION                       ********************
 #OBJV:********************************************    -1873.393       **************************************************

 ********************                               IMPORTANCE SAMPLING                              ********************
 ********************                             FINAL PARAMETER ESTIMATE                           ********************

 THETA - VECTOR OF FIXED EFFECTS PARAMETERS   *********
         TH 1      TH 2      TH 3      TH 4
         1.66E+00  1.56E+00  7.91E-01  2.36E+00

 OMEGA - COV MATRIX FOR RANDOM EFFECTS - ETAS  ********
         ETA1      ETA2      ETA3      ETA4      ETA5      ETA6      ETA7      ETA8
 ETA1
+        2.66E-02
 ETA2
+        1.38E-02  3.69E-02
 ETA3
+        4.91E-05  1.22E-02  2.43E-02
 ETA4
+        1.07E-02 -9.61E-03  9.27E-03  2.46E-02
 ETA5
+        0.00E+00  0.00E+00  0.00E+00  0.00E+00  1.00E+00
 ETA6
+        0.00E+00  0.00E+00  0.00E+00  0.00E+00  0.00E+00  1.00E+00
 ETA7
+        0.00E+00  0.00E+00  0.00E+00  0.00E+00  0.00E+00  0.00E+00  1.00E+00
 ETA8
+        0.00E+00  0.00E+00  0.00E+00  0.00E+00  0.00E+00  0.00E+00  0.00E+00  1.00E+00

 SIGMA - COV MATRIX FOR RANDOM EFFECTS - EPSILONS  ****
         EPS1
 EPS1
+        9.91E-03

 OMEGA - CORR MATRIX FOR RANDOM EFFECTS - ETAS  *******
         ETA1      ETA2      ETA3      ETA4      ETA5      ETA6      ETA7      ETA8
 ETA1
+        1.63E-01
 ETA2
+        4.40E-01  1.92E-01
 ETA3
+        1.93E-03  4.07E-01  1.56E-01
 ETA4
+        4.18E-01 -3.19E-01  3.79E-01  1.57E-01
 ETA5
+        0.00E+00  0.00E+00  0.00E+00  0.00E+00  1.00E+00
 ETA6
+        0.00E+00  0.00E+00  0.00E+00  0.00E+00  0.00E+00  1.00E+00
 ETA7
+        0.00E+00  0.00E+00  0.00E+00  0.00E+00  0.00E+00  0.00E+00  1.00E+00
 ETA8
+        0.00E+00  0.00E+00  0.00E+00  0.00E+00  0.00E+00  0.00E+00  0.00E+00  1.00E+00

 SIGMA - CORR MATRIX FOR RANDOM EFFECTS - EPSILONS  ***
         EPS1
 EPS1
+        9.96E-02

 ********************                               IMPORTANCE SAMPLING                              ********************
 ********************                          STANDARD ERROR OF ESTIMATE (R)                        ********************

 THETA - VECTOR OF FIXED EFFECTS PARAMETERS   *********
         TH 1      TH 2      TH 3      TH 4
         1.69E-02  2.10E-02  2.03E-02  1.84E-02

 OMEGA - COV MATRIX FOR RANDOM EFFECTS - ETAS  ********
         ETA1      ETA2      ETA3      ETA4      ETA5      ETA6      ETA7      ETA8
 ETA1
+        4.02E-03
 ETA2
+        3.88E-03  6.56E-03
 ETA3
+        3.68E-03  6.17E-03  5.00E-03
 ETA4
+        3.48E-03  5.15E-03  4.89E-03  4.81E-03
 ETA5
+        0.00E+00  0.00E+00  0.00E+00  0.00E+00  0.00E+00
 ETA6
+        0.00E+00  0.00E+00  0.00E+00  0.00E+00  0.00E+00  0.00E+00
 ETA7
+        0.00E+00  0.00E+00  0.00E+00  0.00E+00  0.00E+00  0.00E+00  0.00E+00
 ETA8
+        0.00E+00  0.00E+00  0.00E+00  0.00E+00  0.00E+00  0.00E+00  0.00E+00  0.00E+00

 SIGMA - COV MATRIX FOR RANDOM EFFECTS - EPSILONS  ****
         EPS1
 EPS1
+        1.06E-03

 OMEGA - CORR MATRIX FOR RANDOM EFFECTS - ETAS  *******
         ETA1      ETA2      ETA3      ETA4      ETA5      ETA6      ETA7      ETA8
 ETA1
+        1.23E-02
 ETA2
+        9.60E-02  1.71E-02
 ETA3
+        1.45E-01  2.07E-01  1.60E-02
 ETA4
+        1.03E-01  1.51E-01  1.56E-01  1.53E-02
 ETA5
+       ......... ......... ......... ......... .........
 ETA6
+       ......... ......... ......... ......... ......... .........
 ETA7
+       ......... ......... ......... ......... ......... ......... .........
 ETA8
+       ......... ......... ......... ......... ......... ......... ......... .........

 SIGMA - CORR MATRIX FOR RANDOM EFFECTS - EPSILONS  ***
         EPS1
 EPS1
+        5.33E-03
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 #TBLN:      3
 #METH: First Order Conditional Estimation with Interaction
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
 #TERM:
0MINIMIZATION SUCCESSFUL
 HOWEVER, PROBLEMS OCCURRED WITH THE MINIMIZATION.
 REGARD THE RESULTS OF THE ESTIMATION STEP CAREFULLY, AND ACCEPT THEM ONLY
 AFTER CHECKING THAT THE COVARIANCE STEP PRODUCES REASONABLE OUTPUT.
 NO. OF FUNCTION EVALUATIONS USED:      125
 NO. OF SIG. DIGITS IN FINAL EST.:  5.1

 ETABAR IS THE ARITHMETIC MEAN OF THE ETA-ESTIMATES,
 AND THE P-VALUE IS GIVEN FOR THE NULL HYPOTHESIS THAT THE TRUE MEAN IS 0.

 ETABAR:        -1.9280E-03  5.6521E-03 -4.2533E-03 -9.8087E-03 -4.5098E-24  3.2871E-19  2.4987E-29  1.8388E-21
 SE:             1.6893E-02  1.9955E-02  1.3566E-02  1.6181E-02  4.4872E-24  3.2706E-19  2.4861E-29  1.9523E-21
 N:                     100         100         100         100         100         100         100         100

 P VAL.:         9.0913E-01  7.7699E-01  7.5388E-01  5.4439E-01  3.1488E-01  3.1488E-01  3.1486E-01  3.4628E-01

 ETASHRINKSD(%)  1.0000E-10  1.0000E-10  1.2573E+01  1.0000E-10  1.0000E+02  1.0000E+02  1.0000E+02  1.0000E+02
 ETASHRINKVR(%)  1.0000E-10  1.0000E-10  2.3565E+01  1.0000E-10  1.0000E+02  1.0000E+02  1.0000E+02  1.0000E+02
 EBVSHRINKSD(%)  2.8810E+00  3.8693E+00  2.0627E+01  1.1861E+01  1.0000E+02  1.0000E+02  1.0000E+02  1.0000E+02
 EBVSHRINKVR(%)  5.6790E+00  7.5890E+00  3.6999E+01  2.2315E+01  1.0000E+02  1.0000E+02  1.0000E+02  1.0000E+02
 EPSSHRINKSD(%)  2.8995E+01
 EPSSHRINKVR(%)  4.9583E+01


 TOTAL DATA POINTS NORMALLY DISTRIBUTED (N):          500
 N*LOG(2PI) CONSTANT TO OBJECTIVE FUNCTION:    918.938533204673
 OBJECTIVE FUNCTION VALUE WITHOUT CONSTANT:   -1848.45440618284
 OBJECTIVE FUNCTION VALUE WITH CONSTANT:      -929.515872978170
 REPORTED OBJECTIVE FUNCTION DOES NOT CONTAIN CONSTANT

 TOTAL EFFECTIVE ETAS (NIND*NETA):                           800


 #TERE:
 Elapsed estimation  time in seconds:    10.33
 Elapsed covariance  time in seconds:    20.08
 Elapsed postprocess time in seconds:     0.00

 ********************               FIRST ORDER CONDITIONAL ESTIMATION WITH INTERACTION              ********************
 #OBJT:**************                       MINIMUM VALUE OF OBJECTIVE FUNCTION                      ********************
 #OBJV:********************************************    -1848.454       **************************************************

 ********************               FIRST ORDER CONDITIONAL ESTIMATION WITH INTERACTION              ********************
 ********************                             FINAL PARAMETER ESTIMATE                           ********************

 THETA - VECTOR OF FIXED EFFECTS PARAMETERS   *********
         TH 1      TH 2      TH 3      TH 4
         1.67E+00  1.56E+00  7.90E-01  2.37E+00

 OMEGA - COV MATRIX FOR RANDOM EFFECTS - ETAS  ********
         ETA1      ETA2      ETA3      ETA4      ETA5      ETA6      ETA7      ETA8
 ETA1
+        2.66E-02
 ETA2
+        1.38E-02  3.69E-02
 ETA3
+        4.91E-05  1.22E-02  2.43E-02
 ETA4
+        1.07E-02 -9.62E-03  9.27E-03  2.46E-02
 ETA5
+        0.00E+00  0.00E+00  0.00E+00  0.00E+00  1.00E+00
 ETA6
+        0.00E+00  0.00E+00  0.00E+00  0.00E+00  0.00E+00  1.00E+00
 ETA7
+        0.00E+00  0.00E+00  0.00E+00  0.00E+00  0.00E+00  0.00E+00  1.00E+00
 ETA8
+        0.00E+00  0.00E+00  0.00E+00  0.00E+00  0.00E+00  0.00E+00  0.00E+00  1.00E+00

 SIGMA - COV MATRIX FOR RANDOM EFFECTS - EPSILONS  ****
         EPS1
 EPS1
+        9.91E-03

 OMEGA - CORR MATRIX FOR RANDOM EFFECTS - ETAS  *******
         ETA1      ETA2      ETA3      ETA4      ETA5      ETA6      ETA7      ETA8
 ETA1
+        1.63E-01
 ETA2
+        4.40E-01  1.92E-01
 ETA3
+        1.93E-03  4.07E-01  1.56E-01
 ETA4
+        4.17E-01 -3.19E-01  3.79E-01  1.57E-01
 ETA5
+        0.00E+00  0.00E+00  0.00E+00  0.00E+00  1.00E+00
 ETA6
+        0.00E+00  0.00E+00  0.00E+00  0.00E+00  0.00E+00  1.00E+00
 ETA7
+        0.00E+00  0.00E+00  0.00E+00  0.00E+00  0.00E+00  0.00E+00  1.00E+00
 ETA8
+        0.00E+00  0.00E+00  0.00E+00  0.00E+00  0.00E+00  0.00E+00  0.00E+00  1.00E+00

 SIGMA - CORR MATRIX FOR RANDOM EFFECTS - EPSILONS  ***
         EPS1
 EPS1
+        9.96E-02

 ********************               FIRST ORDER CONDITIONAL ESTIMATION WITH INTERACTION              ********************
 ********************                            STANDARD ERROR OF ESTIMATE                          ********************

 THETA - VECTOR OF FIXED EFFECTS PARAMETERS   *********
         TH 1      TH 2      TH 3      TH 4
         1.85E-02  2.54E-02  2.34E-02  2.07E-02

 OMEGA - COV MATRIX FOR RANDOM EFFECTS - ETAS  ********
         ETA1      ETA2      ETA3      ETA4      ETA5      ETA6      ETA7      ETA8
 ETA1
+        4.80E-03
 ETA2
+        4.01E-03  7.50E-03
 ETA3
+        7.82E-04  4.10E-03  5.82E-03
 ETA4
+        3.04E-03  3.50E-03  3.84E-03  5.12E-03
 ETA5
+       ......... ......... ......... ......... .........
 ETA6
+       ......... ......... ......... ......... ......... .........
 ETA7
+       ......... ......... ......... ......... ......... ......... .........
 ETA8
+       ......... ......... ......... ......... ......... ......... ......... .........

 SIGMA - COV MATRIX FOR RANDOM EFFECTS - EPSILONS  ****
         EPS1
 EPS1
+        9.64E-04

 OMEGA - CORR MATRIX FOR RANDOM EFFECTS - ETAS  *******
         ETA1      ETA2      ETA3      ETA4      ETA5      ETA6      ETA7      ETA8
 ETA1
+        1.47E-02
 ETA2
+        8.78E-02  1.95E-02
 ETA3
+        3.08E-02  1.12E-01  1.87E-02
 ETA4
+        7.94E-02  9.76E-02  1.05E-01  1.63E-02
 ETA5
+       ......... ......... ......... ......... .........
 ETA6
+       ......... ......... ......... ......... ......... .........
 ETA7
+       ......... ......... ......... ......... ......... ......... .........
 ETA8
+       ......... ......... ......... ......... ......... ......... ......... .........

 SIGMA - CORR MATRIX FOR RANDOM EFFECTS - EPSILONS  ***
         EPS1
 EPS1
+        4.84E-03
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 Elapsed finaloutput time in seconds:     0.05
 #CPUT: Total CPU Time in Seconds,      155.361
