Sun 01/07/2018
07:24 PM
$PROB RUN# Example 1 (from samp5l)
$INPUT ID TIME  DV=CONC AMT=DOSE RATE EVID MDV CMT
$DATA tdist13.csv IGNORE=C

$SUBROUTINES ADVAN3 TRANS4

$PK
MU_1=THETA(1)
MU_2=THETA(2)
MU_3=THETA(3)
MU_4=THETA(4)
NU=1.0
CLA=ETA(1)/SQRT(OMEGA(1,1))
V1A=ETA(2)/SQRT(OMEGA(2,2))
QQA=ETA(3)/SQRT(OMEGA(3,3))
V2A=ETA(4)/SQRT(OMEGA(4,4))
;CLA=ETA(1)/0.173
;V1A=ETA(2)/0.173
;QQA=ETA(3)/0.173
;V2A=ETA(4)/0.173
CLB=ETA(5)
V1B=ETA(6)
QQB=ETA(7)
V2B=ETA(8)
CLR=(CLA*CLA+CLB*CLB)/NU
V1R=(V1A*V1A+V1B*V1B)/NU
QQR=(QQA*QQA+QQB*QQB)/NU
V2R=(V2A*V2A+V2B*V2B)/NU
DEL=1.0E-08
IF (CLR.GT.40.0) CLR=40.0
IF (V1R.GT.40.0) V1R=40.0
IF (QQR.GT.40.0) QQR=40.0
IF (V2R.GT.40.0) V2R=40.0
CLRQ=1.0
V1RQ=1.0
QQRQ=1.0
V2RQ=1.0
IF(CLR.GT.DEL) CLRQ=SQRT((EXP(CLR)-1.0)/CLR)
IF(V1R.GT.DEL) V1RQ=SQRT((EXP(V1R)-1.0)/V1R)
IF(QQR.GT.DEL) QQRQ=SQRT((EXP(QQR)-1.0)/QQR)
IF(V2R.GT.DEL) V2RQ=SQRT((EXP(V2R)-1.0)/V2R)
CL=EXP(MU_1+ETA(1)*CLRQ)
V1=EXP(MU_2+ETA(2)*V1RQ)
Q= EXP(MU_3+ETA(3)*QQRQ)
V2=EXP(MU_4+ETA(4)*V2RQ)
S1=V1

$ERROR
Y = F + F*EPS(1)

;$THETA 1.68338E+00  1.58811E+00  8.12694E-01  2.37435E+00
$THETA 2 2 2 2
$OMEGA BLOCK(4)
0.1
0.01 0.1
0.01 0.01 0.1
0.01 0.01 0.01 0.1

$OMEGA (1.0 FIXED) (1.0 FIXED) (1.0 FIXED) (1.0 FIXED)

$SIGMA
0.1

;$EST METHOD=ITS INTERACTION MAXEVAL=9999 PRINT=5 NOHABORT SIGL=9 CTYPE=3 NITER=200 NONINFETA=1 MCETA=10
$EST METHOD=IMP INTERACTION MAXEVAL=9999 PRINT=1 NOHABORT ISAMPLE=3000 NITER=200 SIGL=9 DF=2 RANMETHOD=3S1P
     CTYPE=3 MCETA=10
$EST METHOD=1 INTERACTION MAXEVAL=9999 PRINT=1 NOHABORT NSIG=3 SIGL=9 NONINFETA=1 SLOW MCETA=10
$COV MATRIX=R UNCONDITIONAL

NM-TRAN MESSAGES
 WARNINGS AND ERRORS (IF ANY) FOR PROBLEM    1
 (WARNING  2) NM-TRAN INFERS THAT THE DATA ARE POPULATION.
 (WARNING  78) OMEGA IS USED ON THE RIGHT. WITH A SUBSEQUENT RUN, IF AN
 INITIAL ESTIMATE OF A DIAGONAL BLOCK OF OMEGA IS TO BE COMPUTED BY
 NONMEM, THAT BLOCK WILL BE SET TO AN IDENTITY MATRIX DURING THAT
 COMPUTATION. THIS COULD LEAD TO AN ARITHMETIC EXCEPTION.*
 (MU_WARNING 24) ABBREVIATED CODE IS TOO COMPLEX. UNABLE TO CHECK USE OF MU_ VARIABLES.
 * THE MAXIMUM NUMBER OF WARNINGS OF ONE OR MORE TYPES WAS REACHED.
 IT IS POSSIBLE THAT SOME WARNING MESSAGES WERE SUPPRESSED.

1NONLINEAR MIXED EFFECTS MODEL PROGRAM (NONMEM) VERSION 7.4.2
 ORIGINALLY DEVELOPED BY STUART BEAL, LEWIS SHEINER, AND ALISON BOECKMANN
 CURRENT DEVELOPERS ARE ROBERT BAUER, ICON DEVELOPMENT SOLUTIONS,
 AND ALISON BOECKMANN. IMPLEMENTATION, EFFICIENCY, AND STANDARDIZATION
 PERFORMED BY NOUS INFOSYSTEMS.
 PROBLEM NO.:         1
 RUN# Example 1 (from samp5l)
 TOT. NO. OF OBS RECS:      500
 TOT. NO. OF INDIVIDUALS:      100
 TWO COMPARTMENT MODEL (ADVAN3)
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 #TBLN:      1
 #METH: Importance Sampling
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
 #TERM:
 OBJECTIVE FUNCTION IS INFINITE. PROBLEM ENDED

 ETABAR IS THE ARITHMETIC MEAN OF THE ETA-ESTIMATES,
 AND THE P-VALUE IS GIVEN FOR THE NULL HYPOTHESIS THAT THE TRUE MEAN IS 0.

 ETABAR:        -2.7168E-02 -3.2265E-02 -8.1775E-02  4.9793E-02  2.0226E-01 -1.1169E-01  5.9731E-02  7.5402E-02
 SE:             2.8315E-02  1.8522E-02  1.6907E-02  1.4764E-02  5.7317E-02  7.3833E-02  8.8733E-02  7.9020E-02
 N:                     100         100         100         100         100         100         100         100

 P VAL.:         3.3731E-01  8.1509E-02  1.3219E-06  7.4458E-04  4.1753E-04  1.3033E-01  5.0085E-01  3.3997E-01

 ETASHRINKSD(%)  2.4413E+00  7.4330E+00  1.8183E+01  2.2837E+01  4.2394E+01  2.5795E+01  1.0820E+01  2.0582E+01
 ETASHRINKVR(%)  4.8229E+00  1.4313E+01  3.3059E+01  4.0458E+01  6.6816E+01  4.4937E+01  2.0469E+01  3.6928E+01
 EBVSHRINKSD(%)  1.8380E+00  8.2052E+00  1.3338E+01  9.9553E+00  2.2152E+01  2.7813E+01  5.7962E+01  3.4849E+01
 EBVSHRINKVR(%)  3.6422E+00  1.5737E+01  2.4897E+01  1.8920E+01  3.9397E+01  4.7891E+01  8.2328E+01  5.7554E+01
 EPSSHRINKSD(%)  1.0000E-10
 EPSSHRINKVR(%)  1.0000E-10


 TOTAL DATA POINTS NORMALLY DISTRIBUTED (N):          495
 N*LOG(2PI) CONSTANT TO OBJECTIVE FUNCTION:    909.749147872626
 OBJECTIVE FUNCTION VALUE WITHOUT CONSTANT:                      NaN
 OBJECTIVE FUNCTION VALUE WITH CONSTANT:                         NaN
 REPORTED OBJECTIVE FUNCTION DOES NOT CONTAIN CONSTANT

 TOTAL EFFECTIVE ETAS (NIND*NETA):                           800


 #TERE:
 Elapsed estimation  time in seconds:    41.70
 #TBLN:      2
 #METH: First Order Conditional Estimation with Interaction
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
0PRED EXIT CODE = 1
0INDIVIDUAL NO.      68   ID= 6.80000000000000E+01   (WITHIN-INDIVIDUAL) DATA REC NO.   2
 THETA=
  1.84E+00   1.89E+00   1.49E+00   2.31E+00
 ETA=
  1.02E-01   6.29E-01   5.29E-01   2.38E-01   1.03E-01  -1.85E+00  -1.15E+00   5.93E-01
 OCCURS DURING SEARCH FOR ETA AT A NONZERO VALUE OF ETA
 A ROOT OF THE CHARACTERISTIC EQUATION IS ZERO BECAUSE
 K*K21 IS MUCH SMALLER THAN  (K+K12+K21)**2.
 PERHAPS K OR K21 IS VERY SMALL, OR K12 IS VERY LARGE.
0PROGRAM TERMINATED BY OBJ
 MESSAGE ISSUED FROM ESTIMATION STEP
 AT INITIAL OBJ. FUNCTION EVALUATION


 #TERM:

 TOTAL DATA POINTS NORMALLY DISTRIBUTED (N):          335
 N*LOG(2PI) CONSTANT TO OBJECTIVE FUNCTION:    615.688817247131
 OBJECTIVE FUNCTION VALUE WITHOUT CONSTANT:   1.340780792994260E+154
 OBJECTIVE FUNCTION VALUE WITH CONSTANT:      1.340780792994260E+154
 REPORTED OBJECTIVE FUNCTION DOES NOT CONTAIN CONSTANT

 TOTAL EFFECTIVE ETAS (NIND*NETA):                           536


 #TERE:
 Elapsed estimation  time in seconds:     0.22
 #CPUT: Total CPU Time in Seconds,       41.871
