Sun 01/07/2018
07:20 PM
$PROB RUN# Example 1 (from samp5l)
$INPUT C SET ID JID TIME  DV=CONC AMT=DOSE RATE EVID MDV CMT SID
$DATA tdist_sim.csv IGNORE=C

$SUBROUTINES ADVAN3 TRANS4

$PK
MU_1=THETA(1)
MU_2=THETA(2)
MU_3=THETA(3)
MU_4=THETA(4)
NU=1.0
CHISQ=SQRT( ETA(5)*ETA(5) )
CL=EXP(MU_1+ETA(1)/CHISQ)
V1=EXP(MU_2+ETA(2)/CHISQ)
Q= EXP(MU_3+ETA(3)/CHISQ)
V2=EXP(MU_4+ETA(4)/CHISQ)
S1=V1

$ERROR
Y = F + F*EPS(1)

; Initial values of THETA
$THETA 1.68338E+00  1.58811E+00  8.12694E-01  2.37435E+00
;INITIAL values of OMEGA
$OMEGA BLOCK(4)
0.03
0.01  0.03
-0.01 0.01  0.03
0.01 -0.01  0.01 0.03

$OMEGA (1.0 FIXED)

$SIGMA
0.01

$SIMULATION (567811 NORMAL) (2933012 UNIFORM) ONLYSIMULATION SUBPROBLEMS=1
$TABLE  ID TIME CONC DOSE RATE EVID MDV CMT ETA1 ETA2 ETA3 ETA4 CL V1 Q V2
NOAPPEND ONEHEADER FILE=tdist13.csv  NOPRINT

NM-TRAN MESSAGES
 WARNINGS AND ERRORS (IF ANY) FOR PROBLEM    1
 (WARNING  2) NM-TRAN INFERS THAT THE DATA ARE POPULATION.
 (MU_WARNING 13) MU_001: DOES NOT HAVE ADDITIVE ASSOCIATION WITH ETA(001)
 (MU_WARNING 12) MU_001: SHOULD NOT BE ASSOCIATED WITH ETA(005)
 (MU_WARNING 11) MU_001: SHOULD NOT BE ASSOCIATED WITH MORE THAN ONE ETA.
 (MU_WARNING 13) MU_002: DOES NOT HAVE ADDITIVE ASSOCIATION WITH ETA(002)
 (MU_WARNING 12) MU_002: SHOULD NOT BE ASSOCIATED WITH ETA(005)
 (MU_WARNING 19) ETA(005): HAS ALREADY BEEN MU_ ASSOCIATED, CANNOT BE USED AGAIN.
 (MU_WARNING 11) MU_002: SHOULD NOT BE ASSOCIATED WITH MORE THAN ONE ETA.
 (MU_WARNING 13) MU_003: DOES NOT HAVE ADDITIVE ASSOCIATION WITH ETA(003)
 (MU_WARNING 12) MU_003: SHOULD NOT BE ASSOCIATED WITH ETA(005)
 (MU_WARNING 19) ETA(005): HAS ALREADY BEEN MU_ ASSOCIATED, CANNOT BE USED AGAIN.
 (MU_WARNING 11) MU_003: SHOULD NOT BE ASSOCIATED WITH MORE THAN ONE ETA.
 (MU_WARNING 13) MU_004: DOES NOT HAVE ADDITIVE ASSOCIATION WITH ETA(004)
 (MU_WARNING 12) MU_004: SHOULD NOT BE ASSOCIATED WITH ETA(005)
 (MU_WARNING 19) ETA(005): HAS ALREADY BEEN MU_ ASSOCIATED, CANNOT BE USED AGAIN.
 (MU_WARNING 11) MU_004: SHOULD NOT BE ASSOCIATED WITH MORE THAN ONE ETA.

1NONLINEAR MIXED EFFECTS MODEL PROGRAM (NONMEM) VERSION 7.4.2
 ORIGINALLY DEVELOPED BY STUART BEAL, LEWIS SHEINER, AND ALISON BOECKMANN
 CURRENT DEVELOPERS ARE ROBERT BAUER, ICON DEVELOPMENT SOLUTIONS,
 AND ALISON BOECKMANN. IMPLEMENTATION, EFFICIENCY, AND STANDARDIZATION
 PERFORMED BY NOUS INFOSYSTEMS.
 PROBLEM NO.:         1
 RUN# Example 1 (from samp5l)
 TOT. NO. OF OBS RECS:      500
 TOT. NO. OF INDIVIDUALS:      100
 TWO COMPARTMENT MODEL (ADVAN3)
 PROBLEM NO.:           1      SUBPROBLEM NO.:           1
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
0PRED EXIT CODE = 1
0INDIVIDUAL NO.      27   ID= 2.70000000000000E+01   (WITHIN-INDIVIDUAL) DATA REC NO.   2
 THETA=
  1.68E+00   1.59E+00   8.13E-01   2.37E+00
 ETA=
  1.27E-01  -6.60E-02  -2.83E-01  -9.14E-02   2.90E-03
 A ROOT OF THE CHARACTERISTIC EQUATION IS ZERO BECAUSE
 K*K21 IS MUCH SMALLER THAN  (K+K12+K21)**2.
 PERHAPS K OR K21 IS VERY SMALL, OR K12 IS VERY LARGE.
 MESSAGE ISSUED FROM SIMULATION STEP
 PRED SIMULATION REDO

0PRED EXIT CODE = 1
0INDIVIDUAL NO.      36   ID= 3.60000000000000E+01   (WITHIN-INDIVIDUAL) DATA REC NO.   2
 THETA=
  1.68E+00   1.59E+00   8.13E-01   2.37E+00
 ETA=
 -1.42E-01  -2.19E-01   1.23E-01   2.00E-01   1.04E-02
 A ROOT OF THE CHARACTERISTIC EQUATION IS ZERO BECAUSE
 K*K21 IS MUCH SMALLER THAN  (K+K12+K21)**2.
 PERHAPS K OR K21 IS VERY SMALL, OR K12 IS VERY LARGE.
 MESSAGE ISSUED FROM SIMULATION STEP
 SIMULATION STEP PERFORMED
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 Elapsed simulation  time in seconds:     0.02
 Elapsed finaloutput time in seconds:     0.03
 #CPUT: Total CPU Time in Seconds,        0.078
