$PROB RUN# Example 1 (from samp5l)
$INPUT ID TIME  DV=CONC AMT=DOSE RATE EVID MDV CMT
$DATA tdist15.csv IGNORE=C

$SUBROUTINES ADVAN3 TRANS4

$PK
MU_1=THETA(1)
MU_2=THETA(2)
MU_3=THETA(3)
MU_4=THETA(4)
NU=2.0
CLA=ETA(1)/SQRT(OMEGA(1,1))
V1A=ETA(2)/SQRT(OMEGA(2,2))
QQA=ETA(3)/SQRT(OMEGA(3,3))
V2A=ETA(4)/SQRT(OMEGA(4,4))
;CLA=ETA(1)/0.173
;V1A=ETA(2)/0.173
;QQA=ETA(3)/0.173
;V2A=ETA(4)/0.173
CLB=ETA(5)
V1B=ETA(6)
QQB=ETA(7)
V2B=ETA(8)
CLR=(CLA*CLA+CLB*CLB)/NU
V1R=(V1A*V1A+V1B*V1B)/NU
QQR=(QQA*QQA+QQB*QQB)/NU
V2R=(V2A*V2A+V2B*V2B)/NU
DEL=1.0E-08
IF (CLR.GT.40.0) CLR=40.0
IF (V1R.GT.40.0) V1R=40.0
IF (QQR.GT.40.0) QQR=40.0
IF (V2R.GT.40.0) V2R=40.0
CLRQ=1.0
V1RQ=1.0
QQRQ=1.0
V2RQ=1.0
IF(CLR.GT.DEL) CLRQ=SQRT((EXP(CLR)-1.0)/CLR)
IF(V1R.GT.DEL) V1RQ=SQRT((EXP(V1R)-1.0)/V1R)
IF(QQR.GT.DEL) QQRQ=SQRT((EXP(QQR)-1.0)/QQR)
IF(V2R.GT.DEL) V2RQ=SQRT((EXP(V2R)-1.0)/V2R)
CL=EXP(MU_1+ETA(1)*CLRQ)
V1=EXP(MU_2+ETA(2)*V1RQ)
Q= EXP(MU_3+ETA(3)*QQRQ)
V2=EXP(MU_4+ETA(4)*V2RQ)
S1=V1

$ERROR
Y = F + F*EPS(1)

;$THETA 1.68338E+00  1.58811E+00  8.12694E-01  2.37435E+00
$THETA 2 2 2 2
$OMEGA BLOCK(4)
0.1
0.01 0.1
0.01 0.01 0.1
0.01 0.01 0.01 0.1

$OMEGA (1.0 FIXED) (1.0 FIXED) (1.0 FIXED) (1.0 FIXED)

$SIGMA
0.1

;$EST METHOD=ITS INTERACTION LAPLACE MAXEVAL=9999 PRINT=5 NOHABORT SIGL=9 CTYPE=3 NITER=200 NONINFETA=1 MCETA=10
$EST METHOD=IMP INTERACTION LAPLACE MAXEVAL=9999 PRINT=1 NOHABORT ISAMPLE=3000 NITER=200 SIGL=9 DF=2 RANMETHOD=3S2P
     CTYPE=3 MCETA=10
$EST METHOD=1 INTERACTION LAPLACE MAXEVAL=9999 PRINT=1 NOHABORT NSIG=3 SIGL=9 NONINFETA=1 SLOW MCETA=10
$COV MATRIX=R UNCONDITIONAL
